// SBML level 2 version 4

function Rate_Law_for_BAFF_clipoff(k1, s1, s2)
  k1*s1*s2;
end

function Rate_Law_for_B_FLC_production(k1, s1, s2)
  k1*s1*s2;
end

function Constant_flux__irreversible(v)
  v;
end
Constant_flux__irreversible is "Constant flux (irreversible)";

model abudukelimu1()

  // Compartments:
  compartment compartment = 1;

  // Species:
  species $Bcells in compartment = 1;
  species CRA in compartment = 0.00999412;
  species DyingBacteria in compartment = 0;
  species DyingFibr in compartment = 0;
  species FLC in compartment = 0.000999412;
  species $FLC_drug in compartment = 0;
  species HealthyBacteria in compartment = 1e-6;
  species HealthyFibr in compartment = 999.509;
  species MMP7 in compartment = 99951;
  species MMP8 in compartment = 999509;
  species MastCells in compartment = 0.0998992;
  species MastCells_FLC in compartment = 9.98404e-5;
  species MastCells_FLC_CRA in compartment = 9.97816e-7;
  species Protease in compartment = 1;
  species TNFalpha in compartment = 4.75162;
  species $Total_space in compartment;
  species $drug in compartment = 0;
  species $free_space in compartment;
  species washout in compartment = 1;

  // Parameters:
  Initial_for_Total_space = 1000;
  k_CRA_influx = 0;
  k_protease_influx = 0;

  // Assignment rules:
  Total_space := Initial_for_Total_space;
  free_space := Initial_for_Total_space - (HealthyFibr + DyingFibr);

  // Reactions:
  R10_drug_washout: washout + $drug => washout; compartment*R10_drug_washout_k1*drug*washout;
    R10_drug_washout_k1 = 0.0001;
  R11_FLC_drug_binding: FLC + $drug -> $FLC_drug; compartment*(R11_FLC_drug_binding_k1*drug*FLC - R11_FLC_drug_binding_k2*FLC_drug);
    R11_FLC_drug_binding_k2 = 1e-5; R11_FLC_drug_binding_k1 = 1e-5;
  R12_FLC_drug_washout: washout + $FLC_drug => washout; compartment*R12_FLC_drug_washout_k1*FLC_drug*washout;
    R12_FLC_drug_washout_k1 = 0.0001;
  R13_CRA_Secretion_DyingFibr: DyingFibr => CRA; compartment*R13_CRA_Secretion_DyingFibr_k1*DyingFibr;
    R13_CRA_Secretion_DyingFibr_k1 = 0.001;
  R14_CRAClipOffHealthyFibr: MMP7 + HealthyFibr => HealthyFibr + MMP7 + CRA; compartment*Rate_Law_for_BAFF_clipoff(R14_CRAClipOffHealthyFibr_k1, HealthyFibr, MMP7);
    R14_CRAClipOffHealthyFibr_k1 = 1e-8;
  R15_DyingFibroblast_death: DyingFibr => ; compartment*R15_DyingFibroblast_death_k1*DyingFibr;
    R15_DyingFibroblast_death_k1 = 0.2;
  R16_Healthy_to_Dying_fibroblast: TNFalpha + HealthyFibr => TNFalpha + DyingFibr; compartment*R16_Healthy_to_Dying_fibroblast_k1*HealthyFibr*TNFalpha;
    R16_Healthy_to_Dying_fibroblast_k1 = 5e-7;
  R17_HealthyBacteriaProduction: HealthyBacteria => 2 HealthyBacteria; compartment*R17_HealthyBacteriaProduction_k1*HealthyBacteria;
    R17_HealthyBacteriaProduction_k1 = 0.01;
  R18_HealthyFibProduction: HealthyFibr + $free_space => 2 HealthyFibr; compartment*R18_HealthyFibProduction_k1*free_space*HealthyFibr;
    R18_HealthyFibProduction_k1 = 4.85e-7;
  R19_MMP7_release_HealthyFibr: HealthyFibr => MMP7 + HealthyFibr; compartment*R19_MMP7_release_HealthyFibr_k1*HealthyFibr;
    R19_MMP7_release_HealthyFibr_k1 = 1;
  R1_CRA_degradation: MMP8 + CRA => MMP8; compartment*R1_CRA_degradation_k1*CRA*MMP8;
    R1_CRA_degradation_k1 = 0.0001;
  R20_MMP8_release_HealthyFibr: HealthyFibr => 100 MMP8 + HealthyFibr; compartment*R20_MMP8_release_HealthyFibr_k1*HealthyFibr;
    R20_MMP8_release_HealthyFibr_k1 = 0.1;
  R21_Healthy_to_Dying_Bacteria: Protease + HealthyBacteria => Protease + DyingBacteria; compartment*R21_Healthy_to_Dying_Bacteria_k1*HealthyBacteria*Protease;
    R21_Healthy_to_Dying_Bacteria_k1 = 0.005;
  R22_CRA_binding: CRA + MastCells_FLC -> MastCells_FLC_CRA; compartment*(R22_CRA_binding_k1*MastCells_FLC*CRA - R22_CRA_binding_k2*MastCells_FLC_CRA);
    R22_CRA_binding_k2 = 0.1; R22_CRA_binding_k1 = 0.1;
  R23_FLC_binding: MastCells + FLC -> MastCells_FLC; compartment*(R23_FLC_binding_k1*FLC*MastCells - R23_FLC_binding_k2*MastCells_FLC);
    R23_FLC_binding_k2 = 0.1; R23_FLC_binding_k1 = 0.1;
  R24_TNFalpha_production: MastCells_FLC_CRA => MastCells_FLC_CRA + TNFalpha; compartment*R24_TNFalpha_production_k1*MastCells_FLC_CRA;
    R24_TNFalpha_production_k1 = 5000;
  R25_Protease_production: MastCells_FLC_CRA => MastCells_FLC_CRA + Protease; compartment*R25_Protease_production_k1*MastCells_FLC_CRA;
    R25_Protease_production_k1 = 65;
  R26_DyingBacteria_secrete_CRA: DyingBacteria => 1000 CRA; compartment*R26_DyingBacteria_secrete_CRA_k1*DyingBacteria;
    R26_DyingBacteria_secrete_CRA_k1 = 10;
  R27_Dyingbacteria_die: DyingBacteria => ; compartment*R27_Dyingbacteria_die_k1*DyingBacteria;
    R27_Dyingbacteria_die_k1 = 0.1;
  R28_Proteaseinflux: => Protease; compartment*Constant_flux__irreversible(k_protease_influx);
  R2_CRA_washout: washout + CRA => washout; compartment*R2_CRA_washout_k1*CRA*washout;
    R2_CRA_washout_k1 = 0.01;
  R3_CRAinflux: => CRA; compartment*Constant_flux__irreversible(k_CRA_influx);
  R4_FLC_washout: washout + FLC => washout; compartment*R4_FLC_washout_k1*FLC*washout;
    R4_FLC_washout_k1 = 0.01;
  R5_MMP7_washout: washout + MMP7 => washout; compartment*R5_MMP7_washout_k1*MMP7*washout;
    R5_MMP7_washout_k1 = 0.01;
  R6_MMP8_washout: washout + MMP8 => washout; compartment*R6_MMP8_washout_k1*MMP8*washout;
    R6_MMP8_washout_k1 = 0.01;
  R7_Protease_washout: washout + Protease => washout; compartment*R7_Protease_washout_k1*Protease*washout;
    R7_Protease_washout_k1 = 0.01;
  R8_TNFalpha_washout: washout + TNFalpha => washout; compartment*R8_TNFalpha_washout_k1*TNFalpha*washout;
    R8_TNFalpha_washout_k1 = 0.01;
  R9_FLC_production: $Bcells + CRA => $Bcells + CRA + FLC; compartment*Rate_Law_for_B_FLC_production(R9_FLC_production_k1, CRA, Bcells);
    R9_FLC_production_k1 = 0.001;

  // Unit definitions:
  unit substance = 1e-15 mole;
  unit time = 60 second;
end
