// SBML level 2 version 3

function function_17(substrate, Km, V)
  V*substrate/(Km + substrate);
end
function_17 is "Henri-Michaelis-Menten (irreversible)";

function Reversible_Michaelis_Menten(substrate, product, Kms, Kmp, Vf, Vr)
  (Vf*substrate/Kms - Vr*product/Kmp)/(1 + substrate/Kms + product/Kmp);
end
Reversible_Michaelis_Menten is "Reversible Michaelis-Menten";

function Rate_Law_for_atp_utilisation(k, atpc, adpc)
  k*atpc/adpc;
end

function function_18(Vmax_v11, BPGA13, KBPGA13_v11, ADPg, KADPg_v11, r_v11, PGA3, KPGA3_v11, ATPg, KATPg_v11)
  Vmax_v11*((BPGA13/KBPGA13_v11*(ADPg/KADPg_v11) - r_v11*(PGA3/KPGA3_v11)*(ATPg/KATPg_v11))/((1 + BPGA13/KBPGA13_v11 + PGA3/KPGA3_v11)*(1 + ADPg/KADPg_v11 + ATPg/KATPg_v11)));
end
function_18 is "Rate Law for phosphoglycerate kinase";

function Rate_Law_for_hexokinase(Vmax_v2, GlucoseInt, KGlcInt_v2, ATPg, KATPg_v2, ADPg, KADPg_v2, Glc6P, KGlc6P_v2)
  Vmax_v2*(GlucoseInt/KGlcInt_v2)*(ATPg/KATPg_v2)/((1 + ATPg/KATPg_v2 + ADPg/KADPg_v2)*(1 + GlucoseInt/KGlcInt_v2 + Glc6P/KGlc6P_v2));
end

function Rate_Law_for_adenylate_kinase(k, atp, amp, keqak, adp)
  k*(atp*amp - keqak*adp*adp);
end

function Rate_Law_for_glucose_transport(Vmax_v1, GlucoseExt, GlucoseInt, KGlc, Alpha_v1)
  Vmax_v1*((GlucoseExt - GlucoseInt)/(KGlc + GlucoseExt + GlucoseInt + Alpha_v1*GlucoseExt*GlucoseInt/KGlc));
end

function Rate_Law_for_aldolase(Vmax_v5, Fru16BP, GAP, DHAPg, Keq_v5, ATPg, ADPg, AMPg, r_v5, KGAP_v5, KGAPi_v5)
  Vmax_v5*(Fru16BP - GAP*DHAPg/Keq_v5)/(0.009*(1 + ATPg/0.68 + ADPg/1.51 + AMPg/3.65) + Fru16BP + GAP*(0.015*(1 + ATPg/0.68 + ADPg/1.51 + AMPg/3.65)/Keq_v5)*(1/r_v5) + DHAPg*(KGAP_v5/Keq_v5)*(1/r_v5) + Fru16BP*GAP/KGAPi_v5 + GAP*DHAPg/Keq_v5*(1/r_v5));
end

function Rate_Law_for_glycerol_kinase(Vmax_v14, Gly3Pg, KGly3Pg_v14, ADPg, KADPg_v14, r_v14, Glycerol, KGlycerol_v14, ATPg, KATPg_v14)
  Vmax_v14*((Gly3Pg/KGly3Pg_v14*(ADPg/KADPg_v14) - r_v14*(Glycerol/KGlycerol_v14)*(ATPg/KATPg_v14))/((1 + Gly3Pg/KGly3Pg_v14 + Glycerol/KGlycerol_v14)*(1 + ADPg/KADPg_v14 + ATPg/KATPg_v14)));
end

function Rate_Law_for_phophofructokinase(Vmax_v4, Ki1Fru16BP_v4, Fru16BP, Fru6P, KFru6P_v4, ATPg, KATPg_v4, Ki2Fru16BP_v4)
  Vmax_v4*(Ki1Fru16BP_v4/(Ki1Fru16BP_v4 + Fru16BP))*(Fru6P/KFru6P_v4)*(ATPg/KATPg_v4)/((1 + Fru6P/KFru6P_v4 + Fru16BP/Ki2Fru16BP_v4)*(1 + ATPg/KATPg_v4));
end

function function_16(Vmax_v8, DHAPg, KDHAPg_v8, NADH, KNADH_v8, r_v8, NAD, KNAD_v8, Gly3Pg, KGly3Pg_v8)
  Vmax_v8*((DHAPg/KDHAPg_v8*(NADH/KNADH_v8) - r_v8*(NAD/KNAD_v8)*(Gly3Pg/KGly3Pg_v8))/((1 + DHAPg/KDHAPg_v8 + Gly3Pg/KGly3Pg_v8)*(1 + NADH/KNADH_v8 + NAD/KNAD_v8)));
end
function_16 is "Rate Law for glycerol3phosphatedehydrogenase";

function Rate_Law_for_pyruvate_kinase(Vmax_v12, PEP, PK_n, ADPc, KADP_v12, ATPc)
  Vmax_v12*(PEP/(0.34*(1 + ATPc/0.57 + ADPc/0.64)))^PK_n*(ADPc/KADP_v12)/((1 + (PEP/(0.34*(1 + ATPc/0.57 + ADPc/0.64)))^PK_n)*(1 + ADPc/KADP_v12));
end

function function_15(Vmax_v7, GAP, KGAP_v7, NAD, KNAD_v7, r_v7, BPGA13, KBPGA13_v7, NADH, KNADH_v7)
  Vmax_v7*((GAP/KGAP_v7*(NAD/KNAD_v7) - r_v7*(BPGA13/KBPGA13_v7)*(NADH/KNADH_v7))/((1 + GAP/KGAP_v7 + BPGA13/KBPGA13_v7)*(1 + NAD/KNAD_v7 + NADH/KNADH_v7)));
end
function_15 is "Rate Law for glyceraldehyde3phosphatedehydrogenase";

model albert1()

  // Compartments:
  compartment cytosol = 1;  // GO:0005829
  compartment glycosome = 1;  // GO:0020015
  compartment extracellular = 1;  // GO:0005576

  // Species:
  species pyruvate in cytosol = 10;  // isVersionOf CHEBI:32816 kegg.compound:C00022 pubchem.substance:3324 3dmet:B00006
  species glucose in glycosome = 0;  // CHEBI:4167 kegg.compound:C00031 pubchem.substance:3587
  species atpg in glycosome = 0.2405019;  // CHEBI:15422 kegg.compound:C00002 pubchem.substance:3304 cas:56-65-5
  species adpg in glycosome = 1.518996;  // CHEBI:16761 kegg.compound:C00008 pubchem.substance:3310 cas:20398-34-9
  species ampg in glycosome = 4.240502;  // CHEBI:16027 kegg.compound:C00020 pubchem.substance:3322 cas:61-19-8
  species glucose6phosphate in glycosome = 0.5;  // CHEBI:4170 kegg.compound:C00668 pubchem.substance:3937
  species fructose6phosphate in glycosome = 0.5;  // CHEBI:16084 kegg.compound:C05345 pubchem.substance:7723
  species fructose16bisphosphate in glycosome = 10;  // CHEBI:28013 kegg.compound:C05378 pubchem.substance:7752
  species dihydroxyacetonephosphate in glycosome = 8.479115;  // CHEBI:16108 kegg.compound:C00111 pubchem.substance:3411 3dmet:B00029
  species glyceraldehyde3phosphate in glycosome = 2.5;  // CHEBI:29052 kegg.compound:C00118 pubchem.substance:3418 cas:591-57-1
  species nad in glycosome = 2;  // CHEBI:15846 kegg.compound:C00003 pubchem.substance:3305 cas:53-84-9
  species adpc in cytosol = 1.316523;  // CHEBI:16761 kegg.compound:C00008 pubchem.substance:3310 cas:20398-34-9
  species nadh in glycosome = 2;  // CHEBI:16908 kegg.compound:C00004 pubchem.substance:3306
  species bisphosphoglycerate in glycosome = 0.5;  // CHEBI:16001 kegg.compound:C00236 pubchem.substance:3535 cas:38168-82-0
  species glycerol3phosphate in glycosome = 10.52089;  // CHEBI:15978 kegg.compound:C00093 pubchem.substance:3393 cas:57-03-4
  species _3phosphoglycerate in glycosome = 0;  // CHEBI:17794 kegg.compound:C00197 pubchem.substance:3497
  species glycerol in glycosome = 0;  // CHEBI:17754 kegg.compound:C00116 pubchem.substance:3416 3dmet:B00032
  species $glucose_external in extracellular = 5;  // CHEBI:4167 kegg.compound:C00031
  species $pyruvate_external in extracellular = 0;  // isVersionOf CHEBI:32816 kegg.compound:C00022 pubchem.substance:3324 3dmet:B00006
  species $glycerol_external in extracellular = 0;  // CHEBI:17754 kegg.compound:C00116 pubchem.substance:3416 3dmet:B00032
  species atpc in cytosol = 0.3417386;  // CHEBI:15422 kegg.compound:C00002 pubchem.substance:3304 cas:56-65-5
  species phosphoenolpyruvate in cytosol = 0;  // kegg.compound:C00074 pubchem.substance:3374 3dmet:B00019 cas:138-08-9
  species _2phosphoglycerate in cytosol = 0;  // CHEBI:17835 kegg.compound:C00631 pubchem.substance:3904
  species ampc in cytosol = 2.241739;  // CHEBI:16027 kegg.compound:C00020 pubchem.substance:3322 cas:61-19-8
  species _3phosphoglycerate_cytosol in cytosol = 0;  // CHEBI:16108 CHEBI:17794 kegg.compound:C00197 pubchem.substance:3497
  species species_8 in cytosol = 2.231346; species_8 is "dihydroxyacetonephosphate cytosol";  // CHEBI:16108 kegg.compound:C00111 pubchem.substance:3411 3dmet:B00029
  species glycerol3phosphate_cytosol in cytosol = 2.768654;  // CHEBI:15978 kegg.compound:C00093 pubchem.substance:3393 cas:57-03-4

  // Parameters:
  RaENO = 1;
  RaHXK = 1;
  RaPFK = 1;
  RaPGAM = 1;
  RaPYK = 1;

  // Reactions:
  vAKc: atpc + ampc -> 2 adpc; cytosol*Rate_Law_for_adenylate_kinase(vAKc_k, atpc, ampc, vAKc_keqak, adpc); vAKc is "adenylate kinase cytosol";  // kegg.reaction:R00127 ec-code:2.7.4.3 GO:0004017 reactome:REACT_643
    vAKc_k = 1000000; vAKc_keqak = 0.442;
  vAKg: atpg + ampg -> 2 adpg; glycosome*Rate_Law_for_adenylate_kinase(vAKg_k, atpg, ampg, vAKg_keqak, adpg); vAKg is "adenylate kinase glycosome";  // kegg.reaction:R00127 ec-code:2.7.4.3 GO:0004017 reactome:REACT_643
    vAKg_k = 1000000; vAKg_keqak = 0.442;
  vALD: fructose16bisphosphate -> dihydroxyacetonephosphate + glyceraldehyde3phosphate; glycosome*Rate_Law_for_aldolase(Vmax_v5, fructose16bisphosphate, glyceraldehyde3phosphate, dihydroxyacetonephosphate, Keq_v5, atpg, adpg, ampg, r_v5, KGAP_v5, KGAPi_v5); vALD is "aldolase";  // modifiers: atpg, adpg, ampg; isHomologTo reactome:REACT_1602 ec-code:4.1.2.13 GO:0004332 kegg.reaction:R01070
    Vmax_v5 = 560; Keq_v5 = 0.069; r_v5 = 1.19; KGAP_v5 = 0.067; KGAPi_v5 = 0.098;
  vANTI: glycerol3phosphate + species_8 -> glycerol3phosphate_cytosol + dihydroxyacetonephosphate; vANTI_k1*glycerol3phosphate*species_8 - vANTI_k2*glycerol3phosphate_cytosol*dihydroxyacetonephosphate; vANTI is "gly3p dhap antiporter";  // isVersionOf GO:0015169
    vANTI_k1 = 1000000; vANTI_k2 = 1000000;
  vAU: atpc => adpc; cytosol*Rate_Law_for_atp_utilisation(vAU_k, atpc, adpc); vAU is "atp utilisation";  // isVersionOf GO:0006200
    vAU_k = 50;
  vENO: _2phosphoglycerate -> phosphoenolpyruvate; RaENO*cytosol*Reversible_Michaelis_Menten(_2phosphoglycerate, phosphoenolpyruvate, vENO_Kms, vENO_Kmp, vENO_Vf, vENO_Vr); vENO is "enolase";  // kegg.reaction:R00658 ec-code:4.2.1.11 GO:0004634 reactome:REACT_1400
    vENO_Kms = 0.054; vENO_Kmp = 0.24; vENO_Vf = 598; vENO_Vr = 394.68;
  vGAPDH: glyceraldehyde3phosphate + nad -> bisphosphoglycerate + nadh; glycosome*function_15(Vmax_v7, glyceraldehyde3phosphate, KGAP_v7, nad, KNAD_v7, r_v7, bisphosphoglycerate, KBPGA13_v7, nadh, KNADH_v7); vGAPDH is "glyceraldehyde3phosphatedehydrogenase";  // isHomologTo reactome:REACT_1847 ec-code:1.2.1.12 GO:0043878 kegg.reaction:R01061
    Vmax_v7 = 720.9; KGAP_v7 = 0.15; KNAD_v7 = 0.45; r_v7 = 0.67; KBPGA13_v7 = 0.1; KNADH_v7 = 0.02;
  vGK: glycerol3phosphate + adpg -> glycerol + atpg; glycosome*Rate_Law_for_glycerol_kinase(Vmax_v14, glycerol3phosphate, KGly3Pg_v14, adpg, KADPg_v14, r_v14, glycerol, KGlycerol_v14, atpg, KATPg_v14); vGK is "glycerol kinase";  // isVersionOf ec-code:2.7.1.30 GO:0004370 kegg.reaction:R00847 reactome:REACT_724
    Vmax_v14 = 200; KGly3Pg_v14 = 3.83; KADPg_v14 = 0.56; r_v14 = 60.86; KGlycerol_v14 = 0.44; KATPg_v14 = 0.24;
  vGPDH: dihydroxyacetonephosphate + nadh -> nad + glycerol3phosphate; glycosome*function_16(Vmax_v8, dihydroxyacetonephosphate, KDHAPg_v8, nadh, KNADH_v8, r_v8, nad, KNAD_v8, glycerol3phosphate, KGly3Pg_v8); vGPDH is "glycerol3phosphatedehydrogenase";  // isHomologTo reactome:REACT_1146 ec-code:3.1.3.21 GO:0004367 kegg.reaction:R00841
    Vmax_v8 = 465; KDHAPg_v8 = 0.1; KNADH_v8 = 0.01; r_v8 = 0.28; KNAD_v8 = 0.4; KGly3Pg_v8 = 2;
  vGPO: glycerol3phosphate_cytosol => species_8; cytosol*function_17(glycerol3phosphate_cytosol, vGPO_Km, vGPO_V); vGPO is "glycerol3phosphate oxidase";  // isVersionOf ec-code:1.1.3.21 GO:0004369 kegg.reaction:R00846
    vGPO_Km = 1.7; vGPO_V = 368;
  vGT: $glucose_external -> glucose; Rate_Law_for_glucose_transport(Vmax_v1, glucose_external, glucose, KGlc, Alpha_v1); vGT is "glucose transport";  // isHomologTo reactome:REACT_2092 GO:0046323
    Vmax_v1 = 108.9; KGlc = 1; Alpha_v1 = 0.75;
  vGlyT: glycerol -> $glycerol_external; vGlyT_k1*glycerol - vGlyT_k2*glycerol_external; vGlyT is "glycerol transport";  // isVersionOf GO:0015793
    vGlyT_k1 = 1000000; vGlyT_k2 = 1000000;
  vHK: glucose + atpg -> glucose6phosphate + adpg; RaHXK*glycosome*Rate_Law_for_hexokinase(Vmax_v2, glucose, KGlcInt_v2, atpg, KATPg_v2, adpg, KADPg_v2, glucose6phosphate, KGlc6P_v2); vHK is "hexokinase";  // isHomologTo reactome:REACT_1318 ec-code:2.7.1.2 GO:0004396 kegg.reaction:R00299
    KATPg_v2 = 0.116; Vmax_v2 = 1929; KGlcInt_v2 = 0.1; KADPg_v2 = 0.126; KGlc6P_v2 = 12;
  vPFK: fructose6phosphate + atpg -> fructose16bisphosphate + adpg; RaPFK*glycosome*Rate_Law_for_phophofructokinase(Vmax_v4, Ki1Fru16BP_v4, fructose16bisphosphate, fructose6phosphate, KFru6P_v4, atpg, KATPg_v4, Ki2Fru16BP_v4); vPFK is "phophofructokinase";  // isHomologTo reactome:REACT_736 ec-code:2.7.1.11 GO:0003872 kegg.reaction:R00756
    Vmax_v4 = 1708; Ki1Fru16BP_v4 = 15.8; KFru6P_v4 = 0.82; KATPg_v4 = 0.026; Ki2Fru16BP_v4 = 10.7;
  vPGI: glucose6phosphate -> fructose6phosphate; glycosome*Reversible_Michaelis_Menten(glucose6phosphate, fructose6phosphate, vPGI_Kms, vPGI_Kmp, vPGI_Vf, vPGI_Vr); vPGI is "phosphoglycerate isomerase";  // isHomologTo reactome:REACT_1164 ec-code:5.3.1.9 GO:0004347 kegg.reaction:R00771
    vPGI_Kms = 0.4; vPGI_Kmp = 0.12; vPGI_Vf = 1305; vPGI_Vr = 1305;
  vPGK: bisphosphoglycerate + adpg -> _3phosphoglycerate + atpg; glycosome*function_18(Vmax_v11, bisphosphoglycerate, KBPGA13_v11, adpg, KADPg_v11, r_v11, _3phosphoglycerate, KPGA3_v11, atpg, KATPg_v11); vPGK is "phosphoglycerate kinase";  // isHomologTo reactome:REACT_1186 ec-code:2.7.2.3 GO:0004618 kegg.reaction:R01512
    Vmax_v11 = 2862; KBPGA13_v11 = 0.003; KADPg_v11 = 0.1; r_v11 = 0.47; KPGA3_v11 = 1.62; KATPg_v11 = 0.29;
  vPGM: _3phosphoglycerate_cytosol -> _2phosphoglycerate; RaPGAM*cytosol*Reversible_Michaelis_Menten(_3phosphoglycerate_cytosol, _2phosphoglycerate, vPGM_Kms, vPGM_Kmp, vPGM_Vf, vPGM_Vr); vPGM is "phosphoglycerate mutase";  // kegg.reaction:R01518 ec-code:5.4.2.1 GO:0004619 reactome:REACT_576
    vPGM_Kms = 0.27; vPGM_Kmp = 0.11; vPGM_Vf = 225; vPGM_Vr = 495;
  vPGT: _3phosphoglycerate -> _3phosphoglycerate_cytosol; vPGT_k1*_3phosphoglycerate - vPGT_k2*_3phosphoglycerate_cytosol; vPGT is "3phosphoglycerate transport";  // isVersionOf GO:0015120
    vPGT_k1 = 1000000; vPGT_k2 = 1000000;
  vPK: phosphoenolpyruvate + adpc -> pyruvate + atpc; RaPYK*cytosol*Rate_Law_for_pyruvate_kinase(Vmax_v12, phosphoenolpyruvate, PK_n, adpc, KADP_v12, atpc); vPK is "pyruvate kinase";  // isHomologTo reactome:REACT_1911 ec-code:2.7.1.40 GO:0004743 kegg.reaction:R00200
    Vmax_v12 = 1020; PK_n = 2.5; KADP_v12 = 0.114;
  vPT: pyruvate => $pyruvate_external; function_17(pyruvate, vPT_Km, vPT_V); vPT is "pyruvate transport";  // isVersionOf GO:0050833 GO:0006849
    vPT_Km = 1.96; vPT_V = 200;
  vTPI: dihydroxyacetonephosphate -> glyceraldehyde3phosphate; glycosome*Reversible_Michaelis_Menten(dihydroxyacetonephosphate, glyceraldehyde3phosphate, vTPI_Kms, vTPI_Kmp, vTPI_Vf, vTPI_Vr); vTPI is "triosephosphate isomerase";  // isHomologTo reactome:REACT_775 ec-code:5.3.1.1 GO:0004807 kegg.reaction:R01015
    vTPI_Kms = 1.2; vTPI_Kmp = 0.25; vTPI_Vf = 999.3; vTPI_Vr = 5696.01;

  // Unit definitions:
  unit time = second;
  unit substance = 1e-3 mole;
  unit volume = 1e-3 litre;
end
