// SBML level 3 version 1

model anderson1()

  // Compartments:
  compartment default = 1;  // 0-D

  // Species:
  species S in default = 1; S is "Merozoites";
  species T in default = 0.0001; T is "T-lymphocytes";
  species X in default = 120; X is "RBC";
  species Xy in default; Xy is "Erythrocyte abundance";
  species Y in default = 0; Y is "iRBC";
  species Yi in default; Yi is "porportion of infected rbc";

  // Parameters:
  a = 0.05;
  alfa = 0.2;
  beta = 0.1;
  d = 72;
  g = 0.05;
  gamma = 1;
  h = 0.1;
  k = 0.05;
  lambda = 1;
  mu = 0.00833;
  r = 16;

  // Assignment rules:
  Xy := X + Y;
  Yi := Y/(X + Y);

  // Reactions:
  v1: -> X; lambda;
  v10: Y -> ; g*Y*T;  // modifiers: T
  v11: -> T; k*Y*T;  // modifiers: Y
  v2: X -> ; mu*X;
  v3: S + X -> Y; beta*X*S;
  v4: Y -> ; alfa*Y;
  v5: -> S; alfa*r*Y;  // modifiers: Y
  v6: S -> ; d*S;
  v7: S -> ; h*S*T;  // modifiers: T
  v8: -> T; gamma*S*T;  // modifiers: S
  v9: T -> ; a*T;
end
