// SBML level 2 version 4

function oxygenation(phi, Vc, Vj, Vp)
  phi*((Vc + Vj - abs(Vc - Vj))/2 + Vp - abs((Vc + Vj - abs(Vc - Vj))/2 - Vp))/2;
end
oxygenation is "Oxygenation";

function PGA_consumption(S1, Rp, R, Nt, Vc)
  S1/Rp*(R/Nt)*Vc;
end

function NADPH_production(j, S1, Nt)
  j/2*(S1/Nt);
end

function carboxylation(Vc, Vj, Vp)
  ((Vc + Vj - abs(Vc - Vj))/2 + Vp - abs((Vc + Vj - abs(Vc - Vj))/2 - Vp))/2;
end
carboxylation is "Carboxylation";

model arnold4()

  // Compartments:
  compartment chloroplast = 1;

  // Species:
  // [Pa]
  species $CO2 in chloroplast = 24.5;  // isVersionOf CHEBI:16526
  species $NADP in chloroplast;  // isVersionOf CHEBI:25523
  species NADPH in chloroplast = 0.21;  // isVersionOf CHEBI:16474
  // [kPa]
  species $O2 in chloroplast = 21;  // isVersionOf CHEBI:15379
  species PGA in chloroplast = 2.4;  // isVersionOf CHEBI:17050
  species $RuBP in chloroplast = 2;  // isVersionOf CHEBI:16710

  // Parameters:
  Gamma = 3.741169;
  // converted into [mM] using Winter et al. (1994) subcellular stroma volume, BioNumbers (ID: 105594)
  J = 0.03076782;
  Kc = 27.23721;
  Ko = 16.57884;
  Nt = 0.5;
  // converted into [mM] using Winter et al. (1994) subcellular stroma volume, BioNumbers (ID: 105594)
  Rd = 0.03076749;
  Rp = 3.2;
  // converted into [mM] using Winter et al. (1994) subcellular stroma volume, BioNumbers (ID: 105594)
  TPU = 0.03075851;
  // converted into [mM] using Winter et al. (1994) subcellular stroma volume, BioNumbers (ID: 105594)
  Vcmax = 0.03076026;
  // converted into [mM] using Winter et al. (1994) subcellular stroma volume, BioNumbers (ID: 105594)
  gm = 0.03077408;

  // Assignment rules:
  phi := 0.21*(gm*O2/Ko)/((gm*CO2 - v_c + Rd)/Kc);
  v_c := (abs((abs(Vc + Vj) - abs(Vc - Vj))/2 + Vp) - abs((abs(Vc + Vj) - abs(Vc - Vj))/2 - Vp))/2;
  Vc := Vcmax*(CO2 - 1/2*(CO2 + Kc*(1 + O2/Ko) + (Vcmax - Rd)/gm - sqrt((CO2 + Kc*(1 + O2/Ko) + (Vcmax - Rd)/gm)^2 + 4/gm*(Rd*(CO2 + Kc*(1 + O2/Ko)) + Vcmax*(Gamma - CO2)))))/(CO2 - 1/2*(CO2 + Kc*(1 + O2/Ko) + (Vcmax - Rd)/gm - sqrt((CO2 + Kc*(1 + O2/Ko) + (Vcmax - Rd)/gm)^2 + 4/gm*(Rd*(CO2 + Kc*(1 + O2/Ko)) + Vcmax*(Gamma - CO2)))) + Kc*(1 + O2/Ko));
  Vp := 3*TPU*((CO2 - (3*TPU - Rd)/gm)/(CO2 - (3*TPU - Rd)/gm - Gamma));
  NADP := Nt - NADPH;
  Vj := J/4*(CO2 - 1/2*(CO2 + 2*Gamma + (J - 4*Rd)/(4*gm) - sqrt((CO2 + 2*Gamma + (J - 4*Rd)/(4*gm))^2 + 4/gm*(Rd*(CO2 + 2*Gamma) + J/4*(Gamma - CO2)))))/(CO2 - 1/2*(CO2 + 2*Gamma + (J - 4*Rd)/(4*gm) - sqrt((CO2 + 2*Gamma + (J - 4*Rd)/(4*gm))^2 + 4/gm*(Rd*(CO2 + 2*Gamma) + J/4*(Gamma - CO2)))) + 2*Gamma);

  // Reactions:
  NADPH_prod: $NADP => NADPH; chloroplast*NADPH_production(J, NADP, Nt); NADPH_prod is "NADPH production";
  PGA_cons: PGA => $RuBP; chloroplast*PGA_consumption(PGA, Rp, NADPH, Nt, Vcmax); PGA_cons is "PGA consumption";  // modifiers: NADPH
  PGA_prod_Vc: $RuBP + $CO2 + 2 NADPH => 2 PGA; chloroplast*carboxylation(Vc, Vj, Vp); PGA_prod_Vc is "PGA production - v_c";  // modifiers: O2
  PGA_prod_Vo: $RuBP + $O2 + 2 NADPH => 1.5 PGA; chloroplast*oxygenation(phi, Vc, Vj, Vp); PGA_prod_Vo is "PGA production - v_o";  // modifiers: CO2

  // Unit definitions:
  unit substance = 1e-3 mole;
end
