// SBML level 2 version 4

function TP_translocator(S1, S2, P1, P2, K2, K1, Vm)
  Vm*(S1*S2 - P1*P2)/((S1 + P1)*K2 + (S2 + P2)*K1 + K1*K2*(S1/K1 + P2/K2)*(S2/K2 + P1/K1));
end

function MM_s2_reg_ATP_synthesis(Vm, s1, s2, K1, K2)
  Vm*s1*s2/((s1 + K1)*(s2 + K2));
end
MM_s2_reg_ATP_synthesis is "MM s2 - reg (ATP synthesis)";

function RuBP_regeneration(Vm, S1, S2, K1, K2, K3, R)
  Vm*S1*S2/(K1*K2 + K2*S2 + S1*S2 + K3*R);
end

function MM_s1_reg_TP_reduction(Vm, S, K)
  Vm*S/(S + K);
end
MM_s1_reg_TP_reduction is "MM s1 - reg (TP reduction)";

function High_Substrate_MM_RuBisCO(k, E, S, K)
  k/2*(E + S + K - sqrt((E + S + K)^2 - 4*E*S));
end
High_Substrate_MM_RuBisCO is "High Substrate MM - RuBisCO";

function PGA_reduction(Vm, S1, S2, P1, P2, P3, k, K1, K2)
  Vm*(S1*S2 - P1*P2*P3/k)/(K1 + S1*S2*K1/K2 + P1*P2*P3/k);
end

model arnold8()

  // Compartments:
  compartment chloroplast = 1;
  compartment cytosol = 1;

  // Species:
  species ADP in chloroplast = 0.82;  // CHEBI:16761
  species ATP in chloroplast = 0.68;  // isVersionOf CHEBI:15422
  species $E_RuBisCO in chloroplast = 3.56; E_RuBisCO is "RuBisCo";  // isVersionOf interpro:IPR020871
  species PGA in chloroplast = 2.4;  // isVersionOf CHEBI:17050
  species Pi in chloroplast = 5;  // isVersionOf CHEBI:43474
  species $Pic in cytosol = 1.4;  // isVersionOf CHEBI:43474
  species Ru5P in chloroplast = 0.05007474;  // isVersionOf CHEBI:17363
  species RuBP in chloroplast = 2;  // isVersionOf CHEBI:16710
  species TP in chloroplast = 0.5;  // isVersionOf pubchem.compound:24794350
  species $TPc in cytosol = 0.2;  // isVersionOf pubchem.compound:24794350
  species $totRuBP in chloroplast;

  // Parameters:
  P_0 = 16;
  V6 = 5.880129;

  // Assignment rules:
  totRuBP := 1/2*(P_0 - (PGA + TP + Ru5P + Pi + ATP));

  // Reactions:
  ATP_S: ADP + Pi => ATP; chloroplast*MM_s2_reg_ATP_synthesis(V6, ADP, Pi, ATP_S_K1, ATP_S_K2); ATP_S is "ATP synthesis";
    ATP_S_K1 = 0.08; ATP_S_K2 = 0.5;
  PGA_red: PGA + ATP -> ADP + TP + Pi; chloroplast*PGA_reduction(PGA_red_Vm, PGA, ATP, ADP, TP, Pi, PGA_red_k, PGA_red_K1, PGA_red_K2); PGA_red is "PGA reduction";
    PGA_red_Vm = 3.49; PGA_red_k = 14; PGA_red_K1 = 1; PGA_red_K2 = 1;
  RuBP_reg: Ru5P + ATP => RuBP + ADP; chloroplast*RuBP_regeneration(RuBP_reg_Vm, Ru5P, ATP, RuBP_reg_K1, RuBP_reg_K2, K3, Pi); RuBP_reg is "RuBP regeneration";  // modifiers: Pi
    RuBP_reg_Vm = 4.81; RuBP_reg_K1 = 0.05; RuBP_reg_K2 = 0.5; K3 = 0.05;
  RuBisCO: $totRuBP + RuBP => 2 PGA; chloroplast*High_Substrate_MM_RuBisCO(RuBisCO_k, E_RuBisCO, totRuBP, RuBisCO_K);  // modifiers: E_RuBisCO
    RuBisCO_k = 0.504; RuBisCO_K = 0.04;
  TPT: TP + $Pic -> $TPc + Pi; TP_translocator(TP, Pic, TPc, Pi, TPT_K2, TPT_K1, TPT_Vm); TPT is "TP translocator";
    TPT_K2 = 0.25; TPT_K1 = 0.08; TPT_Vm = 3.3;
  TP_red: 5 TP => 3 Ru5P + 2 Pi; chloroplast*MM_s1_reg_TP_reduction(TP_red_Vm, TP, TP_red_K); TP_red is "TP reduction";
    TP_red_Vm = 1.06; TP_red_K = 0.4;

  // Unit definitions:
  unit volume = litre;
  unit substance = 1e-3 mole;
end
