// SBML level 3 version 1

function Michaelis(M1, J1, k1, S1)
  k1*S1*M1/(J1 + S1);
end

function GK(a, b, c, d)
  2*a*d/(b - a + b*c + a*d + sqrt((b - a + b*c + a*d)^2 - 4*a*d*(b - a)));
end

model attila()

  // Compartments:
  compartment default_compartment = 1;

  // Species:
  species APCP in default_compartment = 0.07591403;
  species BCKI in default_compartment = 0.6794492;
  species CKI in default_compartment = 0.0288207;
  species Cdc20A in default_compartment = 0.3572724;
  species Cdc20in in default_compartment = 0.7702388;
  species Cdh1 in default_compartment = 0.7189394;
  species CycA in default_compartment = 0.09450308;
  species CycB in default_compartment = 0.1903586;
  species CycE in default_compartment = 0.2092024;
  species Mass in default_compartment = 1.338268;
  species TriA in default_compartment = 0.3492224;
  species TriE in default_compartment = 0;
  species pB in default_compartment = 0.01234426;
  species pBCKI in default_compartment = 0.04795938;
  species $sink in default_compartment = 1;
  species $source in default_compartment = 1;

  // Parameters:
  CycD0 = 0.108;
  J20 = 10;
  Ja20 = 1;
  Ja25 = 0.1;
  Jafb = 0.1;
  Jafi = 1;
  Jah1 = 0.03;
  Jaie = 0.1;
  Jatf = 0.01;
  Jawee = 0.05;
  Ji20 = 1;
  Ji25 = 0.1;
  Jifb = 0.1;
  Jifi = 2;
  Jih1 = 0.03;
  Jiie = 0.1;
  Jitf = 0.01;
  Jiwee = 0.05;
  KEZ = 0.2;
  MaxMass = 10000;
  k14di = 12;
  k25p = 0.01;
  k25pp = 5;
  ka20 = 1;
  ka25p = 0;
  ka25pp = 1;
  kafb = 1;
  kafi = 6;
  kah1p = 0.02;
  kah1pp = 0.8;
  kaie = 0.1;
  kassa = 50;
  kassb = 60;
  kasse = 0;
  katfapp = 1.5;
  katfdpp = 3;
  katfepp = 0.38;
  katfp = 0;
  kaweep = 0.3;
  kaweepp = 0;
  kd20 = 0.05;
  kdap = 0.01;
  kdapp = 0.16;
  kdappp = 0;
  kdbcpp = 0.15;
  kdbhpp = 0.4;
  kdbp = 0.003;
  kdeapp = 0;
  kdebpp = 0;
  kdeepp = 0;
  kdep = 0.12;
  kdiapp = 0.1;
  kdibpp = 0.8;
  kdidpp = 0.1;
  kdiepp = 0.12;
  kdip = 0.002;
  kdissa = 0.06;
  kdissb = 0.05;
  kdisse = 0;
  ki20 = 0.16;
  ki25p = 0.3;
  ki25pp = 0;
  kifb = 0.15;
  kifibpp = 0.05;
  kifip = 0.008;
  kih1app = 0.35;
  kih1bpp = 0.1;
  kih1dpp = 0.005;
  kih1epp = 0.06;
  kih1p = 0.001;
  kiie = 0.15;
  kitfapp = 0;
  kitfbpp = 8;
  kitfp = 0.75;
  kiweep = 0;
  kiweepp = 1;
  ks20p = 0.001;
  ks20pp = 1;
  ksap = 0.0015;
  ksapp = 0.01;
  ksbp = 0.004;
  ksbpp = 0.04;
  ksep = 0;
  ksepp = 0.15;
  ksip = 0.018;
  ksipp = 0.18;
  kweep = 0.02;
  kweepp = 0.2;
  mu = 0.005776;
  n20 = 1;

  // Assignment rules:
  Cdc25 := GK(ka25p + ka25pp*CycB, ki25p + ki25pp*Cdc14, Ja25, Ji25);
  Vatf := katfp + katfapp*CycA + katfepp*CycE + katfdpp*CycD;
  Vah1 := kah1p + kah1pp*Cdc14;
  Vsi := ksip + ksipp*TFI;
  Cdc14 := Cdc20A;
  CycD := CycD0*Mass;
  TFI := GK(kafi*Cdc14, kifip + kifibpp*CycB, Jafi, Jifi);
  Vdi := (kdip + kdiapp*CycA + kdibpp*CycB + kdiepp*CycE + kdidpp*CycD)/(1 + k14di*Cdc14);
  Vwee := kweep + kweepp*Wee1;
  Vse := (ksep + ksepp*TFE)*Mass;
  Vda := kdap + (kdapp + kdappp)*Cdc20A + kdappp*Cdc20in;
  V25 := k25p + k25pp*Cdc25;
  Vsa := (ksap + ksapp*TFE)*Mass;
  TFE := GK(Vatf, Vitf, Jatf, Jitf);
  TFB := GK(kafb*CycB, kifb, Jafb, Jifb);
  Vsb := (ksbp + ksbpp*TFB)*Mass;
  Vih1 := kih1p + kih1app*CycA + kih1bpp*CycB + kih1epp*CycE + kih1dpp*CycD;
  Vitf := kitfp + kitfapp*CycA + kitfbpp*CycB;
  Vdb := kdbp + kdbhpp*Cdh1 + kdbcpp*Cdc20A;
  Vde := kdep + kdeepp*CycE + kdeapp*CycA + kdebpp*CycB;
  Wee1 := GK(kaweep + kaweepp*Cdc14, kiweep + kiweepp*CycB, Jawee, Jiwee);

  // Reactions:
  v_1: $source -> Mass; mu*Mass*(1 - Mass/MaxMass);
  v_10: pBCKI -> pB + CKI; kdissb*pBCKI;
  v_11: pBCKI -> BCKI; V25*pBCKI;
  v_12: BCKI -> pBCKI; Vwee*BCKI;
  v_13: BCKI -> CKI; Vdb*BCKI;
  v_14: BCKI -> CycB; Vdi*BCKI;
  v_15: pBCKI -> CKI; Vdb*pBCKI;
  v_16: pBCKI -> pB; Vdi*pBCKI;
  v_17: $source -> CKI; Vsi;
  v_18: CKI -> $sink; Vdi*CKI;
  v_19: CKI + CycA -> TriA; kassa*CKI*CycA;
  v_2: $source -> CycB; Vsb;
  v_20: TriA -> CKI + CycA; kdissa*TriA;
  v_21: TriA -> CycA; Vdi*TriA;
  v_22: TriA -> CKI; Vda*TriA;
  v_23: CKI + CycE -> TriE; kasse*CKI*CycE;
  v_24: TriE -> CKI + CycE; kdisse*TriE;
  v_25: TriE -> CycE; Vdi*TriE;
  v_26: TriE -> CKI; Vde*TriE;
  v_27: $source -> CycA; Vsa;
  v_28: CycA -> $sink; Vda*CycA;
  v_29: $source -> CycE; Vse;
  v_3: CycB -> $sink; Vdb*CycB;
  v_30: CycE -> $sink; Vde*CycE;
  v_31: $source -> APCP; Michaelis(CycB, Jaie, kaie, 1 - APCP);  // modifiers: CycB
  v_32: APCP -> $sink; Michaelis(1, Jiie, kiie, APCP);
  v_33: $source -> Cdc20in; ks20p + ks20pp*CycB^n20/(J20^n20 + CycB^n20);  // modifiers: CycB
  v_34: Cdc20in -> $sink; kd20*Cdc20in;
  v_35: Cdc20in -> Cdc20A; Michaelis(APCP, Ja20, ka20, Cdc20in);  // modifiers: APCP
  v_36: Cdc20A -> Cdc20in; Michaelis(1, Ji20, ki20, Cdc20A);
  v_37: Cdc20A -> $sink; kd20*Cdc20A;
  v_38: $source -> Cdh1; Michaelis(Vah1, Jah1, 1, 1 - Cdh1);
  v_39: Cdh1 -> $sink; Michaelis(Vih1, Jih1, 1, Cdh1);
  v_4: pB -> CycB; V25*pB;
  v_5: CycB -> pB; Vwee*CycB;
  v_6: CycB + CKI -> BCKI; kassb*CycB*CKI;
  v_7: BCKI -> CycB + CKI; kdissb*BCKI;
  v_8: pB -> $sink; Vdb*pB;
  v_9: pB + CKI -> pBCKI; kassb*pB*CKI;
end
