// SBML level 3 version 1

model bali()

  // Compartments:
  compartment default_compartment = 1;

  // Species:
  species ADP in default_compartment = 0.19704;  // CHEBI:16761 kegg.compound:C00008
  species AMP in default_compartment = 0.05534;  // CHEBI:16027 kegg.compound:C00020
  species ATP in default_compartment = 0.15312;  // CHEBI:15422 kegg.compound:C00002
  species DHAP in default_compartment = 0.09614;  // kegg.compound:C00111 CHEBI:16108
  species F6P in default_compartment = 0.02251;  // CHEBI:15946 kegg.compound:C00085
  species FBP in default_compartment = 0.00511;  // kegg.compound:C00354 CHEBI:16905
  species G6P in default_compartment = 0.05102;  // kegg.compound:C00092 CHEBI:4170
  species GAP in default_compartment = 0.00489;  // kegg.compound:C00118 CHEBI:29052
  species $GLU in default_compartment = 1;  // kegg.compound:C00293 CHEBI:17234
  species $LAC in default_compartment = 1.1;  // kegg.compound:C01432
  species Mg in default_compartment = 0.754;  // kegg.compound:C00305 CHEBI:18420
  species MgADP in default_compartment = 0.18343;
  species MgAMP in default_compartment = 0.00188;
  species MgATP in default_compartment = 1.4254;
  species $NAD in default_compartment = 0.0886;  // kegg.compound:C00003 CHEBI:15846
  species $NADH in default_compartment = 0.0004;  // kegg.compound:C00004 CHEBI:16908
  species PEP in default_compartment = 0.0076;  // kegg.compound:C00074 CHEBI:44897
  species PG13 in default_compartment = 0.000581;  // kegg.compound:C00236 CHEBI:16001
  species PG2 in default_compartment = 0.00793;  // kegg.compound:C00631 CHEBI:17835
  species PG23 in default_compartment = 4.676;  // kegg.compound:C01159 CHEBI:17720
  species PG3 in default_compartment = 0.16473;  // kegg.compound:C00197 CHEBI:17794
  species PYR in default_compartment = 0.01435;  // kegg.compound:C00022 CHEBI:32816
  species $Phi in default_compartment = 0.5;

  // Parameters:
  KAKADP = 0.11;
  KAKAMP = 0.08;
  KAKATP = 0.09;
  KENOPEP = 1;
  KENOPG2 = 1;
  KGPDHGAP = 0.005;
  KGPDHNAD = 0.05;
  KGPDHNADH = 0.0083;
  KGPDHPG13 = 0.0035;
  KGPDHPhi = 3.9;
  KHKG6P = 0.0045;
  KHKMg = 1.03;
  KHKMgATP = 1.44;
  KHKMgATPMg = 1.14;
  KHKMgPG23 = 2.44;
  KHKPG23 = 2.7;
  KPFKAMP = 0.033;
  KPFKATP = 0.01;
  KPFKF6P = 0.1;
  KPFKMg = 0.44;
  KPFKMgATP = 0.069;
  KPGIF6P = 0.071;
  KPGIG6P = 0.182;
  KPGKMgADP = 0.35;
  KPGKMgATP = 0.48;
  KPGKPG13 = 0.002;
  KPGKPG3 = 1.2;
  KPGLMPG2 = 1;
  KPGLMPG3 = 5;
  KPGMPG23 = 0.04;
  KPGP23 = 0.2;
  KPKATP = 3.39;
  KPKFBP = 0.005;
  KPKMgADP = 0.474;
  KPKPEP = 0.225;
  KTPIDHAP = 0.838;
  KTPIGAP = 0.428;
  KeqAK = 0.4582;
  KeqALD = 0.114;
  KeqENO = 1.2;
  KeqGPDH = 0.00109;
  KeqHK = 10433;
  KeqLDH = 16979;
  KeqMgADPdiss = 0.81;
  KeqMgAMPdiss = 22.2;
  KeqMgATPdiss = 0.081;
  KeqPFK = 1075;
  KeqPGI = 0.444;
  KeqPGK = 2232;
  KeqPGLM = 0.05;
  KeqPGM23 = 100000;
  KeqPGP23 = 100000;
  KeqPK = 3349;
  KeqTPI = 0.051;
  KiALDGAP = 0.0572;
  KiiALDGAP = 0.176;
  KmALDDHAP = 0.0364;
  KmALDFBP = 0.0071;
  KmALDGAP = 0.1906;
  L0PFK = 0.001072;
  L0PK = 19;
  Vmax1HK = 15.8;
  Vmax2HK = 33.2;
  VmaxAK = 1380;
  VmaxALD = 89.91;
  VmaxENO = 1500;
  VmaxGPDH = 4300;
  VmaxPFK = 239;
  VmaxPGI = 935;
  VmaxPGK = 5000;
  VmaxPGLM = 2000;
  VmaxPGP23 = 0.52;
  VmaxPK = 570;
  VmaxTPI = 5456.6;
  kATPase = 1.26;
  kLDH = 1000000;
  kMgADPdiss = 1000000;
  kMgAMPdiss = 1000000;
  kMgATPdiss = 1000000;
  kPGM23 = 110000;
  kPS = 1;

  // Reactions:
  v_1: $GLU + MgATP -> G6P + MgADP; Vmax1HK/KHKMgATP*(MgATP + Vmax2HK/Vmax1HK*(MgATP*Mg/KHKMgATPMg) - G6P*MgADP/KeqHK)/((1 + MgATP/KHKMgATP)*(1 + Mg/KHKMgATPMg) + Mg/KHKMg + (G6P/KHKG6P + 1.55)*(1 + Mg/KHKMg) + PG23/KHKPG23 + Mg*PG23/(KHKMg*KHKMgPG23));  // modifiers: Mg, PG23
  v_10: PG3 -> PG2; VmaxPGLM*(PG3 - PG2/KeqPGLM)/(PG3 + KPGLMPG3*(1 + PG2/KPGLMPG2));
  v_11: PG2 -> PEP; VmaxENO*(PG2 - PEP/KeqENO)/(PG2 + KENOPG2*(1 + PEP/KENOPEP));
  v_12: PEP + MgADP -> PYR + MgATP; VmaxPK*(PEP*MgADP - PYR*MgATP/KeqPK)/((PEP + KPKPEP)*(MgADP + KPKMgADP)*(1 + L0PK*((1 + ATP/KPKATP)^4/((1 + PEP/KPKPEP)^4*(1 + FBP/KPKFBP)^4))));  // modifiers: ATP, FBP
  v_13: PYR + $NADH -> $LAC + $NAD; kLDH*(KeqLDH*PYR*NADH - LAC*NAD);
  v_14: MgATP + AMP -> MgADP + ADP; VmaxAK/(KAKATP*KAKAMP)*(MgATP*AMP - MgADP*ADP/KeqAK)/((1 + MgATP/KAKATP)*(1 + AMP/KAKAMP) + (MgADP + ADP)/KAKADP + MgADP*ADP/KAKADP^2);
  v_15: MgATP -> MgADP; kATPase*MgATP;
  v_16: MgATP -> Mg + ATP; kMgATPdiss*(MgATP*KeqMgATPdiss - Mg*ATP);
  v_17: MgADP -> Mg + ADP; kMgADPdiss*(MgADP*KeqMgADPdiss - Mg*ADP);
  v_18: MgAMP -> Mg + AMP; kMgAMPdiss*(MgAMP*KeqMgAMPdiss - Mg*AMP);
  v_19: 0.21 G6P -> 0.071 F6P + 0.071 GAP; 1*kPS;
  v_2: G6P -> F6P; VmaxPGI*(G6P - F6P/KeqPGI)/(G6P + KPGIG6P*(1 + F6P/KPGIF6P));
  v_3: F6P + MgATP -> FBP + MgADP; VmaxPFK*(F6P*MgATP - FBP*MgADP/KeqPFK)/((F6P + KPFKF6P)*(MgATP + KPFKMgATP)*(1 + L0PFK*(1 + ATP/KPFKATP)^4*(1 + Mg/KPFKMg)^4/((1 + AMP/KPFKAMP)^4*(1 + F6P/KPFKF6P)^4)));  // modifiers: ATP, AMP, Mg
  v_4: FBP -> GAP + DHAP; VmaxALD/KmALDFBP*(FBP - GAP*DHAP/KeqALD)/(1 + FBP/KmALDFBP + GAP/KiALDGAP + DHAP*(GAP + KmALDGAP)/(KmALDDHAP*KiALDGAP) + FBP*GAP/(KmALDFBP*KiiALDGAP));
  v_5: DHAP -> GAP; VmaxTPI*(DHAP - GAP/KeqTPI)/(DHAP + KTPIDHAP*(1 + GAP/KTPIGAP));
  v_6: GAP + $NAD + $Phi -> PG13 + $NADH; VmaxGPDH/(KGPDHNAD*KGPDHGAP*KGPDHPhi)*(NAD*GAP*Phi - PG13*NADH/KeqGPDH)/(-1 + (1 + NAD/KGPDHNAD)*(1 + GAP/KGPDHGAP)*(1 + Phi/KGPDHPhi) + (1 + NADH/KGPDHNADH)*(1 + PG13/KGPDHPG13));
  v_7: PG13 + MgADP -> PG3 + MgATP; VmaxPGK/(KPGKMgADP*KPGKPG13)*(MgADP*PG13 - MgATP*PG3/KeqPGK)/(-1 + (1 + MgADP/KPGKMgADP)*(1 + PG13/KPGKPG13) + (1 + MgATP/KPGKMgATP)*(1 + PG3/KPGKPG3));
  v_8: PG13 -> PG23; kPGM23*(PG13 - PG23/KeqPGM23)/(1 + PG23/KPGMPG23);
  v_9: PG23 -> PG3; VmaxPGP23*(PG23 - PG3/KeqPGP23)/(PG23 + KPGP23);
end
