// SBML level 3 version 1

model banks1()

  // Compartments:
  compartment default = 1;

  // Species:
  species E1 in default = 0.0682;
  species E2 in default = 0.691;
  species T1 in default = 79.5;
  species T2 in default = 289;
  species Tstar1 in default = 58.2;
  species Tstar2 in default = 0.0654;
  species Ttot in default = 426.7654;
  species VI in default = 150000;
  species VNI in default = 3570;

  // Parameters:
  KS = 27900;
  KV = 1060;
  Kb1 = 0.0249;
  Kb2 = 87;
  Kd = 0.12;
  Kgamma = 1.36;
  NT = 11.7;
  aA = 0.00407;
  aAS = 9.58e-5;
  aE = 0.0168;
  aT = 0.00985;
  aTS = 0.000449;
  bE1 = 0.0693;
  bE2 = 0.0061;
  c = 12.7;
  d1 = 0.0912;
  d2 = 0.0031;
  dE = 0.0472;
  delta = 0.171;
  deltaE1 = 0.0597;
  deltaE2 = 0.00145;
  f = 0.507;
  gammaE = 0.000689;
  gammaT = 0.000646;
  gammaTS = 7.98e-6;
  k1 = 7.97e-6;
  k2 = 1.05e-8;
  lambdaE = 0.000488;
  lambdaT = 8.66;
  m = 1.1;
  pE = 0.395;
  pT = 9.85;
  rho1 = 1;
  rho2 = 1;
  zeta1 = 0.524;
  zeta2 = 0.16;

  // Assignment rules:
  viruscopiesperml := VNI + VI;

  // Reactions:
  v1: T1 + Ttot -> ; d1*T1;
  v10: -> Tstar1 + Ttot; aTS*pT*Tstar2*VI/(KV + VI);  // modifiers: Tstar2, VI
  v11: -> Tstar1 + Ttot; aAS*pT*Tstar2;  // modifiers: Tstar2
  v12: -> T2 + Ttot; KS*lambdaT/(KS + VI);  // modifiers: VI
  v13: -> T2 + Ttot; gammaT*T1;  // modifiers: T1
  v14: T2 + Ttot -> ; d2*T2;
  v15: T2 -> Tstar2; k2*T2*VI;  // modifiers: VI
  v16: Tstar2 -> T2; f*k2*zeta1*T2*VI;  // modifiers: VI
  v17: T2 + Ttot -> ; aT*T2*VI/(KV + VI);  // modifiers: VI
  v18: T2 + Ttot -> ; aA*T2;
  v19: Tstar2 + Ttot -> ; d2*Tstar2;
  v2: T1 -> Tstar1; k1*T1*VI;  // modifiers: VI
  v20: Tstar2 + Ttot -> ; aTS*Tstar2*VI/(KV + VI);  // modifiers: VI
  v21: Tstar2 + Ttot -> ; aAS*Tstar2;
  v22: -> VI; 1000*delta*NT*Tstar1;  // modifiers: Tstar1
  v23: VI -> VNI; 1000*delta*NT*zeta2*Tstar1;  // modifiers: Tstar1
  v24: VI -> ; c*VI;
  v25: VI -> ; 1000*k1*rho1*T1*VI;  // modifiers: T1
  v26: -> VI; 1000*k1*rho1*zeta1*T1*VI;  // modifiers: T1
  v27: VI -> ; 1000*k2*rho2*T2*VI;  // modifiers: T2
  v28: -> VI; 1000*f*k2*rho2*zeta1*T2*VI;  // modifiers: T2
  v29: VNI -> ; c*VNI;
  v3: Tstar1 -> T1; k1*zeta1*T1*VI;  // modifiers: VI
  v30: -> E1; lambdaE;
  v31: -> E1; bE1*E1*Tstar1/(Kb1 + Tstar1);  // modifiers: Tstar1
  v32: E1 -> ; dE*E1*Tstar1/(Kd + Tstar1);  // modifiers: Tstar1
  v33: E1 -> ; deltaE1*E1;
  v34: E1 -> E2; gammaE*E1*(T1 + Tstar1)/(Kgamma + T1 + Tstar1);  // modifiers: Tstar1, T1
  v35: -> E1; aE*pE*E2*VI/(KV + VI);  // modifiers: VI, E2
  v36: -> E2; bE2*Kb2*E2/(Kb2 + E2);
  v37: E2 -> ; deltaE2*E2;
  v38: E2 -> ; aE*E2*VI/(KV + VI);  // modifiers: VI
  v4: T1 + Ttot -> ; gammaT*T1;
  v5: -> T1 + Ttot; aT*pT*T2*VI/(KV + VI);  // modifiers: VI, T2
  v6: -> T1 + Ttot; aA*pT*T2;  // modifiers: T2
  v7: Tstar1 + Ttot -> ; delta*Tstar1;
  v8: Tstar1 + Ttot -> ; m*E1*Tstar1;  // modifiers: E1
  v9: Tstar1 -> Tstar2; gammaTS*Tstar1;
end
