// SBML level 3 version 1

function Rate_Law_for_reaction_27(vmax, Km, Inhibitor, Ki, Substrate)
  vmax/(Km + Inhibitor/Ki)*Substrate;
end

function Rate_Law_for_reaction_23(vmax, Activator, Km, vbasal)
  vmax*Activator^2/(Km^2 + Activator^2) + vbasal;
end

function Rate_Law_for_reaction_20_25_29(parameter, Activator)
  parameter*Activator;
end

function Rate_Law_for_reaction_18(Km, Ki, vmax, Inhibitor)
  vmax/(Km^2 + (Inhibitor/Ki)^2);
end

function Rate_Law_for_reaction_1(Parameter, Stimulus, Species)
  Parameter*Stimulus*Species;
end

function Rate_Law_for_reaction_3(Modifier, Substrat, Parameter)
  Parameter*Modifier*Substrat;
end

function Constant_flux__irreversible(v)
  v;
end
Constant_flux__irreversible is "Constant flux (irreversible)";

model benary2()
  // Wnt/b-catenin pathway model with FWD1 and HOS feedbacks (APC mutant m7)
  // model units - substance: nmol, time: min, volume: L, extent: nM

  // Compartments:
  compartment Compartment = 1;

  // Species:
  species APC in Compartment = 97.89681;
  species APC_Axin in Compartment = 0.00096373; APC_Axin is "APC/Axin";
  species APC_Axin_GSK3 in Compartment = 0.0048149; APC_Axin_GSK3 is "APC/Axin/GSK3";
  species APC__Axin__GSK3 in Compartment = 0.0096659; APC__Axin__GSK3 is "APC*/Axin*/GSK3";
  species APC__Axin__GSK3_b_catenin in Compartment = 0.0020218; APC__Axin__GSK3_b_catenin is "APC*/Axin*/GSK3/b-catenin";
  species $APC__Axin__GSK3_b_catenin_0 in Compartment; APC__Axin__GSK3_b_catenin_0 is "APC*/Axin*/GSK3/b-catenin*";
  species APC__Axin__GSK3_b_catenin__FWD1 in Compartment = 0.00013859; APC__Axin__GSK3_b_catenin__FWD1 is "APC*/Axin*/GSK3/b-catenin*/FWD1";
  species APC__Axin__GSK3_b_catenin__HOS in Compartment = 0.0018833; APC__Axin__GSK3_b_catenin__HOS is "APC*/Axin*/GSK3/b-catenin*/HOS";
  species $APC_b_catenin in Compartment; APC_b_catenin is "APC/b-catenin";
  species Axin in Compartment = 0.00049222;
  species CRD_BP in Compartment = 0.0065127; CRD_BP is "CRD-BP";
  species CRD_BPmRNA in Compartment = 3.68215e-5; CRD_BPmRNA is "CRD-BPmRNA";
  species Dsha in Compartment = 0;
  species $Dshi in Compartment;
  species FWD1 in Compartment = 0.006741;
  species FWD1mRNA in Compartment = 1.30327e-6;
  species GSK3 in Compartment = 49.96092;
  species HOS in Compartment = 0.091598;
  species HOSmRNA in Compartment = 0.00011602;
  species TCF in Compartment = 8.14286;
  species b_catenin in Compartment = 25.28956; b_catenin is "b-catenin";
  species b_catenin_TCF in Compartment = 6.86431; b_catenin_TCF is "b-catenin/TCF";
  species b_catenin__ub in Compartment = 0.9988; b_catenin__ub is "b-catenin*_ub";

  // Parameters:
  APCtotal = 100;
  Dshtotal = 100;
  GSKtotal = 50;
  Kcrd_bp = 585; Kcrd_bp is "Kcrd-bp";
  Kfwd1 = 3e-6;
  Khos = 1;
  Initial_for_lambda = lambda;
  k1 = 0.182;
  k10 = 206;
  k10b = 206;
  k11 = 0.417;
  k13 = 0.000257;
  k15 = 0.167;
  k16 = 1;
  k16r = 30;
  k17 = 1;
  k17r = 1200;
  k19 = 0.00048;
  k2 = 0.0182;
  k20 = 30;
  k21 = 0.038;
  k22 = 206;
  k22b = 206;
  k24 = 0.00246;
  k25 = 0.013;
  k26 = 7.35e-5;
  k27 = 0.003;
  k29 = 30;
  k3 = 0.05;
  k30 = 0.0058;
  k32 = 0.0028;
  k4 = 0.267;
  k5 = 0.133;
  k6 = 0.0909;
  k6r = 0.909;
  k7 = 1;
  k7r = 2000;
  k8 = 206;
  k8r = 123394;
  k9 = 206;
  ki = 1.667;
  ki2 = 1.667;
  lambda = 0.05;
  v12 = 0.423;
  v14 = 8.22e-5;
  v28 = 1e-6;
  v31 = 0.0228;
  vbasal = 9e-8;
  vmax18 = 1e-6;
  vmax23 = 4.22e-6;

  // Assignment rules:
  APC_b_catenin := APCtotal - GSKtotal + GSK3 - APC_Axin - APC;
  Dshi := Dshtotal - Dsha;
  APC__Axin__GSK3_b_catenin_0 := GSKtotal - (APC_Axin_GSK3 + APC__Axin__GSK3 + GSK3 + APC__Axin__GSK3_b_catenin + APC__Axin__GSK3_b_catenin__HOS + APC__Axin__GSK3_b_catenin__FWD1);

  // Reactions:
  reaction_1: $Dshi => Dsha; Compartment*k1*piecewise(0, time < 100000, exp(-Initial_for_lambda*(time - 100000)))*Dshi;
  reaction_10: APC__Axin__GSK3_b_catenin__HOS => APC__Axin__GSK3 + b_catenin__ub + HOS; Compartment*k10*APC__Axin__GSK3_b_catenin__HOS;
  reaction_10b: APC__Axin__GSK3_b_catenin__FWD1 => APC__Axin__GSK3 + b_catenin__ub + FWD1; Compartment*k10b*APC__Axin__GSK3_b_catenin__FWD1;
  reaction_11: b_catenin__ub => ; Compartment*k11*b_catenin__ub;
  reaction_12: => b_catenin; Compartment*Constant_flux__irreversible(v12);
  reaction_13: b_catenin => ; Compartment*k13*b_catenin;
  reaction_14: => Axin; Compartment*Constant_flux__irreversible(v14);
  reaction_15: Axin => ; Compartment*k15*Axin;
  reaction_16: TCF + b_catenin -> b_catenin_TCF; Compartment*(k16*TCF*b_catenin - k16r*b_catenin_TCF);
  reaction_17: APC + b_catenin -> $APC_b_catenin; Compartment*(k17*APC*b_catenin - k17r*APC_b_catenin);
  reaction_18: => HOSmRNA; Compartment*Rate_Law_for_reaction_18(Khos, ki, vmax18, b_catenin_TCF);  // modifiers: b_catenin_TCF
  reaction_19: HOSmRNA => ; Compartment*k19*HOSmRNA;
  reaction_2: Dsha => $Dshi; Compartment*k2*Dsha;
  reaction_20: => HOS; Compartment*Rate_Law_for_reaction_20_25_29(k20, HOSmRNA);  // modifiers: HOSmRNA
  reaction_21: HOS => ; Compartment*k21*HOS;
  reaction_22: HOS + $APC__Axin__GSK3_b_catenin_0 => APC__Axin__GSK3_b_catenin__HOS; Compartment*k22*HOS*APC__Axin__GSK3_b_catenin_0;
  reaction_22b: FWD1 + $APC__Axin__GSK3_b_catenin_0 => APC__Axin__GSK3_b_catenin__FWD1; Compartment*k22b*FWD1*APC__Axin__GSK3_b_catenin_0;
  reaction_23: => CRD_BPmRNA; Compartment*Rate_Law_for_reaction_23(vmax23, b_catenin_TCF, Kcrd_bp, vbasal);  // modifiers: b_catenin_TCF
  reaction_24: CRD_BPmRNA => ; Compartment*k24*CRD_BPmRNA;
  reaction_25: => CRD_BP; Compartment*Rate_Law_for_reaction_20_25_29(k25, CRD_BPmRNA);  // modifiers: CRD_BPmRNA
  reaction_26: CRD_BP => ; Compartment*k26*CRD_BP;
  reaction_27: FWD1mRNA => ; Compartment*Rate_Law_for_reaction_27(k27, Kfwd1, CRD_BP, ki2, FWD1mRNA);  // modifiers: CRD_BP
  reaction_28: => FWD1mRNA; Compartment*Constant_flux__irreversible(v28);
  reaction_29: => FWD1; Compartment*Rate_Law_for_reaction_20_25_29(k29, FWD1mRNA);  // modifiers: FWD1mRNA
  reaction_3: APC_Axin_GSK3 => APC_Axin + GSK3; Compartment*Rate_Law_for_reaction_3(Dsha, APC_Axin_GSK3, k3);  // modifiers: Dsha
  reaction_30: FWD1 => ; Compartment*k30*FWD1;
  reaction_31: => TCF; Compartment*Constant_flux__irreversible(v31);
  reaction_32: TCF => ; Compartment*k32*TCF;
  reaction_4: APC_Axin_GSK3 => APC__Axin__GSK3; Compartment*k4*APC_Axin_GSK3;
  reaction_5: APC__Axin__GSK3 => APC_Axin_GSK3; Compartment*k5*APC__Axin__GSK3;
  reaction_6: GSK3 + APC_Axin -> APC_Axin_GSK3; Compartment*(k6*GSK3*APC_Axin - k6r*APC_Axin_GSK3);
  reaction_7: APC + Axin -> APC_Axin; Compartment*(k7*APC*Axin - k7r*APC_Axin);
  reaction_8: APC__Axin__GSK3 + b_catenin -> APC__Axin__GSK3_b_catenin; Compartment*(k8*APC__Axin__GSK3*b_catenin - k8r*APC__Axin__GSK3_b_catenin);
  reaction_9: APC__Axin__GSK3_b_catenin => $APC__Axin__GSK3_b_catenin_0; Compartment*k9*APC__Axin__GSK3_b_catenin;

  // Unit definitions:
  unit min = 60 second;
  unit nmol = 1e-9 mole;
  unit L = litre;
  unit nM = 1e-9 mole / litre;
end
