// SBML level 3 version 1

model branch3()

  // Compartments:
  compartment default_compartment = 1;

  // Species:
  species $p1 in default_compartment = 0;
  species $p2 in default_compartment = 0;
  species $s in default_compartment = 1;
  species x in default_compartment = 0;

  // Parameters:
  K1s = 1;
  K1x = 1;
  K2p1 = 1;
  K2x = 1;
  K3p2 = 1;
  K3x = 1;
  Keq1 = 1;
  Keq2 = 1;
  Keq3 = 1;
  Vm1 = 1;
  Vm2 = 1;
  Vm3 = 1;

  // Reactions:
  v_1: $s -> x; Vm1/K1s*(s - x/Keq1)/(1 + s/K1s + x/K1x);
  v_2: x -> $p1; Vm2/K2x*(x - p1/Keq2)/(1 + x/K2x + p1/K2p1);
  v_3: x -> $p2; Vm3/K3x*(x - p2/Keq3)/(1 + x/K3x + p2/K3p2);
end
