// SBML level 3 version 1

model bruggeman2()

  // Compartments:
  compartment default_compartment = 1;

  // Species:
  species $P in default_compartment = 1;
  species $S in default_compartment = 1;
  species e in default_compartment = 1;
  species $esink in default_compartment = 1;
  species $esource in default_compartment = 1;
  species mR in default_compartment = 1;
  species $mRsink in default_compartment = 1;
  species $mRsource in default_compartment = 1;
  species x1 in default_compartment = 1;
  species x2 in default_compartment = 1;
  species x3 in default_compartment = 1;

  // Parameters:
  K1s = 0.05;
  K1x1 = 1000;
  K1x3 = 1;
  K2x1 = 1;
  K2x2 = 1;
  K3x2 = 1;
  K3x3 = 10;
  K4P = 1;
  K4x3 = 0.4;
  Keq1 = 100;
  Keq2 = 10;
  Keq3 = 1;
  Keq4 = 10;
  Ktrx3 = 0.5;
  L = 0.8;
  V4 = 100;
  cp = 0.0001;
  cs = 0.0001;
  k1 = 100;
  k2 = 50;
  k3 = 75;
  ktrnldeg = 0.5;
  ktrnlsyn = 1;
  ktrscdeg = 0.5;
  n = 3;
  ntr = 2;

  // Reactions:
  v_1: $S -> x1; e*k1*S*(1 - x1/(Keq1*S))*(((1 + S/K1s + x1/K1x1)/(1 + cs*S/K1s + cp*x1/K1x1))^n + cs*L*(1 + S/K1s + x1/K1x1)*(1 + x3/K1x3)^n/(1 + cs*S/K1s + cp*x1/K1x1))/(K1s*(1 + S/K1s + x1/K1x1)*(((1 + S/K1s + x1/K1x1)/(1 + cs*S/K1s + cp*x1/K1x1))^n + L*(1 + x3/K1x3)^n));  // modifiers: e, x3
  v_2: x1 -> x2; e*k2*x1*(1 - x2/(Keq2*x1))/(K2x1*(1 + x1/K2x1 + x2/K2x2));  // modifiers: e
  v_3: x2 -> x3; e*k3*x2*(1 - x3/(Keq3*x2))/(K3x2*(1 + x2/K3x2 + x3/K3x3));  // modifiers: e
  v_4: x3 -> $P; V4*(1 - P/(Keq4*x3))*x3/(K4x3*(1 + P/K4P + x3/K4x3));
  v_5: $mRsource -> mR; (1 + (x3/Ktrx3)^ntr)^(-1);  // modifiers: x3
  v_6: mR -> $mRsink; ktrscdeg*mR;
  v_7: $esource -> e; ktrnlsyn*mR;  // modifiers: mR
  v_8: e -> $esink; e*ktrnldeg;
end
