// SBML level 2 version 4

model cao4()

  // Compartments:
  compartment default = 1;

  // Species:
  species S1 in default = 0;
  species S2 in default = 0;
  species S3 in default = 0;
  species S4 in default = 0;
  species S5 in default = 0;
  species S6 in default = 0;

  // Parameters:
  k1 = 1;
  k2 = 1;
  k3 = 0.1;
  k4 = 1;
  k5 = 1;
  k6 = 0.1;

  // Reactions:
  re1: S2 + S1 => S3; k1*S1*S2;  // isVersionOf GO:0009059
  re2: S3 => S2 + S1; k2*S3;  // isVersionOf GO:0032984
  re3: S3 => S5 + S1; k3*S3;  // isVersionOf GO:0043412
  re4: S5 + S4 => S6; k4*S4*S5;  // isVersionOf GO:0009059
  re5: S6 => S5 + S4; k5*S6;  // isVersionOf GO:0032984
  re6: S6 => S2 + S4; k6*S6;  // isVersionOf GO:0043412
end
