// SBML level 3 version 1

model chassagnole3()

  // Compartments:
  compartment default_compartment = 1;

  // Species:
  species $adp in default_compartment = 0.17;
  species asa in default_compartment = 0;
  species $asp in default_compartment = 1.34;
  species aspp in default_compartment = 0;
  species $atp in default_compartment = 1.31;
  species hs in default_compartment = 0;
  species hsp in default_compartment = 0;
  species $nadp in default_compartment = 0.63;
  species $nadph in default_compartment = 0.56;
  species $pi in default_compartment = 5;
  species $thr in default_compartment = 3.49;

  // Parameters:
  F1 = 1;
  alpha = 2.47;
  alpha3 = 3.93;
  k11 = 0.97;
  k13 = 0.323;
  k13adp = 0.25;
  k13aspp = 0.017;
  k13atp = 0.225;
  k1adp = 0.25;
  k1aspp = 0.017;
  k1atp = 0.98;
  k1lys = 0.391;
  k1thr = 0.167;
  k2asa = 0.11;
  k2aspp = 0.022;
  k2eq = 56.41503;
  k2nadp = 0.144;
  k2nadph = 0.0287;
  k2p = 10;
  k3asa = 0.245;
  k3asp = 10;
  k3eq = 3162.278;
  k3hs = 3.39;
  k3nadp = 0.067;
  k3nadph = 0.037;
  k3thr = 0.094;
  k4atp = 0.072;
  k4hs = 0.11;
  k4iatp = 4.35;
  k4ihs = 4.7;
  k4lys = 9.45;
  k4thr = 1.09;
  k5hsp = 0.307;
  keqak = 0.000639;
  lys = 0.46;
  nak1 = 4.09;
  nak3 = 2.78;
  nhdh1 = 1.41;
  pH = 7.5;
  prot = 1;
  vm11 = 0.68987;
  vm13 = 0.33488;
  vm2f = 0.920322;
  vm3f = 3.6707;
  vm4f = 0.54579;
  vm5 = 0.2392;

  // Reactions:
  v_1: $asp + $atp -> aspp + $adp; F1*(vm11*prot*(asp*atp - aspp*adp/keqak)/((k11*(1 + (thr/k1thr)^nak1)/(1 + (thr/(alpha*k1thr))^nak1) + k11*aspp/k1aspp + asp)*(k1atp*(1 + adp/k1adp) + atp)) + vm13*prot*(asp*atp - aspp*adp/keqak)/((1 + (lys/k1lys)^nak3)*(k13*(1 + aspp/k13aspp) + asp)*(k13atp*(1 + adp/k13adp) + atp)));  // modifiers: thr
  v_2: aspp + $nadph -> asa + $nadp + $pi; vm2f*prot*(aspp*nadph - asa*nadp*pi/k2eq)/((k2aspp*(1 + asa/k2asa)*(1 + pi/k2p) + aspp)*(k2nadph*(1 + nadp/k2nadp) + nadph));
  v_3: asa + $nadph -> hs + $nadp; vm3f*prot*(asa*nadph - hs*nadp/k3eq)/((1 + asp/k3asp)*(1 + (thr/k3thr)^nhdh1)/(1 + (thr/(alpha3*k3thr))^nhdh1)*(k3asa + asa + hs*k3asa/k3hs)*(k3nadph*(1 + nadp/k3nadp) + nadph));  // modifiers: asp, thr
  v_4: hs + $atp -> hsp + $adp; vm4f*prot*hs*atp/((1 + lys/k4lys)*(atp + k4atp*(1 + hs/k4ihs))*(hs + k4hs*(1 + thr/k4thr)*(1 + atp/k4iatp)));  // modifiers: thr
  v_5: hsp -> $thr + $pi; vm5*prot*hsp/(hsp + k5hsp);
end
