// SBML level 3 version 1

model ciliberto()

  // Compartments:
  compartment default_compartment = 1;

  // Species:
  species APCP in default_compartment = 0.124;
  species APCPCdc20 in default_compartment = 0.32;
  species Cdc20 in default_compartment = 0.652;
  species Cdc25P in default_compartment = 0.281;
  species MPF in default_compartment = 0.015;
  species MPFtotal in default_compartment = 0.016;
  species Mad2Cdc20P in default_compartment = 0.009;
  species Wee in default_compartment = 0.718;
  species $p in default_compartment = 1;
  species $s in default_compartment = 1;

  // Parameters:
  APCtotal = 1;
  Cdc20total = 1;
  Cdc25total = 1;
  J25 = 0.01;
  Jcycdeg = 0.01;
  Jwee = 0.01;
  Mad2active = 0.01;
  Vaaiwee = 1;
  Vapa25 = 1;
  Vawee = 0.2;
  Vi25 = 0.2;
  Weetotal = 1;
  k20deph = 8;
  k20ph = 10;
  ka25 = 0.2;
  kaa25 = 10;
  kaawee = 4;
  kacycdeg = 0.08;
  kapcdeph = 0.04;
  kapcph = 0.04;
  kass = 80;
  kass2 = 10;
  kawee = 0.1;
  kcycdeg = 2;
  kcycsyn = 0.4;
  kdiss = 20;
  kdiss2 = 0.1;

  // Assignment rules:
  kwee := Weetotal*kawee + (kaawee - kawee)*Wee;
  Mad2 := Mad2active - Mad2Cdc20P;
  Cdc20P := Cdc20total - Cdc20 - APCPCdc20 - Mad2Cdc20P;
  APC := APCtotal - APCP - APCPCdc20;
  k25 := Cdc25total*ka25 + (kaa25 - ka25)*Cdc25P;

  // Reactions:
  v_1: $s -> MPF + MPFtotal; kcycsyn;
  v_10: $s -> Mad2Cdc20P; kass2*Mad2*Cdc20P;
  v_11: Mad2Cdc20P -> $p; kdiss2*Mad2Cdc20P;
  v_12: APCPCdc20 -> $p; (kdiss + kapcdeph + k20ph*MPF)*APCPCdc20;  // modifiers: MPF
  v_13: $s -> APCP; kapcph*MPF*APC;  // modifiers: MPF
  v_14: APCP -> $p; kapcdeph*APCP;
  v_15: $s -> APCP; (kdiss + k20ph*MPF)*APCPCdc20;  // modifiers: MPF, APCPCdc20
  v_16: $s -> Wee; Vawee*((Weetotal - Wee)/(Jwee + Weetotal - Wee));
  v_17: Wee -> $p; Vaaiwee*MPF*Wee;  // modifiers: MPF
  v_18: $s -> Cdc25P; Vapa25*MPF*(Cdc25total - Cdc25P);  // modifiers: MPF
  v_19: Cdc25P -> $p; Vi25*Cdc25P/(J25 + Cdc25P);
  v_2: MPF -> $p; kwee*MPF;
  v_3: $s -> MPF; k25*(MPFtotal - MPF);  // modifiers: MPFtotal
  v_4: MPF -> $p; (kacycdeg + kcycdeg*(APCPCdc20/(Jcycdeg + MPFtotal)))*MPF;  // modifiers: APCPCdc20, MPFtotal
  v_5: MPFtotal -> $p; (kacycdeg + kcycdeg*(APCPCdc20/(Jcycdeg + MPFtotal)))*MPFtotal;  // modifiers: APCPCdc20
  v_6: $s -> Cdc20; k20deph*Cdc20P;
  v_7: Cdc20 -> $p; k20ph*MPF*Cdc20;  // modifiers: MPF
  v_8: $s -> Cdc20; (kapcdeph + kdiss)*APCPCdc20;  // modifiers: APCPCdc20
  v_9: Cdc20 + APCP -> APCPCdc20; kass*Cdc20*APCP;
end
