// SBML level 2 version 4

function V1(k1, Sx, d, S, k2)
  k1*(1 + Sx + d*((S/k2)^4/(1 + (S/k2)^4)));
end

function V3(k, S, Sx)
  k*S*Sx;
end

function V2_4(k, S, Sx)
  k*S*Sx;
end
V2_4 is "V2-4";

model cloutier1()

  // Compartments:
  // Type cell: Neuron
  compartment Neuron = 1;  // BTO:0000938

  // Species:
  // Reactive oxygen species
  species ROS in Neuron = 1;  // CHEBI:26523
  // Misfolded alpha-synuclein
  species alpha_syn in Neuron = 1; alpha_syn is "alpha-syn";  // isVersionOf uniprot:P37840

  // Parameters:
  S2_4 = 1; S2_4 is "S2-4";
  dalphasyn = 15;
  k1 = 17280;
  k2 = 17280;
  k3 = 0.168;
  k4 = 0.168;
  kalphasyn = 8.5;

  // Assignment rules:
  S1 := piecewise(2.6, (time > 10) && (time < 150), 0);

  // Reactions:
  ROS_1: => ROS; Neuron*V1(k1, S1, dalphasyn, alpha_syn, kalphasyn);  // modifiers: alpha_syn
  ROS_2: ROS => ; Neuron*V2_4(k2, ROS, S2_4);
  aSyn_1: => alpha_syn; Neuron*V3(k3, ROS, S2_4);  // modifiers: ROS
  aSyn_2: alpha_syn => ; Neuron*V2_4(k4, alpha_syn, S2_4);

  // Unit definitions:
  unit substance = 1e-6 mole;
  unit time = 86400 second;
  unit volume = 1e-3 litre;
end
