// SBML level 2 version 1

model conant2()

  // Compartments:
  compartment cyto = 1; cyto is "cytoplasm";
  compartment mito = 1; mito is "mitochondrion";

  // Species:
  species ADP in cyto = 1.281988;
  species AMP in cyto = 0.2928849;
  species ATP in cyto = 2.525127;
  species AcAld in cyto = 0.1781406;
  species $AcCoA in mito = 1;
  species BPG in cyto = 0.0007368735;
  species $CO2 in cyto = 1;
  species $CO2mito in mito = 1;
  species DHAP in cyto = 1.004153;
  species $EtOH in cyto = 50;
  species F16bP in cyto = 6.221321;
  species $F26bP in cyto = 0.02; F26bP is "Fru2,6-P2";  // CHEBI:28602 kegg.compound:C00665
  species F6P in cyto = 0.6249764;
  species G6P in cyto = 2.67504;
  species GAP in cyto = 0.04518092;
  species GLCi in cyto = 0.09765223;
  species $GLCo in cyto = 50;
  species $Glycerol in cyto = 0.15;
  species $Glycogen in cyto = 0;
  species NAD in cyto = 1.50329;
  species NADH in cyto = 0.0867097;
  species P2G in cyto = 0.1276958;
  species P3G in cyto = 0.8856885;
  species PEP in cyto = 0.06323521;
  species PYR in cyto = 1.815313;
  species PYRmito in mito = 0;
  species $Succinate in cyto = 0;
  species $Trehalose in cyto = 0;

  // Parameters:
  WGD_E = 0.65 dimensionless; WGD_E is "WGD enzyme conc change";
  t_m = 1 dimensionless; t_m is "toggle_transport";

  // Reactions:
  ADH: NAD + $EtOH -> NADH + AcAld; cyto*Vmax_13*WGD_E*(EtOH*NAD/(Ketoh_13*Kinad_13) - AcAld*NADH/(Ketoh_13*Kinad_13*Keq_13))/(1 + NAD/Kinad_13 + EtOH*Knad_13/(Kinad_13*Ketoh_13) + AcAld*Knadh_13/(Kinadh_13*Kacald_13) + NADH/Kinadh_13 + EtOH*NAD/(Kinad_13*Ketoh_13) + NAD*AcAld*Knadh_13/(Kinad_13*Kinadh_13*Kacald_13) + EtOH*NADH*Knad_13/(Kinad_13*Kinadh_13*Ketoh_13) + AcAld*NADH/(Kacald_13*Kinadh_13) + EtOH*NAD*AcAld/(Kinad_13*Kiacald_13*Ketoh_13) + EtOH*AcAld*NADH/(Kietoh_13*Kinadh_13*Kacald_13));
    Vmax_13 = 209.5; Ketoh_13 = 17 mM; Kinad_13 = 0.92 mM; Keq_13 = 6.9e-5 dimensionless; Knad_13 = 0.17 mM; Knadh_13 = 0.11 mM; Kinadh_13 = 0.031 mM; Kacald_13 = 1.11 mM; Kiacald_13 = 1.1 mM; Kietoh_13 = 90 mM;
  AK: 2 ADP -> ATP + AMP; cyto*(k1_15*ADP*ADP - k2_15*ATP*AMP); AK is "adenylate_kinase";
    k1_15 = 45; k2_15 = 100;
  ATPase: ATP => ADP; cyto*Katpase_14*ATP;
    Katpase_14 = 39.5;
  ENO: P2G -> PEP; cyto*Vmax_10*WGD_E*(P2G/Kp2g_10 - PEP/(Kp2g_10*Keq_10))/(1 + P2G/Kp2g_10 + PEP/Kpep_10);
    Vmax_10 = 201.6; Kp2g_10 = 0.04 mM; Keq_10 = 6.7 dimensionless; Kpep_10 = 0.5 mM;
  FBA: F16bP -> DHAP + GAP; cyto*Vmax_5*WGD_E*(F16bP/Kf16bp_5 - DHAP*GAP/(Kf16bp_5*Keq_5))/(1 + F16bP/Kf16bp_5 + DHAP/Kdhap_5 + GAP/Kgap_5 + F16bP*GAP/(Kf16bp_5*Kigap_5) + DHAP*GAP/(Kdhap_5*Kgap_5));
    Vmax_5 = 94.69; Kf16bp_5 = 0.3 mM; Keq_5 = 0.069 mM; Kdhap_5 = 2 mM; Kgap_5 = 2.4 mM; Kigap_5 = 10 mM;
  G3PDH: DHAP + NADH -> NAD + $Glycerol; cyto*Vmax_16*WGD_E*(DHAP/Kdhap_16*(NADH/Knadh_16) - Glycerol/Kdhap_16*(NAD/Knadh_16)*(1/Keq_16))/((1 + DHAP/Kdhap_16 + Glycerol/Kglycerol_16)*(1 + NADH/Knadh_16 + NAD/Knad_16)); G3PDH is "glycerol-3-phosphate_dehydrogenase";
    Vmax_16 = 47.11; Kdhap_16 = 0.4 mM; Knadh_16 = 0.023 mM; Keq_16 = 4300 dimensionless; Kglycerol_16 = 1 mM; Knad_16 = 0.93 mM;
  HXK: GLCi + ATP -> G6P + ADP; cyto*WGD_E*Vmax_2*(GLCi*ATP/(Kglc_2*Katp_2) - G6P*ADP/(Kglc_2*Katp_2*Keq_2))/((1 + GLCi/Kglc_2 + G6P/Kg6p_2)*(1 + ATP/Katp_2 + ADP/Kadp_2));
    Vmax_2 = 236.7; Kglc_2 = 0.08 mM; Katp_2 = 0.15 mM; Keq_2 = 2000 dimensionless; Kg6p_2 = 30 mM; Kadp_2 = 0.23 mM;
  HXT: $GLCo -> GLCi; Vmax_1*WGD_E*(GLCo - GLCi)/Kglc_1/(1 + (GLCo + GLCi)/Kglc_1 + Ki_1*GLCo*GLCi/Kglc_1^2);
    Vmax_1 = 97.24; Kglc_1 = 1.1918 mM; Ki_1 = 0.91 dimensionless;
  PDC: PYR => AcAld + $CO2; cyto*Vmax_12*WGD_E*(PYR/Kpyr_12)^nH_12/(1 + (PYR/Kpyr_12)^nH_12);
    Vmax_12 = 857.8; Kpyr_12 = 4.33 mM; nH_12 = 1.9 dimensionless;
  PDH: PYRmito => $AcCoA + $CO2mito; mito*WGD_E*Vmax_PDH*PYRmito*(NADX_tot - NADX_tot/(1 + NAD/NADH))/(NADX_tot*Ki_PYR*K_NAD/Ki_NADH/(1 + NAD/NADH) + K_PYR*(NADX_tot - NADX_tot/(1 + NAD/NADH)) + K_NAD*PYRmito + NADX_tot*K_NAD/Ki_NADH*PYRmito/(1 + NAD/NADH) + (NADX_tot - NADX_tot/(1 + NAD/NADH))*PYRmito); PDH is "pyruvate dehydrogenase";  // modifiers: NAD, NADH
    Vmax_PDH = 379.2; NADX_tot = 8.01 mM; K_PYR = 70 mM; K_NAD = 160 mM; Ki_NADH = 50 mM; Ki_PYR = 20 mM;
  PFK: ATP + F6P => ADP + F16bP; cyto*Vmax_4*WGD_E*(gR_4*(F6P/Kf6p_4)*(ATP/Katp_4)*(1 + F6P/Kf6p_4 + ATP/Katp_4 + gR_4*F6P/Kf6p_4*ATP/Katp_4)/((1 + F6P/Kf6p_4 + ATP/Katp_4 + gR_4*F6P/Kf6p_4*ATP/Katp_4)^2 + L0_4*((1 + Ciatp_4*ATP/Kiatp_4)/(1 + ATP/Kiatp_4))^2*((1 + Camp_4*AMP/Kamp_4)/(1 + AMP/Kamp_4))^2*((1 + Cf26_4*F26bP/Kf26_4 + Cf16_4*F16bP/Kf16_4)/(1 + F26bP/Kf26_4 + F16bP/Kf16_4))^2*(1 + Catp_4*ATP/Katp_4)^2));  // modifiers: AMP, F26bP
    Vmax_4 = 110; gR_4 = 5.12 dimensionless; Kf6p_4 = 0.1 mM; Katp_4 = 0.71 mM; L0_4 = 0.66 dimensionless; Ciatp_4 = 100 dimensionless; Kiatp_4 = 0.65 mM; Camp_4 = 0.0845 dimensionless; Kamp_4 = 0.0995 mM; Cf26_4 = 0.0174 dimensionless; Kf26_4 = 0.000682 mM; Cf16_4 = 0.397 dimensionless; Kf16_4 = 0.111 mM; Catp_4 = 3 dimensionless;
  PGI: G6P -> F6P; cyto*Vmax_3*WGD_E*(G6P/Kg6p_3 - F6P/(Kg6p_3*Keq_3))/(1 + G6P/Kg6p_3 + F6P/Kf6p_3);
    Vmax_3 = 1056; Kg6p_3 = 1.4 mM; Keq_3 = 0.29 dimensionless; Kf6p_3 = 0.3 mM;
  PGK: ADP + BPG -> ATP + P3G; cyto*Vmax_8*WGD_E*((Keq_8*BPG*ADP - P3G*ATP)/(Kp3g_8*Katp_8))/((1 + BPG/Kbpg_8 + P3G/Kp3g_8)*(1 + ADP/Kadp_8 + ATP/Katp_8));
    Vmax_8 = 1288; Keq_8 = 3200 dimensionless; Kp3g_8 = 0.53 mM; Katp_8 = 0.3 mM; Kbpg_8 = 0.003 mM; Kadp_8 = 0.2 mM;
  PGM: P3G -> P2G; cyto*Vmax_9*WGD_E*(P3G/Kp3g_9 - P2G/(Kp3g_9*Keq_9))/(1 + P3G/Kp3g_9 + P2G/Kp2g_9);
    Vmax_9 = 2585; Kp3g_9 = 1.2 mM; Keq_9 = 0.19 dimensionless; Kp2g_9 = 0.08 mM;
  PYK: ADP + PEP -> ATP + PYR; cyto*Vmax_11*WGD_E*(PEP*ADP/(Kpep_11*Kadp_11) - PYR*ATP/(Kpep_11*Kadp_11*Keq_11))/((1 + PEP/Kpep_11 + PYR/Kpyr_11)*(1 + ADP/Kadp_11 + ATP/Katp_11));
    Vmax_11 = 1000; Kpep_11 = 0.14 mM; Kadp_11 = 0.53 mM; Keq_11 = 6500 dimensionless; Kpyr_11 = 21 mM; Katp_11 = 1.5 mM;
  PYR_shut: PYR -> PYRmito; t_m*(k1*PYR - k2*PYRmito); PYR_shut is "pyruvate_shuttling";
    k1 = 1; k2 = 1;
  TDH: GAP + NAD -> BPG + NADH; cyto*C_7*(Vmaxf_7*WGD_E*GAP*NAD/(Kgap_7*Knad_7) - Vmaxr_7*WGD_E*BPG*NADH/(Kbpg_7*Knadh_7))/((1 + GAP/Kgap_7 + BPG/Kbpg_7)*(1 + NAD/Knad_7 + NADH/Knadh_7));
    C_7 = 1 dimensionless; Vmaxf_7 = 1152; Kgap_7 = 0.21 mM; Knad_7 = 0.09 mM; Vmaxr_7 = 6719; Kbpg_7 = 0.0098 mM; Knadh_7 = 0.06 mM;
  TPI: DHAP -> GAP; cyto*(k1_6*DHAP - k2_6*GAP);
    k1_6 = 450000; k2_6 = 10000000;
  glycogen_branch: ATP + G6P => ADP + $Glycogen; cyto*KGLYCOGEN_17; glycogen_branch is "glycogenbranch";
    KGLYCOGEN_17 = 6;
  succinate_syn: 3 NAD + 2 AcAld => 3 NADH + $Succinate; cyto*k_19*AcAld; succinate_syn is "succinate_synthesis";
    k_19 = 21.4;
  trehalose_synth: ATP + 2 G6P => ADP + $Trehalose; cyto*Ktrehalose_18; trehalose_synth is "trehalose_synthesis";
    Ktrehalose_18 = 2.4;

  // Unit definitions:
  unit minute = 60 second;
  unit mmol = 1e-3 mole;
  unit mM = 1e-3 mole / litre;
  unit mmolepermin = 1e-3 mole / (60 second);
  unit mMpermin = 1e-3 mole / (60 second * litre);
  unit permin = litre / (60 second);
  unit permMpermin = litre / (1e-3 mole * 60 second);
end
