// SBML level 3 version 1

model curien1()
  // model units - substance: umol, time: s, volume: L, extent: uM

  // Compartments:
  compartment default_compartment = 1;

  // Species:
  species $Cys in default_compartment = 15;  // CHEBI:32460
  species $Cystathionine in default_compartment = 0;  // kegg.compound:C00542
  species $Hser in default_compartment = 0;
  species $Phi in default_compartment = 10000;
  species Phser in default_compartment = 0;
  species $Thr in default_compartment = 0;  // CHEBI:32835

  // Parameters:
  AdoMet = 20;
  CGS = 0.7;
  Ki2 = 2000;
  Ki3 = 1000;
  KmCYS = 460;
  KmPHSER = 2500;
  TS = 5;
  V1 = 1;
  kcat2 = 30;

  // Reactions:
  v_1: $Hser -> Phser; V1;
  v_2: Phser + $Cys -> $Cystathionine + $Phi; CGS*(kcat2/(1 + KmCYS/Cys))*Phser/(Phser + KmPHSER*(1 + Phi/Ki2)/(1 + KmCYS/Cys));
  v_3: Phser -> $Thr + $Phi; TS*((0.42 + 3.5*AdoMet^2/73)/(1 + AdoMet^2/73))*Phser/((1 + Phi/Ki3)*(250*(1 + AdoMet/0.5)/(1 + AdoMet/1.09))/(1 + AdoMet^2/142) + Phser);

  // Unit definitions:
  unit umol = 1e-6 mole;
  unit s = second;
  unit L = litre;
  unit uM = 1e-6 mole / litre;
end
