// SBML level 3 version 1

model dallaman2()
  // model units - time: min

  // Compartments:
  compartment default = NaN; default has dimensionless;  // 0-D

  // Species:
  substanceOnly species G_p in default = 178;  // substance in mgperkg
  substanceOnly species G_t in default = 135;  // substance in mgperkg
  substanceOnly species I_1 in default = 25;  // substance in pmolperl
  substanceOnly species I_d in default = 25;  // substance in pmolperl
  substanceOnly species I_l in default = 4.5;  // substance in pmolperkg
  substanceOnly species I_p in default = 1.25;  // substance in pmolperkg
  substanceOnly species I_po in default = 3.6;  // substance in pmolperkg
  substanceOnly species Q_gut in default = 0;  // substance in mg
  substanceOnly species Q_sto1 in default = 78000;  // substance in mg
  substanceOnly species Q_sto2 in default = 0;  // substance in mg
  substanceOnly species X in default = 0;  // substance in pmolperl
  substanceOnly species Y in default = 0;  // substance in pmolperkgpermin

  // Parameters:
  BW = 78 kg;
  D = 78000 mg;
  E has mgperkgpermin;
  EGP has mgperkgpermin;
  G has mgperdl;
  G_b = 95 mgperdl;
  HE has dimensionless;
  HE_b = 0.6 dimensionless;
  I has pmolperl;
  I_b = 25 pmolperl;
  K = 0.99 pmolperkg_per_mgperdl;
  K_f0 = 225.59 mgperkg;
  K_m0 = 466.21 mgperkg;
  Q_sto has mg;
  Ra has mgperkgpermin;
  S has pmolperkgpermin;
  S_b = 1.8 pmolperkgpermin;
  S_po has pmolperkgpermin;
  TotalModel = 1 dimensionless;
  U has mgperkgpermin;
  U_id has mgperkgpermin;
  U_idf has mgperkgpermin;
  U_idm has mgperkgpermin;
  U_ii = 1 mgperkgpermin;
  V_G = 1.49 dlperkg;
  V_I = 0.04 lperkg;
  V_f0 = 2.5 mgperkgpermin;
  V_fX = 0.047 mgperkgpermin_per_pmolperl;
  V_fmax has mgperkgpermin;
  V_m0 = 4.65 mgperkgpermin;
  V_mX = 0.034 mgperkgpermin_per_pmolperl;
  V_mmax has mgperkgpermin;
  aa has mg;
  alpha = 0.013 permin;
  b = 0.68 dimensionless;
  beta = 0.05 pmolperkgpermin_per_mgperdl;
  cc has mg;
  d = 0.009 dimensionless;
  derG has mgperdLpermin;
  f = 0.9 dimensionless;
  gamma = 0.5 permin;
  k_1 = 0.042 permin;
  k_2 = 0.071 permin;
  k_abs = 0.023 permin;
  k_e1 = 0.0007 permin;
  k_e2 = 269 mgperkg;
  k_empt has permin;
  k_gri = 0.0465 permin;
  k_i = 0.0066 permin;
  k_max = 0.0465 permin;
  k_min = 0.0076 permin;
  k_p1 = 3.09 mgperkgpermin;
  k_p2 = 7e-5 permin;
  k_p3 = 0.005 mgperkgpermin_per_pmolperl;
  k_p4 = 0.0786 mgperkgpermin_per_pmolperkg;
  m_1 = 0.379 permin;
  m_2 = 0.673 permin;
  m_3 has permin;
  m_4 = 0.269 permin;
  m_5 = 0.0526 min_kgperpmol;
  m_6 = 0.8118 dimensionless;
  p_2U = 0.084 permin;
  part = 0.2 dimensionless;

  // Assignment rules:
  U_idm := V_mmax*G_t/(K_m0 + G_t);
  E := piecewise(k_e1*(G_p - k_e2), G_p > k_e2, 0, G_p <= k_e2);
  m_3 := HE*m_1/(1 - HE);
  G := G_p/V_G;
  U_idf := V_fmax*G_t/(K_f0 + G_t);
  derG := (EGP + Ra - E - U_ii - k_1*G_p + k_2*G_t)/V_G;
  k_empt := k_min + (k_max - k_min)/2*(tanh(aa*(Q_sto - b*D)) - tanh(cc*(Q_sto - d*D)) + 2);
  V_mmax := (1 - part)*(V_m0 + V_mX*X);
  cc := 5/2/d/D;
  HE := -m_5*S + m_6;
  S := gamma*I_po;
  aa := 5/2/(1 - b)/D;
  Q_sto := Q_sto1 + Q_sto2;
  EGP := k_p1 - k_p2*G_p - k_p3*I_d - k_p4*I_po;
  U := U_ii + U_id;
  I := I_p/V_I;
  V_fmax := part*(V_f0 + V_fX*X);
  U_id := U_idm + U_idf;
  Ra := f*k_abs*Q_gut/BW;
  S_po := piecewise(Y + S_b, derG < 0, Y + S_b, G < G_b, Y + K*derG + S_b, derG >= 0, Y + K*derG + S_b, G >= G_b);

  // Reactions:
  Glucose_equilibration: G_t -> G_p; k_2*G_t - k_1*G_p;
  Glucose_production_endogenous: -> G_p; EGP;
  Glucose_rate_of_appearance: -> G_p; Ra;  // modifiers: G_t
  Glucose_renal_excretion: G_p -> ; E;
  Glucose_utilisation_insulin_dep: G_t -> ; U_id;
  Glucose_utilisation_insulin_indep: G_p -> ; U_ii;
  Gut_absorption: Q_gut -> ; k_abs*Q_gut;
  Insulin_degradation_liver: I_l -> ; m_3*I_l;
  Insulin_degradation_periphery: I_p -> ; I_p*m_4;
  Insulin_delayed: I_1 -> I_d; k_i*I_1 - k_i*I_d;
  Insulin_portal_vein: -> I_po; -gamma*I_po + S_po;
  Insulin_secretion_liver: -> I_l; S;
  Insulin_transport_plasma_liver: I_l -> I_p; m_1*I_l - m_2*I_p;
  Interstitial_insulin: -> X; -p_2U*X + p_2U*(I - I_b);
  Something_Y: -> Y; piecewise(S_b, beta*(G - G_b) < -S_b, -alpha*(Y - beta*(G - G_b))); Something_Y is "Insulin_rateofappearance_betacell";
  Stomach_grinding: Q_sto1 -> Q_sto2; k_gri*Q_sto1;
  Stomach_grinding_emptying: Q_sto2 -> Q_gut; k_empt*Q_sto2; Stomach_grinding_emptying is "Stomach_emptying";
  Uknown_as_of_yet: -> I_1; k_i*I - k_i*I_1; Uknown_as_of_yet is "Insulin_anticipated";

  // Unit definitions:
  unit pmolperkgpermin = 1e-12 mole / (kilogram * 60 second); pmolperkgpermin is "pmol/kg/min";
  unit min = 60 second;
  unit permin = 1 / (60 second); permin is "/min";
  unit mgperkgpermin_per_dlperkg = 1e-6 kilogram * kilogram / (kilogram * 60 second * 0.1 litre); mgperkgpermin_per_dlperkg is "mg/kg/min per dl/kg";
  unit mgperdLpermin = 1e-3 gram / (0.1 litre * 60 second); mgperdLpermin is "mg/dL/min";
  unit dl = 0.1 litre;
  unit mg = 1e-6 kilogram;
  unit dlperkg = 0.1 litre / kilogram; dlperkg is "dl/kg";
  unit pmol = 1e-12 mole;
  unit lperkg = litre / kilogram; lperkg is "l/kg";
  unit permg = 1 / (1e-6 kilogram); permg is "/mg";
  unit pmolperkg = 1e-12 mole / kilogram; pmolperkg is "pmol/kg";
  unit mgperkgpermin_per_pmolperl = litre * 1e-6 kilogram / (60 second * kilogram * 1e-12 mole); mgperkgpermin_per_pmolperl is "mg/kg/min per pmol/l";
  unit mgperkgpermin_per_pmolperkg = 1e-6 kilogram * kilogram / (kilogram * 1e-12 mole * 60 second); mgperkgpermin_per_pmolperkg is "mg/kg/min per pmol/kg";
  unit mgperkg = 1e-6 kilogram / kilogram; mgperkg is "mg/kg";
  unit kg = kilogram;
  unit min_kgperpmol = 60 second * kilogram / (1e-12 mole); min_kgperpmol is "min*kg/pmol";
  unit mgperkgpermin = 1e-6 kilogram / (kilogram * 60 second); mgperkgpermin is "mg/kg/min";
  unit pmolperkg_per_mgperdl = 1e-12 mole * 0.1 litre / (kilogram * 1e-6 kilogram); pmolperkg_per_mgperdl is "pmol/kg per mg/dl";
  unit mgperdl = 1e-6 kilogram / (0.1 litre); mgperdl is "mg/dl";
  unit pmolperkgpermin_per_mgperdl = 1e-12 mole * 0.1 litre / (kilogram * 60 second * 1e-6 kilogram); pmolperkgpermin_per_mgperdl is "pmol/kg/min per mg/dl";
  unit pmolperl = 1e-12 mole / litre; pmolperl is "pmol/l";
end
