// SBML level 2 version 4

model dallepezze1()

  // Compartments:
  compartment Membrane = 1;  // isVersionOf GO:0005886
  compartment Cytoplasm = 1;  // isVersionOf GO:0005737

  // Species:
  species Sink in Cytoplasm = 0;
  species PRAS40_pT246 in Cytoplasm = 0;  // uniprot:Q96B36
  species mTORC1 in Cytoplasm = 4.3225;  // uniprot:P42345
  species PRAS40_pS183 in Cytoplasm = 0;  // uniprot:Q96B36
  species PDK2 in Cytoplasm = 12.1175;  // uniprot:Q13153 uniprot:Q13315 uniprot:P78527 uniprot:P49137
  species PDK2_p in Cytoplasm = 0;  // uniprot:P49137 uniprot:Q13153 uniprot:Q13315 uniprot:P78527
  species IR_beta_refractory in Membrane = 0;  // uniprot:P06213
  species PI3K_variant_p in Cytoplasm = 0;  // isVersionOf uniprot:P27986
  species p70S6K_pT389 in Cytoplasm = 0;  // uniprot:P23443
  species PI3K_variant in Cytoplasm = PI3K;  // isVersionOf uniprot:P27986
  species IRS1_pS636_PI3K in Cytoplasm = 0;  // hasPart uniprot:P42336 uniprot:P35568
  species mTORC1_pS2448 in Cytoplasm = 0;  // uniprot:P42345
  species IR_beta in Membrane = 12.1175;  // uniprot:P06213
  species IR_beta_pY1146 in Membrane = 0;  // uniprot:P06213
  species mTORC2_pS2481 in Cytoplasm = 0;  // uniprot:P42345
  species $PI3K in Cytoplasm = 2.965;  // isVersionOf uniprot:P27986
  species Akt in Cytoplasm = 144.13;  // uniprot:P31749
  species $Amino_Acids in Cytoplasm = 100;
  species Akt_pT308 in Cytoplasm = 0;  // uniprot:P31749
  species Akt_pT308_pS473 in Cytoplasm = 0;  // uniprot:P31749
  species $Insulin in Membrane = 100;  // uniprot:P01308
  species IRS1_PI3K in Cytoplasm = PI3K;  // hasPart uniprot:P35568 uniprot:P42336
  species p70S6K in Cytoplasm = 127.0725;  // uniprot:P23443
  species mTORC2 in Cytoplasm = 6.2175;  // uniprot:P42345
  species TSC_clx in Cytoplasm = 10;  // hasPart uniprot:P49815 uniprot:Q92574
  species IRS1_p_PI3K in Cytoplasm = 0;  // hasPart uniprot:P35568 uniprot:P42336
  species TSC_p_clx in Cytoplasm = 0;  // hasPart uniprot:Q92574 uniprot:P49815
  species PRAS40 in Cytoplasm = 73.2175;  // uniprot:Q96B36

  // Reactions:
  mTORC2_pS2481_dephosphorylation: mTORC2_pS2481 => mTORC2; Cytoplasm*mTORC2_pS2481_dephosphorylation_k1*mTORC2_pS2481;
    mTORC2_pS2481_dephosphorylation_k1 = 0.0255714;
  PRAS40_pT246_dephosphorylation: PRAS40_pT246 => PRAS40; Cytoplasm*PRAS40_pT246_dephosphorylation_k1*PRAS40_pT246;
    PRAS40_pT246_dephosphorylation_k1 = 0.999991;
  PRAS40_pS183_dephosphorylation: PRAS40_pS183 => PRAS40; Cytoplasm*PRAS40_pS183_dephosphorylation_k1*PRAS40_pS183;
    PRAS40_pS183_dephosphorylation_k1 = 0.403706;
  reaction_12: mTORC1_pS2448 + PRAS40 => mTORC1_pS2448 + PRAS40_pS183; Cytoplasm*reaction_12_k1*PRAS40*mTORC1_pS2448; reaction_12 is "PRAS40_S183_phosphorylation_by_mTORC1_pS2448";
    reaction_12_k1 = 0.073093;
  reaction_13: PDK2_p + Akt_pT308 => PDK2_p + Akt_pT308_pS473; Cytoplasm*reaction_13_k1*Akt_pT308*PDK2_p; reaction_13 is "Akt_pT308_S473_phosphorylation_by_PDK2";
    reaction_13_k1 = 5.90372;
  PDK2_p_dephosphorylation: PDK2_p => PDK2; Cytoplasm*PDK2_p_dephosphorylation_k1*PDK2_p;
    PDK2_p_dephosphorylation_k1 = 1;
  PDK2_phosphorylation: IR_beta_pY1146 + PDK2 => IR_beta_pY1146 + PDK2_p; PDK2_phosphorylation_k1*PDK2*IR_beta_pY1146;
    PDK2_phosphorylation_k1 = 0.1;
  reaction_16: mTORC1_pS2448 + p70S6K => mTORC1_pS2448 + p70S6K_pT389; Cytoplasm*reaction_16_k1*p70S6K*mTORC1_pS2448; reaction_16 is "p70S6K_T389_phosphorylation_by_mTORC1_pS2448";
    reaction_16_k1 = 0.00573896;
  p70S6K_pT389_dephosphorylation: p70S6K_pT389 => p70S6K; Cytoplasm*p70S6K_pT389_dephosphorylation_k1*p70S6K_pT389;
    p70S6K_pT389_dephosphorylation_k1 = 0.00528455;
  reaction_18: PI3K_variant_p + mTORC2 => PI3K_variant_p + mTORC2_pS2481; Cytoplasm*reaction_18_k1*mTORC2*PI3K_variant_p; reaction_18 is "mTORC2_S2481_phosphorylation_by_PI3K_variant_p";
    reaction_18_k1 = 0.0318902;
  reaction_19: IR_beta_pY1146 + PI3K_variant => IR_beta_pY1146 + PI3K_variant_p; reaction_19_k1*PI3K_variant*IR_beta_pY1146; reaction_19 is "PI3K_variant_phosphorylation_by_IR_beta_pY1146";
    reaction_19_k1 = 0.999985;
  IR_beta_pY1146_dephosphorylation: IR_beta_pY1146 => IR_beta_refractory; Membrane*IR_beta_pY1146_dephosphorylation_k1*IR_beta_pY1146;
    IR_beta_pY1146_dephosphorylation_k1 = 0.149328;
  PI3K_variant_p_dephosphorylation: PI3K_variant_p => PI3K_variant; Cytoplasm*PI3K_variant_p_dephosphorylation_k1*PI3K_variant_p;
    PI3K_variant_p_dephosphorylation_k1 = 0.000232165;
  reaction_22: p70S6K_pT389 + IRS1_PI3K => p70S6K_pT389 + IRS1_pS636_PI3K; Cytoplasm*reaction_22_k1*IRS1_PI3K*p70S6K_pT389; reaction_22 is "IRS1_S636_phosphorylation_by_p70S6K_pT389";
    reaction_22_k1 = 1;
  reaction_23: IR_beta_pY1146 + IRS1_PI3K => IR_beta_pY1146 + IRS1_p_PI3K; reaction_23_k1*IRS1_PI3K*IR_beta_pY1146; reaction_23 is "IRS1_PI3K_phosphorylation_by_IR_beta_pY1146";
    reaction_23_k1 = 0.134664;
  reaction_3: Akt_pT308_pS473 + TSC_clx => Akt_pT308_pS473 + TSC_p_clx; Cytoplasm*reaction_3_k1*TSC_clx*Akt_pT308_pS473; reaction_3 is "TSC_clx_phosphorylation_by_Akt_pT308_pS473";
    reaction_3_k1 = 0.000100039;
  reaction_31: IRS1_p_PI3K + Akt => IRS1_p_PI3K + Akt_pT308; Cytoplasm*reaction_31_k1*Akt*IRS1_p_PI3K; reaction_31 is "Akt_T308_phosphorylation_by_IRS1_phos_PI3K";
    reaction_31_k1 = 0.699505;
  reaction_32: mTORC2_pS2481 + Akt_pT308 => mTORC2_pS2481 + Akt_pT308_pS473; Cytoplasm*reaction_32_k1*Akt_pT308*mTORC2_pS2481; reaction_32 is "Akt_pT308_S473_phosphorylation_by_mTORC2_pS2481";
    reaction_32_k1 = 4.50769;
  reaction_33: Akt_pT308 + TSC_clx => Akt_pT308 + TSC_p_clx; Cytoplasm*reaction_33_k1*TSC_clx*Akt_pT308; reaction_33 is "TSC_clx_phosphorylation_by_Akt_pT308";
    reaction_33_k1 = 0.00627315;
  IRS1_synthesis: Sink => IRS1_PI3K; Cytoplasm*IRS1_synthesis_k1*Sink;
    IRS1_synthesis_k1 = 0.0999968;
  reaction_40: $Amino_Acids + mTORC1 => mTORC1_pS2448; Cytoplasm*reaction_40_k1*mTORC1*Amino_Acids; reaction_40 is "mTORC1_S2448_activation_by_Amino_Acids";
    reaction_40_k1 = 0.0513784;
  IR_beta_Y1146_phosphorylation: $Insulin + IR_beta => IR_beta_pY1146; Membrane*IR_beta_Y1146_phosphorylation_k1*IR_beta*Insulin;
    IR_beta_Y1146_phosphorylation_k1 = 0.0253763;
  reaction_44: Akt_pT308_pS473 => Akt_pT308; Cytoplasm*reaction_44_k1*Akt_pT308_pS473; reaction_44 is "Akt_pT308_pS473_dephosphorylation";
    reaction_44_k1 = 7.52842;
  reaction_46: p70S6K_pT389 + IRS1_p_PI3K => p70S6K_pT389 + IRS1_pS636_PI3K; Cytoplasm*reaction_46_k1*IRS1_p_PI3K*p70S6K_pT389; reaction_46 is "IRS1_p_pi3K_phosphorylation_by_p70S6K_pT389";
    reaction_46_k1 = 0.0001;
  IR_beta_ready: IR_beta_refractory => IR_beta; Membrane*IR_beta_ready_k1*IR_beta_refractory;
    IR_beta_ready_k1 = 0.0309731;
  IRS1_pS636_degradation: IRS1_pS636_PI3K => Sink; Cytoplasm*IRS1_pS636_degradation_k1*IRS1_pS636_PI3K;
    IRS1_pS636_degradation_k1 = 0.000100001;
  IRS1_p_PI3K_dephosphorylation: IRS1_p_PI3K => IRS1_PI3K; Cytoplasm*IRS1_p_PI3K_dephosphorylation_k1*IRS1_p_PI3K;
    IRS1_p_PI3K_dephosphorylation_k1 = 0.00328283;
  reaction_6: Akt_pT308_pS473 + PRAS40 => Akt_pT308_pS473 + PRAS40_pT246; Cytoplasm*reaction_6_k1*PRAS40*Akt_pT308_pS473; reaction_6 is "PRAS40_T246_phosphorylation_by_Akt_pT308_pS473";
    reaction_6_k1 = 0.000100001;
  Akt_pT308_dephosphorylation: Akt_pT308 => Akt; Cytoplasm*Akt_pT308_dephosphorylation_k1*Akt_pT308;
    Akt_pT308_dephosphorylation_k1 = 4.0739;
  reaction_7: TSC_clx + mTORC1_pS2448 => TSC_clx + mTORC1; Cytoplasm*reaction_7_k1*mTORC1_pS2448*TSC_clx; reaction_7 is "mTORC1_pS2448_dephosphorylation_by_TSC_clx";
    reaction_7_k1 = 0.999989;
  reaction_8: Akt_pT308 + PRAS40 => Akt_pT308 + PRAS40_pT246; Cytoplasm*reaction_8_k1*PRAS40*Akt_pT308; reaction_8 is "PRAS40_T246_phosphorylation_by_Akt_pT308";
    reaction_8_k1 = 0.0239178;
  TSC_p_clx_dephosphorylation: TSC_p_clx => TSC_clx; Cytoplasm*TSC_p_clx_dephosphorylation_k1*TSC_p_clx;
    TSC_p_clx_dephosphorylation_k1 = 0.00812537;

  // Unit definitions:
  unit substance = dimensionless;
  unit time = 60 second;
  unit volume = dimensionless;
end
