// SBML level 3 version 1

model dano2()
  // model units - substance: mmol, time: min, volume: L, extent: mM

  // Compartments:
  compartment default_compartment = 1;

  // Species:
  species ACA in default_compartment = 8.332761;
  species ACAX in default_compartment = 1.312175;
  species ADP in default_compartment = 1.49716;
  species ATP in default_compartment = 2.102839;
  species BPG in default_compartment = 0.0002755111;
  species Glc in default_compartment = 5;
  species GlcX in default_compartment = 6.719449;
  species NAD in default_compartment = 0.65;
  species NADH in default_compartment = 0.3300002;
  species $sink in default_compartment = 0;
  species $source in default_compartment = 0;
  species trioseP in default_compartment = 7.847434;

  // Parameters:
  Atot = 3.6;
  GlcX0 = 24;
  Ki = 1.24464;
  Ktrans = 0.04;
  Ntot = 0.98;
  V1 = 49.1132;
  V2 = 10.5992;
  k0 = 2.82529;
  k10 = 0.869329;
  k3 = 10.2311;
  k4 = 126519;
  k5 = 17.2154;
  k6 = 3.2;
  k7 = 1.5115;
  k8 = 1.87206;
  k9 = 0.690539;
  q = 2.64;
  yvol = 59;

  // Reactions:
  v_1: $source -> GlcX; k0/yvol*(GlcX0 - GlcX);
  v_10: ACAX -> $sink; (k0 + k10)/yvol*ACAX;
  v_11: ATP -> ADP; k6*ATP;
  v_2: GlcX -> 59 Glc; V1/yvol*GlcX/(Ktrans + GlcX);
  v_3: Glc + 2 ATP -> 2 ADP; k7*Glc*ATP;
  v_4: Glc + 2 ATP -> 2 trioseP + 2 ADP; V2*Glc*ATP/(1 + (ATP/Ki)^q);
  v_5: trioseP + NADH -> NAD; k8*trioseP*NADH;
  v_6: trioseP + NAD -> BPG + NADH; k3*trioseP*NAD;
  v_7: BPG + 2 ADP -> ACA + 2 ATP; k4*BPG*ADP;
  v_8: ACA + NADH -> NAD; k5*ACA*NADH;
  v_9: 59 ACA -> ACAX; k9/yvol*(ACA - ACAX);

  // Unit definitions:
  unit L = litre;
  unit min = 60 second;
  unit mmol = 1e-3 mole;
  unit mM = 1e-3 mole / litre;
end
