// SBML level 3 version 1

model dano3()
  // model units - substance: mmol, time: min, volume: L, extent: mM

  // Compartments:
  compartment default_compartment = 1;

  // Species:
  species ADP in default_compartment = 1.49718;
  species ATP in default_compartment = 2.102827;
  species BPG in default_compartment = 0.0002755097;
  species $sink in default_compartment = 0;
  species trioseP in default_compartment = 5;

  // Parameters:
  Atot = 3.6;
  CGlc = 6.38837;
  CNAD = 0.65;
  CNADH = 0.33;
  Ki = 1.24463685;
  k3t = 6.65022;
  k4 = 126518.5;
  k6 = 3.2;
  k8t = 0.61778;
  q = 2.64;

  // Assignment rules:
  V2t := CGlc*67.7113/6.38837;
  k7t := CGlc*9.65605/6.38837;

  // Reactions:
  v_1: 2 ATP -> 2 trioseP + 2 ADP; V2t*ATP/(1 + (ATP/Ki)^q);
  v_2: trioseP -> $sink; k8t*trioseP;
  v_3: trioseP -> BPG; k3t*trioseP;
  v_4: BPG + 2 ADP -> 2 ATP; k4*BPG*ADP;
  v_5: ATP -> ADP; k6*ATP;
  v_6: 2 ATP -> 2 ADP; k7t*ATP;

  // Unit definitions:
  unit L = litre;
  unit mM = 1e-3 mole / litre;
  unit mmol = 1e-3 mole;
  unit min = 60 second;
end
