// SBML level 3 version 1

model davis()
  // model units - substance: molecules, time: s, volume: L, extent: moleculesperL

  // Compartments:
  compartment default_compartment = 1;

  // Species:
  species c in default_compartment = 0;
  species e in default_compartment = 1e17;
  species h in default_compartment = 0;
  species in in default_compartment = 2e17;
  species $p in default_compartment = 0;
  species s in default_compartment = 0;
  species $se in default_compartment = 0;

  // Parameters:
  k0 = 5e16;
  k1 = 1e-15;
  k3 = 1e-18;
  km1 = 0.1;
  km2 = 1;
  km3 = 0.001;

  // Reactions:
  v_1: $se -> s; k0;
  v_2: e + s -> c; k1*s*e;
  v_3: c -> e + s; km1*c;
  v_4: c -> e + $p; km2*c;
  v_5: e + in -> h; k3*e*in;
  v_6: h -> e + in; km3*h;

  // Unit definitions:
  unit molecules = 1;
  unit s = second;
  unit L = litre;
  unit moleculesperL = 1 / litre; moleculesperL is "molecules/L";
end
