// SBML level 3 version 1

model devos()

  // Compartments:
  compartment default_compartment = 1;

  // Species:
  species h in default_compartment = 0;
  species hm in default_compartment = 0;
  species hmm in default_compartment = 0;
  species hmmm in default_compartment = 0;
  species $s in default_compartment = 0;
  species $x in default_compartment = 0;
  species $xm in default_compartment = 0;
  species $xmm in default_compartment = 0;
  species $xmmm in default_compartment = 0;

  // Parameters:
  dot = 0.00625;
  k0 = 0.055;
  k1 = 0.019;
  k2 = 0.0087;
  mu = 0.00483333;

  // Assignment rules:
  gamma := mu*125;
  HM := hm/(h + hm + hmm + hmmm);
  H := h/(h + hm + hmm + hmmm);
  HMMM := hmmm/(h + hm + hmm + hmmm);
  HMM := hmm/(h + hm + hmm + hmmm);

  // Reactions:
  v_1: $s -> h; gamma;
  v_2: h -> hm; dot*k0*h;
  v_3: hm -> hmm; dot*k1*hm;
  v_4: hmm -> hmmm; dot*k2*hmm;
  v_5: h -> $x; mu*h;
  v_6: hm -> $xm; mu*hm;
  v_7: hmm -> $xmm; mu*hmm;
  v_8: hmmm -> $xmmm; mu*hmmm;
end
