// SBML level 3 version 1

model eissing()
  // model units - substance: moleculesperL, time: min, volume: cell, extent: moleculespercell

  // Compartments:
  compartment default_compartment = 1;

  // Species:
  species bar in default_compartment = 40000;
  species $breakdown in default_compartment = 1;
  species c3 in default_compartment = 21000;
  species c3a in default_compartment = 0;
  species c3aiap in default_compartment = 0;
  species c8 in default_compartment = 130000;
  species c8a in default_compartment = 5000;
  species c8abar in default_compartment = 0;
  species iap in default_compartment = 40000;

  // Parameters:
  k1 = 5.8e-5;
  k10f = 0.0039;
  k10r = 81.9;
  k11f = 0.0005;
  k11r = 0.21;
  k12f = 0.001;
  k12r = 40;
  k13 = 0.0116;
  k2 = 1e-5;
  k3f = 0.0005;
  k3r = 0.21;
  k4 = 0.0003;
  k5 = 0.0058;
  k6 = 0.0058;
  k7 = 0.0173;
  k8f = 0.0116;
  k8r = 464;
  k9f = 0.0039;
  k9r = 507;

  // Reactions:
  v_1: c3 -> c3a; k1*c8a*c3;  // modifiers: c8a
  v_10: c3 -> $breakdown; k10f*c3 - k10r;
  v_11: c8a + bar -> c8abar; k11f*c8a*bar - k11r*c8abar;
  v_12: bar -> $breakdown; k12f*bar - k12r;
  v_13: c8abar -> $breakdown; k13*c8abar;
  v_2: c8 -> c8a; k2*c3a*c8;  // modifiers: c3a
  v_3: iap + c3a -> c3aiap; k3f*c3a*iap - k3r*c3aiap;
  v_4: iap -> $breakdown; k4*c3a*iap;  // modifiers: c3a
  v_5: c8a -> $breakdown; k5*c8a;
  v_6: c3a -> $breakdown; k6*c3a;
  v_7: c3aiap -> $breakdown; k7*c3aiap;
  v_8: iap -> $breakdown; k8f*iap - k8r;
  v_9: c8 -> $breakdown; k9f*c8 - k9r;

  // Unit definitions:
  unit moleculesperL = 1;
  unit min = 60 second;
  unit moleculespercell = 1; moleculespercell is "molecules/cell";
  unit cell = 1;
end
