// SBML level 3 version 1

function function4(k, Mvar, S)
  k*Mvar*S;
end

function function5(k, Mvar)
  k*Mvar;
end

function function3(k, Mvar, S, Ki, Ivar, h)
  k*Mvar*S/(1 + Ki*Ivar^h);
end

model figueiredo4()

  // Compartments:
  compartment default = 1;

  // Species:
  species A in default = 10;
  species Ap in default = 0;
  species IL10e in default = 0;
  species IL10i in default = 0;
  species IL10m in default = 0;
  species X0 in default = 10;
  species X1 in default = 0;
  species X2 in default = 0;
  species dusp in default = 0;
  species erk in default = 2;
  species erkp in default = 0;
  species $extVar in default = 0;
  species p38 in default = 2;
  species p38p in default = 0;

  // Parameters:
  Ki = 40.8504;
  h = 2.14702;
  k = 10.9349;
  k1 = 0.311361;
  k10 = 32.2813;
  k111 = 0.699176;
  k113 = 0.001;
  k114 = 0.0792189;
  k115 = 12.0329;
  k116 = 0.634692;
  k12 = 54.0458;
  k13 = 0.00640955;
  k15 = 4.12481;
  k17 = 31.2592;
  k18 = 52.7563;
  k19 = 33.1177;
  k2 = 1.72266;
  k4 = 5.2251;
  k6 = 0.0108484;
  parameter4 = 0.006389035;
  parameter5 = 0.044448794;
  parameter6 = 0.001282198;
  stimulus = 1;

  // Reactions:
  v_1: erk -> erkp; function3(k, stimulus, erk, Ki, dusp, h);  // modifiers: dusp
  v_10: X2 -> X1 + Ap; k19*X2;
  v_11: $extVar -> IL10m; function5(k10, X2);  // modifiers: X2
  v_12: IL10m -> $extVar; k111*IL10m;
  v_13: $extVar -> IL10i; function5(k12, IL10m);  // modifiers: IL10m
  v_14: IL10i -> $extVar; k113*IL10i;
  v_15: IL10i -> IL10e; k114*IL10i;
  v_16: IL10e -> $extVar; k115*IL10e;
  v_17: erkp -> dusp; k116*erkp;
  v_2: erkp -> erk; k1*erkp;
  v_3: p38 -> p38p; function4(k2, stimulus, p38);
  v_4: p38p -> p38; k13*p38p;
  v_5: A -> Ap; function4(k4, p38p, A);  // modifiers: p38p
  v_6: Ap -> A; k15*Ap;
  v_7: X0 -> X1; function4(k6, erkp, X0);  // modifiers: erkp
  v_8: X1 -> X0; k17*X1;
  v_9: X1 + Ap -> X2; k18*X1*Ap;
end
