// SBML level 3 version 1

function transcription_and_translation(k, X)
  k*X;
end

function Constant_flux__irreversible(v)
  v;
end
Constant_flux__irreversible is "Constant flux (irreversible)";

model francois1()
  // model units - substance: substance, time: time, volume: volume, area: area, length: length, extent: substance

  // Compartments:
  compartment cell = 1 litre;

  // Species:
  species A in cell = 40;  // substance in mole; CHEBI:36080
  species AB in cell = 0;  // substance in mole; GO:0043234
  species AgB in cell = 0;  // substance in mole; SO:0000704
  species B in cell = 0;  // substance in mole; CHEBI:36080
  species gB in cell = 1;  // substance in mole; SO:0000704
  species rB in cell = 0;  // substance in mole; CHEBI:33699

  // Parameters:
  alpha = 0.001;
  beta = 3;
  deltaA = 0.01;
  deltaAB = 0.01;
  deltaB = 0.01;
  deltar = 0.03;
  gamma = 1;
  rhoA = 100;
  rhob = 5;
  rhof = 0.1;
  theta = 0.04;

  // Reactions:
  A_binds_gB: gB + A => AgB; cell*alpha*A*gB;  // isVersionOf GO:0008134
  basal_transcription_B: => rB; cell*transcription_and_translation(rhof, gB);  // modifiers: gB; isVersionOf GO:0009299
  degradation_A: A => ; cell*deltaA*A;  // isVersionOf GO:0030163
  degradation_B: B => ; cell*deltaB*B;  // isVersionOf GO:0030163
  degradation_dimer: AB => ; cell*deltaAB*AB;  // isVersionOf GO:0030163
  degradation_mRNA_B: rB => ; cell*deltar*rB;  // isVersionOf GO:0006402
  formation_dimer: B + A => AB; cell*gamma*A*B;  // isVersionOf GO:0006461
  gB_releases_A: AgB => gB + A; cell*theta*AgB;
  production_A: => A; cell*Constant_flux__irreversible(rhoA);  // isVersionOf GO:0006412
  stim_transcription_B: => rB; cell*transcription_and_translation(rhob, AgB);  // modifiers: AgB; isVersionOf GO:0009299
  translation_B: => B; cell*transcription_and_translation(beta, rB);  // modifiers: rB; isVersionOf GO:0006412

  // Unit definitions:
  unit substance = item;
  unit time = 60 second;
  unit volume = 1e-12 litre;
  unit area = metre^2;
  unit length = metre;
end
