// SBML level 2 version 4

model fribourg2()

  // Compartments:
  compartment Environment = 1 volume;  // isVersionOf BTO:0000316
  compartment compartment = 1 volume; compartment is "Cell";  // isVersionOf BTO:0002042
  compartment default = 1 volume;

  // Species:
  species IFNa_env in Environment = 0;  // isVersionOf interpro:IPR015589
  species IFNa_mRNA in compartment = 0;  // isVersionOf interpro:IPR015589
  species IFNb_env in Environment = 0;  // isVersionOf interpro:IPR015588
  species IFNb_mRNA in compartment = 0;  // encodes interpro:IPR015588
  species IRF7Pn in compartment = 0;  // isVersionOf uniprot:Q92985
  species IRF7m in compartment = 0;  // encodes uniprot:Q92985
  species SOCS1m in compartment = 0;  // encodes interpro:IPR028411
  species STAT in compartment = 0.1;  // isVersionOf interpro:IPR001217
  species STATP2n in compartment = 0;  // isVersionOf interpro:IPR001217
  species STATm in compartment = 0;  // encodes interpro:IPR001217
  species TNFam in compartment = 0;  // isVersionOf uniprot:P01375
  species TNFenv in Environment = 0;  // isVersionOf uniprot:P01375
  species $w in compartment = 0;

  // Parameters:
  C = 500000 substance;
  K17 = 0.002 substance;
  K19 = 0.004 substance;
  K2 = 72000 substance;
  K20 = 0.0006 substance;
  K3 = 0.0043 substance;
  K5 = 0.01 substance;
  K9 = 780 substance;
  NA = 6.023e23 substance;
  TJtot = 0.0001 substance;
  bm = 4.5 substance;
  delta = 0.0003 substance;
  delta1 = 0.1 substance;
  delta2 = 0.4 substance;
  k11 = 0.00036 substance;
  k12 = 3600 substance;
  k14 = 3.204e-7 substance;
  k15 = 3.6e-5 substance;
  k16 = 3600 substance;
  k26 = 0.360085 substance;
  k28 = 360 substance;
  k8 = 0.0036 substance;
  n1 = 5 substance;
  n2 = 5 substance;
  n3 = 8 substance;
  r0 = 0.003 substance;
  r1 = 0.00025 substance;
  r3 = 1e-7 substance;
  r4 = 1e-6 substance;
  r5 = 1 dimensionless;
  rmax20 = 0.001 substance;
  sp = 0.1 substance;
  sv = 0.1 substance;
  tao1 = 2.5 substance;
  tao12 = 1 substance;
  tao13 = 15 substance;
  tao3 = 0.56 substance;
  tao4 = 0.46 substance;
  tao6 = 1;
  tao8 = 2 substance;
  tao9 = 2 substance;
  vmax17 = 72000 substance;
  vmax19 = 154800 substance;
  vmax2 = 72000 substance;

  // Assignment rules:
  IC2ifa := (1 + 3*sv*(NS/delta2)^n2)/(1 + (NS/delta2)^n2);
  TJ := TJtot*(IFNb_env + IFNa_env)/(K3 + IFNb_env + IFNa_env)*1/(1 + K9*SOCS1m/delta);
  IC2 := (1 + sv*(NS/delta2)^n2)/(1 + (NS/delta2)^n2);
  IC1 := (1 + sp*(NS/delta1)^n1)/(1 + (NS/delta1)^n1);
  NS := r5*time^n3/(bm^n3 + time^n3);

  // Reactions:
  J1: $w => IFNb_mRNA; (r0*IC1 + k15*IRF7Pn)*IC2 - IFNb_mRNA*ln(2)/tao1;  // modifiers: IRF7Pn
  J10: $w => TNFenv; 1000000000*C*vmax19/NA*TNFam/(K19 + TNFam);  // modifiers: TNFam
  J11: $w => STATm; (r4*IC1 + k26*STATP2n)*IC2 - STATm*ln(2)/tao12;  // modifiers: STATP2n
  J12: $w => STAT; k28*STATm - STAT*ln(2)/tao13;  // modifiers: STATm
  J2: $w => IFNb_env; 1000000000*C*vmax2/NA*IFNb_mRNA/(K2 + IFNb_mRNA);  // modifiers: IFNb_mRNA
  J3: $w => STATP2n; K5*TJ*STAT/2/(K5 + STAT) - STATP2n*ln(2)/tao3;  // modifiers: STAT
  J4: $w => SOCS1m; (r3*IC1 + k8*STATP2n)*IC2 - SOCS1m*ln(2)/tao4;  // modifiers: STATP2n
  J5: $w => IRF7m; (k11*STATP2n + k14*IRF7Pn)*IC2 - IRF7m*ln(2)/tao6;  // modifiers: IRF7Pn, STATP2n
  J6: $w => IRF7Pn; k12*IC1*IRF7m;  // modifiers: IRF7m
  J7: $w => IFNa_mRNA; k16*IRF7Pn*IC2ifa - IFNa_mRNA*ln(2)/tao8;  // modifiers: IRF7Pn
  J8: $w => IFNa_env; 1000000000*C*vmax17/NA*IFNa_mRNA/(K17 + IFNa_mRNA);  // modifiers: IFNa_mRNA
  J9: $w => TNFam; (r1*IC1 + rmax20*TNFenv/(K20 + TNFenv))*IC2 - TNFam*ln(2)/tao9;  // modifiers: TNFenv

  // Unit definitions:
  unit time = 3600 second;
  unit length = metre;
  unit area = metre^2;
  unit volume = litre;
  unit substance = 1e-6 mole;
end
