// SBML level 3 version 1

function function_31(Akt, PI3K_inhibitor, active_PI3K, PM, kdphos_pAkt, kphos_PI3KAkt, pAkt)
  (kphos_PI3KAkt*active_PI3K*PI3K_inhibitor*PM*Akt - kdphos_pAkt*pAkt)/PM;
end

function function_11(PM, kf_dpMEK, pMEKcyt)
  kf_dpMEK*pMEKcyt/PM;
end

function function_32(TSC, PM, kdphos_pTSC, kphos_AktTSC, kphos_RSKTSC, pAkt, pRSK, pTSC)
  (kphos_AktTSC*pAkt*TSC + kphos_RSKTSC*pRSK*TSC - kdphos_pTSC*pTSC)/PM;
end

function function_28(Ras_GTP, Ras_Shoc2, Shoc2, PM, kb_Ras_Shoc2, kf_Ras_Shoc2)
  (kf_Ras_Shoc2*Ras_GTP*Shoc2 - kb_Ras_Shoc2*Ras_Shoc2)/PM;
end

function function_25(Nuc, kexport_pYERK, kimport_pYERK, pYERK_cyt, pYERK_nuc)
  kimport_pYERK*pYERK_cyt - Nuc*kexport_pYERK*pYERK_nuc;
end

function function_21(PM, kdphos_pY_np_cyt, pYERK_cyt)
  kdphos_pY_np_cyt*pYERK_cyt/PM;
end

function function_19(PM, kdphos_pTpY_pT_cyt, pTpYERK_cyt)
  kdphos_pTpY_pT_cyt*pTpYERK_cyt/PM;
end

function function_17(MEK_inhibitor, PM, kphos_np_pY, pMEK_ERK_cyt)
  kphos_np_pY*pMEK_ERK_cyt*MEK_inhibitor*PM/PM;
end

function function_16(Km_pERKcyt, PM, kb_pSos, kcat_pERKcyt, kfb_ppppSos, pTpYERK_cyt, pppSos, ppppSos)
  kfb_ppppSos*(kcat_pERKcyt*pppSos*pTpYERK_cyt/(Km_pERKcyt + pppSos) - kb_pSos*ppppSos)/PM;
end

function function_13(Km_pERKcyt, Sos1_2, PM, kb_pSos, kcat_pERKcyt, kf_pSos, pSos, pTpYERK_cyt)
  (kf_pSos*kcat_pERKcyt*Sos1_2*pTpYERK_cyt/(Km_pERKcyt + Sos1_2) - kb_pSos*pSos)/PM;
end

function function_9(Nuc, kexport_pTpYERK, kimport_pTpYERK, pTpYERK_cyt, pTpYERK_nuc)
  kimport_pTpYERK*pTpYERK_cyt - Nuc*kexport_pTpYERK*pTpYERK_nuc;
end

function function_33(Rheb_GDP, Rheb_GTP, TSC, PM, kact_Rheb, kdact_TSCRheb)
  (kdact_TSCRheb*TSC*Rheb_GTP - kact_Rheb*Rheb_GDP)/PM;
end

function function_29(Ras_Shoc2, Ras_Shoc2_cRaf, PM, cRaf, kb_RasRaf_Shoc2, kf_RasRaf_Shoc2)
  (kf_RasRaf_Shoc2*Ras_Shoc2*cRaf - kb_RasRaf_Shoc2*Ras_Shoc2_cRaf)/PM;
end

function function_26(Nuc, kexport_pTERK, kimport_pTERK, pTERK_cyt, pTERK_nuc)
  kimport_pTERK*pTERK_cyt - Nuc*kexport_pTERK*pTERK_nuc;
end

function function_24(MEK_inhibitor, PM, kphos_pT_pTpY, pMEKcyt, pTERK_cyt)
  kphos_pT_pTpY*pMEKcyt*MEK_inhibitor*PM*pTERK_cyt/PM;
end

function function_23(MEK_inhibitor, PM, kphos_pY_pTpY, pMEKcyt, pYERK_cyt)
  kphos_pY_pTpY*pYERK_cyt*pMEKcyt*MEK_inhibitor*PM/PM;
end

function function_22(PM, kdphos_pT_np_cyt, pTERK_cyt)
  kdphos_pT_np_cyt*pTERK_cyt/PM;
end

function function_20(PM, kdphos_pTpY_pY_cyt, pTpYERK_cyt)
  kdphos_pTpY_pY_cyt*pTpYERK_cyt/PM;
end

function function_18(MEK_inhibitor, PM, kphos_pY_pTpY_MEKERK, pMEK_pYERK)
  kphos_pY_pTpY_MEKERK*pMEK_pYERK*MEK_inhibitor*PM/PM;
end

function function_15(Km_pERKcyt, PM, kb_pSos, kcat_pERKcyt, kfb_pppSos, pTpYERK_cyt, ppSos, pppSos)
  kfb_pppSos*(kcat_pERKcyt*ppSos*pTpYERK_cyt/(Km_pERKcyt + ppSos) - kb_pSos*pppSos)/PM;
end

function function_14(Km_pERKcyt, PM, kb_pSos, kcat_pERKcyt, kfb_ppSos, pSos, pTpYERK_cyt, ppSos)
  kfb_ppSos*(kcat_pERKcyt*pSos*pTpYERK_cyt/(Km_pERKcyt + pSos) - kb_pSos*ppSos)/PM;
end

function function_7(ERKcyt, MEK_ERK_cyt, MEKcyt, PM, kb_MEKERK, kf_MEKERK)
  (kf_MEKERK*MEKcyt*ERKcyt - kb_MEKERK*MEK_ERK_cyt)/PM;
end

function function_36(Rheb_GTP, PM, cRaf, inactive_cRaf, kact_RhebRaf, kdact_RhebRaf)
  (kdact_RhebRaf*Rheb_GTP*cRaf - kact_RhebRaf*inactive_cRaf)/PM;
end

function function_1(EGF, EGFR, kf_EGFEGFR, kphos_EGFR_mutant)
  kf_EGFEGFR*EGF*EGFR + kphos_EGFR_mutant*EGFR;
end

function function_5(RasGAP, Ras_GTP, PM, kf_RasGAP, mutated_Ras)
  kf_RasGAP*(Ras_GTP - mutated_Ras)*RasGAP/PM;
end

function function_10(ERKcyt, ERKnuc, Nuc, kexport_ERK, kimport_ERK)
  kimport_ERK*ERKcyt - Nuc*kexport_ERK*ERKnuc;
end

function function_8(ERKcyt, PM, kb_MEKERK, kf_MEKERK, pMEK_ERK_cyt, pMEKcyt)
  (kf_MEKERK*ERKcyt*pMEKcyt - kb_MEKERK*pMEK_ERK_cyt)/PM;
end

function function_6(Ras_GTP, Ras_Raf, PM, cRaf, kb_RasRaf, kf_RasRaf)
  (kf_RasRaf*cRaf*Ras_GTP - kb_RasRaf*Ras_Raf)/PM;
end

function function_38(PI3K_inhibitor, active_PI3K, PM, inactive_cRaf, kact_PI3KRaf)
  kact_PI3KRaf*active_PI3K*PI3K_inhibitor*PM*inactive_cRaf/PM;
end

function function_35(RSK, PM, kdphos_pRSK, kphos_ERKRSK, pRSK, pTpYERK_cyt)
  (kphos_ERKRSK*pTpYERK_cyt*RSK - kdphos_pRSK*pRSK)/PM;
end

function function_37(EGF_EGFR, PM, kf_degra_ERKEGFR, pTpYERK_cyt)
  kf_degra_ERKEGFR*pTpYERK_cyt*EGF_EGFR/PM;
end

function function_27(BRaf, BRaf_inhibitor, MEKcyt, Ras_Raf, Ras_Shoc2_cRaf, PM, kf_pMEK, kphos_BRafMEK)
  (kf_pMEK*(Ras_Raf + Ras_Shoc2_cRaf)*MEKcyt + kphos_BRafMEK*BRaf*BRaf_inhibitor*PM)/PM;
end

function function_4(EGFR_Sos, RasGEF, Ras_GDP, PM, kf_RasGEF, kf_Sos_Ras)
  (kf_Sos_Ras*EGFR_Sos*Ras_GDP + kf_RasGEF*RasGEF*Ras_GDP)/PM;
end

function function_3(EGFR_Sos, EGFR_inhibitor, EGF_EGFR, Sos1_2, PM, kb_Sos, kf_Sos)
  (kf_Sos*EGF_EGFR*EGFR_inhibitor*PM*Sos1_2 - kb_Sos*EGFR_Sos)/PM;
end

function function_2(EGF_EGFR, PM, degra_EGF_pEGFR, kb_degra, kf_degra)
  (kf_degra*EGF_EGFR - kb_degra*degra_EGF_pEGFR)/PM;
end

function function_12(RasEffector, RassEffector, Ras_GTP, PM, kb_RasEffector, kf_RasEffector)
  (kf_RasEffector*Ras_GTP*RasEffector - kb_RasEffector*RassEffector)/PM;
end

function function_30(EGFR_inhibitor, EGF_EGFR, PI3K, Ras_GTP, active_PI3K, PM, kact_EGFRRasPI3K, kdact_PI3K, mutated_PI3K)
  (kact_EGFRRasPI3K*EGF_EGFR*Ras_GTP*EGFR_inhibitor*PM*PI3K - kdact_PI3K*(active_PI3K - mutated_PI3K))/PM;
end

function function_34(Rheb_GTP, S6K, PM, kdphos_pS6K, kphos_RhebS6K, pS6K)
  (kphos_RhebS6K*Rheb_GTP*S6K - kdphos_pS6K*pS6K)/PM;
end

model fujita()

  // Compartments:
  compartment PM = 1;
  compartment Nuc = 0.2;
  compartment default = 1;

  // Species:
  species Akt in PM = 1;
  species BRaf in PM = 0;
  species BRaf_inhibitor in PM = 1;
  species $EGF in default = 0;
  species EGFR in PM = 0.42;
  species EGFR_Sos in PM = 0;
  species EGFR_inhibitor in PM = 1;
  species EGF_EGFR in PM = 0;
  species ERKcyt in PM = 0.96;
  species ERKnuc in Nuc = 0;
  species MEK_ERK_cyt in PM = 0;
  species MEK_inhibitor in PM = 1;
  species MEKcyt in PM = 1.4;
  species PI3K in PM = 1;
  species PI3K_inhibitor in PM = 1;
  species RSK in PM = 1;
  species RasEffector in PM = 2;
  species RasGAP in PM = 1;
  species RasGEF in PM = 1;
  species Ras_GDP in PM = 0.43;
  species Ras_GTP in PM = 0;
  species Ras_Raf in PM = 0;
  species Ras_Shoc2 in PM = 0;
  species Ras_Shoc2_cRaf in PM = 0;
  species RassEffector in PM = 0;
  species Rheb_GDP in PM = 1;
  species Rheb_GTP in PM = 0;
  species S6K in PM = 1;
  species Shoc2 in PM = 0.67;
  species Sos1_2 in PM = 0.12;
  species TSC in PM = 1;
  species active_PI3K in PM = 0;
  species cRaf in PM = 0.013;
  species degra_EGF_pEGFR in PM = 0;
  species inactive_cRaf in PM = 0;
  species mutated_PI3K in PM = 0;
  species mutated_Ras in PM = 0;
  species pAkt in PM = 0;
  species pMEK_ERK_cyt in PM = 0;
  species pMEK_pYERK in PM = 0;
  species pMEKcyt in PM = 0;
  species pRSK in PM = 0;
  species pS6K in PM = 0;
  species pSos in PM = 0;
  species pTERK_cyt in PM = 0;
  species pTERK_nuc in Nuc = 0;
  species pTSC in PM = 0;
  species pTpYERK_cyt in PM = 0;
  species pTpYERK_nuc in Nuc = 0;
  species pYERK_cyt in PM = 0;
  species pYERK_nuc in Nuc = 0;
  species ppSos in PM = 0;
  species pppSos in PM = 0;
  species ppppSos in PM = 0;

  // Parameters:
  Km_pERKcyt = 3;
  kact_EGFRRasPI3K = 3;
  kact_PI3KRaf = 1.8;
  kact_Rheb = 0.0021;
  kact_RhebRaf = 0.04;
  kb_MEKERK = 0.27;
  kb_RafMEK = 0.065;
  kb_RasEffector = 0.1;
  kb_RasRaf = 0.0049;
  kb_RasRaf_Shoc2 = 0.049;
  kb_Ras_Shoc2 = 0.1;
  kb_Sos = 0.1;
  kb_degra = 0.001;
  kb_pSos = 0.0025;
  kcat_pERKcyt = 0.075;
  kdact_PI3K = 0.028;
  kdact_RhebRaf = 4;
  kdact_TSCRheb = 0.097;
  kdphos_pAkt = 0.048;
  kdphos_pRSK = 0.3;
  kdphos_pS6K = 0.001;
  kdphos_pTSC = 0.0088;
  kdphos_pT_np_cyt = 0.0068;
  kdphos_pT_np_nuc = 0.0058;
  kdphos_pTpY_pT_cyt = 0.0055;
  kdphos_pTpY_pT_nuc = 0.0038;
  kdphos_pTpY_pY_cyt = 0.004;
  kdphos_pTpY_pY_nuc = 0.0032;
  kdphos_pY_np_cyt = 0.0067;
  kdphos_pY_np_nuc = 0.0077;
  kexport_ERK = 0.013;
  kexport_pTERK = 0.049;
  kexport_pTpYERK = 0.0076;
  kexport_pYERK = 0.017;
  kf_EGFEGFR = 10;
  kf_MEKERK = 0.18;
  kf_RafMEK = 0.65;
  kf_RasEffector = 1;
  kf_RasGAP = 0.05;
  kf_RasGEF = 9e-5;
  kf_RasRaf = 0.049;
  kf_RasRaf_Shoc2 = 0.49;
  kf_Ras_Shoc2 = 1;
  kf_Sos = 0.1;
  kf_Sos_Ras = 1;
  kf_degra = 0.0014;
  kf_degra_ERKEGFR = 0.02;
  kf_dpMEK = 0.0096;
  kf_pMEK = 2;
  kf_pSos = 1;
  kfb_ppSos = 1;
  kfb_pppSos = 1;
  kfb_ppppSos = 1;
  kimport_ERK = 0.0017;
  kimport_pTERK = 0.0022;
  kimport_pTpYERK = 0.0082;
  kimport_pYERK = 0.0025;
  kphos_AktTSC = 1.2;
  kphos_BRafMEK = 0.01;
  kphos_EGFR_mutant = 0;
  kphos_ERKRSK = 0.7;
  kphos_PI3KAkt = 0.1;
  kphos_RSKTSC = 0.6;
  kphos_RhebS6K = 0.002;
  kphos_np_pY = 0.073;
  kphos_pT_pTpY = 0.02;
  kphos_pY_pTpY = 0.02;
  kphos_pY_pTpY_MEKERK = 0.05;

  // Reactions:
  re1: EGFR + $EGF => EGF_EGFR; function_1(EGF, EGFR, kf_EGFEGFR, kphos_EGFR_mutant);
  re12: pMEKcyt + ERKcyt => pMEK_ERK_cyt; PM*function_8(ERKcyt, PM, kb_MEKERK, kf_MEKERK, pMEK_ERK_cyt, pMEKcyt);
  re15: pTpYERK_cyt => pTpYERK_nuc; function_9(Nuc, kexport_pTpYERK, kimport_pTpYERK, pTpYERK_cyt, pTpYERK_nuc);
  re16: ERKcyt => ERKnuc; function_10(ERKcyt, ERKnuc, Nuc, kexport_ERK, kimport_ERK);
  re2: EGF_EGFR => degra_EGF_pEGFR; PM*function_2(EGF_EGFR, PM, degra_EGF_pEGFR, kb_degra, kf_degra);
  re22: pMEKcyt => MEKcyt; PM*function_11(PM, kf_dpMEK, pMEKcyt);
  re27: RasEffector + Ras_GTP => RassEffector; PM*function_12(RasEffector, RassEffector, Ras_GTP, PM, kb_RasEffector, kf_RasEffector);
  re28: Sos1_2 => pSos; PM*function_13(Km_pERKcyt, Sos1_2, PM, kb_pSos, kcat_pERKcyt, kf_pSos, pSos, pTpYERK_cyt);  // modifiers: pTpYERK_cyt
  re3: Sos1_2 + EGF_EGFR => EGFR_Sos; PM*function_3(EGFR_Sos, EGFR_inhibitor, EGF_EGFR, Sos1_2, PM, kb_Sos, kf_Sos);  // modifiers: EGFR_inhibitor
  re30: pSos => ppSos; PM*function_14(Km_pERKcyt, PM, kb_pSos, kcat_pERKcyt, kfb_ppSos, pSos, pTpYERK_cyt, ppSos);  // modifiers: pTpYERK_cyt
  re31: ppSos => pppSos; PM*function_15(Km_pERKcyt, PM, kb_pSos, kcat_pERKcyt, kfb_pppSos, pTpYERK_cyt, ppSos, pppSos);  // modifiers: pTpYERK_cyt
  re32: pppSos => ppppSos; PM*function_16(Km_pERKcyt, PM, kb_pSos, kcat_pERKcyt, kfb_ppppSos, pTpYERK_cyt, pppSos, ppppSos);  // modifiers: pTpYERK_cyt
  re4: Ras_GDP => Ras_GTP; PM*function_4(EGFR_Sos, RasGEF, Ras_GDP, PM, kf_RasGEF, kf_Sos_Ras);  // modifiers: RasGEF, EGFR_Sos
  re42: pMEK_ERK_cyt => pMEK_pYERK; PM*function_17(MEK_inhibitor, PM, kphos_np_pY, pMEK_ERK_cyt);  // modifiers: MEK_inhibitor
  re43: pMEK_pYERK => pMEKcyt + pTpYERK_cyt; PM*function_18(MEK_inhibitor, PM, kphos_pY_pTpY_MEKERK, pMEK_pYERK);  // modifiers: MEK_inhibitor
  re44: pTpYERK_cyt => pTERK_cyt; PM*function_19(PM, kdphos_pTpY_pT_cyt, pTpYERK_cyt);
  re45: pTpYERK_cyt => pYERK_cyt; PM*function_20(PM, kdphos_pTpY_pY_cyt, pTpYERK_cyt);
  re46: pYERK_cyt => ERKcyt; PM*function_21(PM, kdphos_pY_np_cyt, pYERK_cyt);
  re47: pTERK_cyt => ERKcyt; PM*function_22(PM, kdphos_pT_np_cyt, pTERK_cyt);
  re48: pYERK_cyt => pTpYERK_cyt; PM*function_23(MEK_inhibitor, PM, kphos_pY_pTpY, pMEKcyt, pYERK_cyt);  // modifiers: MEK_inhibitor, pMEKcyt
  re49: pTERK_cyt => pTpYERK_cyt; PM*function_24(MEK_inhibitor, PM, kphos_pT_pTpY, pMEKcyt, pTERK_cyt);  // modifiers: MEK_inhibitor, pMEKcyt
  re5: Ras_GTP => Ras_GDP; PM*function_5(RasGAP, Ras_GTP, PM, kf_RasGAP, mutated_Ras);  // modifiers: mutated_Ras, RasGAP
  re50: pYERK_cyt => pYERK_nuc; function_25(Nuc, kexport_pYERK, kimport_pYERK, pYERK_cyt, pYERK_nuc);
  re51: pTERK_cyt => pTERK_nuc; function_26(Nuc, kexport_pTERK, kimport_pTERK, pTERK_cyt, pTERK_nuc);
  re52: pTpYERK_nuc => pYERK_nuc; Nuc*kdphos_pTpY_pY_nuc*pTpYERK_nuc;
  re53: pTpYERK_nuc => pTERK_nuc; Nuc*kdphos_pTpY_pT_nuc*pTpYERK_nuc;
  re54: pYERK_nuc => ERKnuc; Nuc*kdphos_pY_np_nuc*pYERK_nuc;
  re55: pTERK_nuc => ERKnuc; Nuc*kdphos_pT_np_nuc*pTERK_nuc;
  re56: MEKcyt => pMEKcyt; PM*function_27(BRaf, BRaf_inhibitor, MEKcyt, Ras_Raf, Ras_Shoc2_cRaf, PM, kf_pMEK, kphos_BRafMEK);  // modifiers: BRaf_inhibitor, BRaf, Ras_Shoc2_cRaf, Ras_Raf
  re57: Shoc2 + Ras_GTP => Ras_Shoc2; PM*function_28(Ras_GTP, Ras_Shoc2, Shoc2, PM, kb_Ras_Shoc2, kf_Ras_Shoc2);
  re58: cRaf + Ras_Shoc2 => Ras_Shoc2_cRaf; PM*function_29(Ras_Shoc2, Ras_Shoc2_cRaf, PM, cRaf, kb_RasRaf_Shoc2, kf_RasRaf_Shoc2);
  re6: cRaf + Ras_GTP => Ras_Raf; PM*function_6(Ras_GTP, Ras_Raf, PM, cRaf, kb_RasRaf, kf_RasRaf);
  re62: PI3K => active_PI3K; PM*function_30(EGFR_inhibitor, EGF_EGFR, PI3K, Ras_GTP, active_PI3K, PM, kact_EGFRRasPI3K, kdact_PI3K, mutated_PI3K);  // modifiers: Ras_GTP, mutated_PI3K, EGFR_inhibitor, EGF_EGFR
  re63: Akt => pAkt; PM*function_31(Akt, PI3K_inhibitor, active_PI3K, PM, kdphos_pAkt, kphos_PI3KAkt, pAkt);  // modifiers: PI3K_inhibitor, active_PI3K
  re64: TSC => pTSC; PM*function_32(TSC, PM, kdphos_pTSC, kphos_AktTSC, kphos_RSKTSC, pAkt, pRSK, pTSC);  // modifiers: pRSK, pAkt
  re65: Rheb_GTP => Rheb_GDP; PM*function_33(Rheb_GDP, Rheb_GTP, TSC, PM, kact_Rheb, kdact_TSCRheb);  // modifiers: TSC
  re66: S6K => pS6K; PM*function_34(Rheb_GTP, S6K, PM, kdphos_pS6K, kphos_RhebS6K, pS6K);  // modifiers: Rheb_GTP
  re67: RSK => pRSK; PM*function_35(RSK, PM, kdphos_pRSK, kphos_ERKRSK, pRSK, pTpYERK_cyt);  // modifiers: pTpYERK_cyt
  re68: cRaf => inactive_cRaf; PM*function_36(Rheb_GTP, PM, cRaf, inactive_cRaf, kact_RhebRaf, kdact_RhebRaf);  // modifiers: Rheb_GTP
  re69: EGF_EGFR => degra_EGF_pEGFR; PM*function_37(EGF_EGFR, PM, kf_degra_ERKEGFR, pTpYERK_cyt);  // modifiers: pTpYERK_cyt
  re70: inactive_cRaf => cRaf; PM*function_38(PI3K_inhibitor, active_PI3K, PM, inactive_cRaf, kact_PI3KRaf);  // modifiers: PI3K_inhibitor, active_PI3K
  re9: ERKcyt + MEKcyt => MEK_ERK_cyt; PM*function_7(ERKcyt, MEK_ERK_cyt, MEKcyt, PM, kb_MEKERK, kf_MEKERK);

  // Events:
  EGFtrig: at (time == 6000), t0=false, persistent=false, fromTrigger=false: EGF = 0.0016;
end
