// SBML level 2 version 1

model fuss1()

  // Compartments:
  compartment default = 1;  // GO:0005623

  // Species:
  species CSK_cytoplasm in default = 1;  // uniprot:P41240
  species Cbp in default = 1;  // isVersionOf uniprot:Q9NWQ8
  species Cbp_P in default = 0;  // isVersionOf uniprot:Q9NWQ8
  species Cbp_P_CSK in default = 0;  // hasPart uniprot:P41240 uniprot:Q9NWQ8
  species PTP in default = 1;  // isVersionOf uniprot:P18433
  species PTP_pY789 in default = 0;  // isVersionOf uniprot:P18433
  species srca in default = 0;  // isVersionOf uniprot:P12931
  species srcc in default = 0;  // isVersionOf uniprot:P12931
  species srci in default = 1;  // isVersionOf uniprot:P12931
  species srco in default = 0;  // isVersionOf uniprot:P12931

  // Parameters:
  Kser = 1;
  PTP_background = 0;
  acsk0 = 0;
  k1 = 1;
  k2 = 0.8;
  k3 = 1;
  k4 = 10;
  kCSKoff = 0.01;
  kCSKon = 0.1;
  kCbp = 1;
  kPTP = 1;
  p1 = 0.05;
  p2 = 0.15;
  p3 = 0.035;
  rho_srca = 1;
  rho_srcc = 1;
  rho_srco = 0;
  src_background = 0.0001;

  // Assignment rules:
  ptp_activity := PTP_background + Kser*PTP_pY789;
  src_activity := rho_srco*srco + rho_srca*srca + src_background + rho_srcc*srcc;

  // Reactions:
  CSK_translocation: CSK_cytoplasm + Cbp_P -> Cbp_P_CSK; (Cbp_P*kCSKon*CSK_cytoplasm - kCSKoff*Cbp_P_CSK)*default;  // hasPart GO:0006461 GO:0006612
  Cbp_phosphorylation: Cbp => Cbp_P; kCbp*src_activity*Cbp*default;  // isVersionOf ec-code:2.7.10.2 GO:0004713
  PTP_phosphorylation: PTP -> PTP_pY789; default*((kPTP*src_activity + p3)*PTP - p2*PTP_pY789);  // isVersionOf ec-code:2.7.10.2 GO:0004713
  v1: srci -> srco; (k2*ptp_activity*srci - k1*Cbp_P_CSK*srco)*default;  // modifiers: Cbp_P_CSK; isVersionOf ec-code:2.7.10.2 GO:0004713
  v2: srco -> srca; (k3*src_activity*srco - p1*srca)*default;  // isVersionOf ec-code:2.7.10.2 GO:0004713
  v3: srca -> srcc; (k1*Cbp_P_CSK*srca - k2*ptp_activity*srcc)*default;  // modifiers: Cbp_P_CSK; isVersionOf ec-code:2.7.10.2 GO:0004713
  v4: srcc => srci; default*k4*p1*srcc;  // isVersionOf ec-code:3.1.3.48 GO:0004725
end
