// SBML level 3 version 1

model goldbeter1()

  // Compartments:
  compartment default_compartment = 1;

  // Species:
  species alpha in default_compartment = 100;
  species gamma in default_compartment = 20;
  species $p in default_compartment = 0;
  species $s in default_compartment = 0;

  // Parameters:
  EXTERNAL = 0;
  c = 1e-5;
  el = 1000000;
  ep = 0.9090909;
  es = 0.9090909;
  k1 = 0.7;
  k2 = 3.98;
  k3 = 0.1;
  ve = 1;

  // Reactions:
  v1: $s -> alpha; k1;
  v2: alpha -> gamma; k2*(alpha*es*(1 + alpha*es)*(1 + gamma)^2 + el*ve*alpha*c*ep*(1 + alpha*c*ep))/(el*(1 + alpha*c*ep)^2 + (1 + gamma)^2*(1 + alpha*es)^2);
  v3: gamma -> $p; k3*gamma;
end
