// SBML level 2 version 4

model goldbeter3()

  // Compartments:
  compartment cell = 1;  // GO:0005623

  // Species:
  species C in cell = 0.01; C is "Cyclin";  // isVersionOf interpro:IPR006670
  species M in cell = 0.01; M is "Active CDC-2 Kinase";  // hasVersion uniprot:P24033 uniprot:P35567
  species MI in cell = 0.99; MI is "Inactive CDC-2 Kinase";  // hasVersion uniprot:P24033 uniprot:P35567
  species X in cell = 0.01; X is "Active Cyclin Protease";
  species XI in cell = 0.99; XI is "Inactive Cyclin Protease";

  // Parameters:
  Kc = 0.5;
  VM1 = 3;
  VM3 = 1;

  // Assignment rules:
  V3 := M*VM3;
  V1 := C*VM1*(C + Kc)^(-1);

  // Reactions:
  creation_of_cyclin: => C; cell*vi;  // isVersionOf GO:0006412
    vi = 0.025;
  default_degradation_of_cyclin: C => ; C*cell*kd;  // isVersionOf GO:0008054
    kd = 0.01;
  reaction3: C => ; C*cell*vd*X*(C + Kd)^(-1); reaction3 is "cdc2 kinase triggered degration of cyclin";  // modifiers: X; isVersionOf GO:0008054
    vd = 0.25; Kd = 0.02;
  activation_of_cdc2_kinase: MI => M; cell*MI*V1*(K1 + MI)^(-1);  // isVersionOf ec-code:3.1.3.16 GO:0045737 GO:0006470
    K1 = 0.005;
  deactivation_of_cdc2_kinase: M => MI; cell*M*V2*(K2 + M)^(-1);  // isVersionOf ec-code:2.7.10.2 GO:0045736 GO:0006468
    V2 = 1.5; K2 = 0.005;
  activation_of_cyclin_protease: XI => X; cell*V3*XI*(K3 + XI)^(-1);
    K3 = 0.005;
  deactivation_of_cyclin_protease: X => XI; cell*V4*X*(K4 + X)^(-1);
    K4 = 0.005; V4 = 0.5;
end
