// SBML level 2 version 4

model goldbeter8()

  // Compartments:
  compartment PSM = 1;  // isVersionOf FMA:69072

  // Species:
  species C in PSM = 0.1; C is "CYP26";  // hasProperty GO:0008401 kegg.orthology:K12665 kegg.orthology:K12664 kegg.orthology:K07437
  species F in PSM = 1; F is "FGF";  // hasProperty GO:0005111 GO:0005105 GO:0008083 uniprot:P55075
  species M_C in PSM = 0.1; M_C is "cyp26_mRNA";  // encodes interpro:IPR001128 kegg.compound:C02339 CHEBI:33699
  species M_F in PSM; M_F is "FGF_mRNA";  // isVersionOf CHEBI:33699
  species RA in PSM = 0.1;  // CHEBI:26536

  // Parameters:
  Ka = 0.2 nM;
  Ki = 0.2 nM;
  Kr1 = 1 nM;
  Kr2 = 1 nM;
  L = 50;
  M_0 = 5 nM;
  RALDH2_0 = 7.1 nM;
  V0 = 0.365 nM_per_min;
  Vsc = 7.1 nM_per_min;
  alpha1 has dimensionless;
  alpha2 has dimensionless;
  kd1 = 1 per_nM_per_min;
  kd2 = 0.28 per_min;
  kd3 = 1 per_min;
  kd4 = 1 per_min;
  kd5 = 0 per_min;
  ks1 = 1 per_min;
  ks2 = 1 per_min;
  ks3 = 1 per_min;
  m = 2 dimensionless;
  n = 2 dimensionless;
  rho has dimensionless;
  vs1 has nM_per_min;
  x = 15;

  // Assignment rules:
  alpha1 := RA/(RA + Kr1);
  alpha2 := F/(F + Kr2);
  rho := alpha2/alpha1;
  vs1 := ks1*RALDH2_0*(1 - x/L);
  M_F := M_0*(x/L);

  // Reactions:
  C_decay: C => ; PSM*kd2*C;  // isVersionOf GO:0030163
  C_translation: => C; PSM*ks2*M_C;  // modifiers: M_C; isVersionOf GO:0006412
  FGF_decay: F => ; PSM*kd4*F;  // isVersionOf GO:0030163
  FGF_synthesis: => F; PSM*ks3*M_F*(Ki^m/(Ki^m + RA^m));  // modifiers: RA, M_F; isVersionOf GO:0006412
  M_C_decay: M_C => ; PSM*kd3*M_C;  // isVersionOf GO:0006402
  M_C_transcription: => M_C; PSM*(V0 + Vsc*F^n/(Ka^n + F^n));  // modifiers: F; isVersionOf GO:0009299
  RA_decay: RA => ; PSM*kd5*RA;  // isVersionOf GO:0034653
  RA_deg_by_Cyp26: RA => ; PSM*kd1*RA*C;  // modifiers: C; isVersionOf GO:0034653 reactome:REACT_13550.1 reactome:REACT_13572.1
  RA_synthesis: => RA; PSM*vs1;  // isVersionOf GO:0002138

  // Unit definitions:
  unit nmole = 1e-9 mole;
  unit min = 60 second;
  unit nM = 1e-9 mole / litre;
  unit nM_per_min = 1e-9 mole / (litre * 60 second);
  unit per_nM_per_min = litre / (1e-9 mole * 60 second);
  unit per_min = 1 / (60 second);
  unit arbit_length = dimensionless; arbit_length is "arbit. length";
end
