// SBML level 3 version 1

model gomes()

  // Compartments:
  compartment default_compartment = 1;

  // Species:
  species $Acetol in default_compartment = 0;
  species $DHAP in default_compartment = 2.5;  // kegg.compound:C00111
  species $DLac in default_compartment = 0;  // kegg.compound:C00256
  species $GAP in default_compartment = 0.12;  // kegg.compound:C00118
  species GSH in default_compartment = 4;  // kegg.compound:C00051
  species MGO in default_compartment = 0;  // kegg.compound:C00546
  species SDLGSH in default_compartment = 0;  // kegg.compound:C03451

  // Parameters:
  NADPH = 1.7;
  V1 = 186.45;
  V2 = 8.09;
  V3 = 17.85;
  k1 = 0.01636;
  k2 = 0.00066;
  km1 = 3.56;
  km2 = 1.64;
  km3 = 0.91;
  km4 = 0.65;
  km5 = 0.075;
  kout = 1;

  // Reactions:
  v_1: $DHAP + $GAP -> MGO; k1*GAP + k2*DHAP;
  v_2: MGO + GSH -> SDLGSH; V1*MGO*GSH/((km1 + MGO)*(km2 + GSH));
  v_3: SDLGSH -> GSH + $DLac; V2*SDLGSH/(km3 + SDLGSH);
  v_4: MGO -> $Acetol; V3*NADPH*MGO/((km4 + MGO)*(km5 + NADPH));
end
