// SBML level 3 version 1

model goodman()

  // Compartments:
  compartment default_compartment = 1;

  // Species:
  species Flu in default_compartment = 5;
  species NS1 in default_compartment = 0;
  species P58a in default_compartment = 0;
  species $P58total in default_compartment = 10;
  species PKRp in default_compartment = 0;
  species $PKRtotal in default_compartment = 2;
  species eIF2ap in default_compartment = 0;
  species $eIF2atotal in default_compartment = 2;
  species $ext in default_compartment = 1;

  // Parameters:
  Cflu = 0.075;
  Cns1 = 0.05;
  K = 100;
  r1f = 0.1263;
  r1r = 0.3;
  r1rNS1 = 0.025;
  r2 = 0.0879;
  r3f = 0.0793;
  r3r = 0.0243;
  r4 = 0.052;

  // Reactions:
  v_1: $P58total -> P58a; r2*Flu*(P58total - P58a);  // modifiers: Flu
  v_2: P58a -> $P58total; r4*P58a;
  v_3: $PKRtotal -> PKRp; r1f*Flu*(PKRtotal - PKRp);  // modifiers: Flu
  v_4: PKRp + NS1 -> $PKRtotal; r1rNS1*NS1*PKRp;
  v_5: PKRp -> $PKRtotal; r1r*P58a*PKRp;  // modifiers: P58a
  v_6: $eIF2atotal -> eIF2ap; r3f*(eIF2atotal - eIF2ap)*PKRp;  // modifiers: PKRp
  v_7: eIF2ap -> $eIF2atotal; r3r*eIF2ap;
  v_8: $ext -> Flu; Cflu*Flu*(1 - Flu/K);
  v_9: $ext -> NS1; Cns1*Flu*(eIF2atotal - eIF2ap);  // modifiers: eIF2ap, Flu, eIF2atotal
end
