// SBML level 3 version 1

model gumel1()

  // Compartments:
  compartment default = 1;

  // Species:
  species $EXT in default = 1;
  species Su in default = 500; Su is "Susceptible";
  species Yu in default = 300; Yu is "Untreated infected";
  species Yv in default = 200; Yv is "Treated infected";

  // Parameters:
  Lambda = 1000;
  beta1 = 0.6;
  beta2 = 0.3;
  c = 15;
  d = 0.01;
  gamma = 0.4;
  mu = 0.03125;
  tau = 0.2;

  // Assignment rules:
  lambda := (beta1*Yu + beta2*Yv)/(Su + Yu + Yv);

  // Reactions:
  v_1: $EXT -> Su; mu*Lambda;
  v_2: Su -> $EXT; mu*Su;
  v_3: Su -> Yu; c*lambda*Su;
  v_4: Yu -> $EXT; mu*Yu;
  v_5: Yu -> $EXT; gamma*Yu;
  v_6: Yu -> Yv; tau*Yu;
  v_7: Yv -> $EXT; d*Yv;
  v_8: Yv -> $EXT; mu*Yv;
end
