// SBML level 3 version 1

model gustavsson2()
  // model units - substance: mmol, time: min, volume: L, extent: mM

  // Compartments:
  compartment default_compartment = 1;

  // Species:
  species ACE in default_compartment = 0.004772348;  // kegg.compound:C00084 CHEBI:15343
  species ACEo in default_compartment = 9.326765e-5;  // CHEBI:15343 kegg.compound:C00084
  species AMP in default_compartment = 0.104394;  // kegg.compound:C00020 CHEBI:16027
  species ATP in default_compartment = 3.137594;  // kegg.compound:C00002 CHEBI:15422
  species BPG in default_compartment = 0.000122314;  // kegg.compound:C00236 CHEBI:16001
  species ETOH in default_compartment = 0.1968718;  // CHEBI:16236 kegg.compound:C00469
  species ETOHo in default_compartment = 0.0007376457;  // CHEBI:16236 kegg.compound:C00469
  species F16P in default_compartment = 1.51957;  // CHEBI:16905 kegg.compound:C00354
  species F6P in default_compartment = 0.8654166;  // CHEBI:15946 kegg.compound:C00085
  species G3P in default_compartment = 0.605661;  // kegg.compound:C00093 obo.chebi:CHEBI15978
  species G6P in default_compartment = 3.435353;  // kegg.compound:C00092 obo.chebi:17665
  species GLCi in default_compartment = 0.01627959;  // kegg.compound:C00293 obo.chebi:CHEBI17234
  species NADH in default_compartment = 0.3697;  // kegg.compound:C00004 obo.chebi:16908
  species P2G in default_compartment = 0.007259645;  // kegg.compound:C00631 obo.chebi:17835
  species P3G in default_compartment = 0.06715703;  // kegg.compound:C00197 obo.chebi:17794
  species PEP in default_compartment = 0.009749008;  // obo.chebi:18021 kegg.compound:C00074
  species PYR in default_compartment = 1.36616;  // obo.chebi:15361 kegg.compound:C00022
  species TRIO in default_compartment = 1.40298;  // obo.chebi:CHEBI15978 obo.chebi:CHEBI17138 kegg.compound:C00093 kegg.compound:C00661

  // Parameters:
  ADP has mmol;
  ADPSUM = 4.1 mmol;
  CN = 5;
  CPFKAMP = 0.06190663;
  CPFKATP = 4.119271;
  CPFKF16BP = 0.5087295;
  CPFKF26BP = 0.01664462;
  CiPFKATP = 133.9976;
  EXTERNAL = 0;
  F26BP = 0.02;
  GLCo = 20;
  KATPASE = 7.663031;
  KGLYCOGEN = 0.6579528;
  KPFKAMP = 0.09082401;
  KPFKF16BP = 0.08673033;
  KPFKF26BP = 0.0008094383;
  KSUCC = 15.5244;
  KTREHALOSE = 0.3553268;
  KeqADH = 6.9e-5;
  KeqAK = 0.45;
  KeqALD = 0.069;
  KeqENO = 6.7;
  KeqG3PDH = 4300;
  KeqGAPDH = 0.005626391;
  KeqGLK = 3800;
  KeqGLT = 1;
  KeqPGI = 0.314;
  KeqPGK = 3200;
  KeqPGM = 0.19;
  KeqPYK = 6500;
  KeqTPI = 0.045;
  KiADHACE = 1.102694;
  KiADHETOH = 87.51977;
  KiADHNAD = 0.9940869;
  KiADHNADH = 0.02661121;
  KiPFKATP = 0.672262;
  KmADHACE = 1.086405;
  KmADHETOH = 17.87347;
  KmADHNAD = 0.1731518;
  KmADHNADH = 0.1060281;
  KmALDDHAP = 2.352796;
  KmALDF16P = 0.2899786;
  KmALDGAP = 2.03508;
  KmALDGAPi = 10.10501;
  KmATP = 0.2267754;
  KmENOP2G = 0.03842988;
  KmENOPEP = 0.4871812;
  KmG3PAG3P = 4.367796;
  KmG3PAPhi = 0.7841451;
  KmG3PDHADP = 1.667427;
  KmG3PDHATP = 0.4770416;
  KmG3PDHDHAP = 0.4349458;
  KmG3PDHF16P = 5.393838;
  KmG3PDHG3P = 0.9899047;
  KmG3PDHNAD = 0.864231;
  KmG3PDHNADH = 0.02486643;
  KmGAPDHBPG = 0.01055013;
  KmGAPDHGAP = 0.1260141;
  KmGAPDHNAD = 0.08771569;
  KmGAPDHNADH = 0.05609163;
  KmGLKADP = 0.2630927;
  KmGLKATP = 0.1229529;
  KmGLKG6P = 29.90472;
  KmGLKGLCi = 0.07054484;
  KmGLTGLCi = 1.260196;
  KmGLTGLCo = 1.147811;
  KmPDCPYR = 2.71686;
  KmPFKATP = 0.6393825;
  KmPFKF6P = 0.1364425;
  KmPGIF6P = 0.2888984;
  KmPGIG6P = 1.31112;
  KmPGKADP = 0.1952352;
  KmPGKATP = 0.3071786;
  KmPGKBPG = 0.003016805;
  KmPGKP3G = 0.5153834;
  KmPGMP2G = 0.08169727;
  KmPGMP3G = 1.165312;
  KmPYKADP = 0.4232878;
  KmPYKATP = 1.679326;
  KmPYKPEP = 0.1146875;
  KmPYKPYR = 21.28758;
  L0 = 0.7444282;
  NADSUM = 1;
  Phi = 1.204703;
  VmADH = 329.3106;
  VmAK = 121.2244;
  VmALD = 115.7552;
  VmENO = 276.0122;
  VmG3PA = 86.27574;
  VmG3PDH = 59.60316;
  VmGAPDHf = 279.7172;
  VmGLK = 229.682;
  VmGLT = 35.6054;
  VmPDC = 209.1002;
  VmPFK = 127.5407;
  VmPGI = 274.364;
  VmPGK = 797.961;
  VmPGM = 1591.557;
  VmPYK = 1223.186;
  alpha = 0.91;
  gR = 3.476513;
  kACEt = 810.9169;
  kETOH = 153.0032;
  kHigh = 516190;
  kLACTO = 0.05100107;
  kLow = 258095;
  nATP = 1;
  nPDC = 2.380189;
  t1 = 6.15;

  // Assignment rules:
  NAD := 1*NADSUM - 1*NADH;
  ADP := 1*ADPSUM - 1*AMP - 1*ATP;

  // Reactions:
  v_ACEt: ACE -> 6.34417 ACEo; kACEt*(ACE - ACEo);
  v_ADH: ACE + NADH -> ETOH; -(VmADH*(NAD*ETOH - ACE*NADH/KeqADH)/(KiADHNAD*KmADHETOH*(1 + NAD/KiADHNAD + KmADHNADH*ACE/(KiADHNADH*KmADHACE) + KmADHNADH*NAD*ACE/(KiADHNAD*KiADHNADH*KmADHACE) + KmADHNAD*ETOH/(KiADHNAD*KmADHETOH) + NAD*ETOH/(KiADHNAD*KmADHETOH) + NAD*ACE*ETOH/(KiADHACE*KiADHNAD*KmADHETOH) + NADH/KiADHNADH + ACE*NADH/(KiADHNADH*KmADHACE) + KmADHNAD*ETOH*NADH/(KiADHNAD*KiADHNADH*KmADHETOH) + ACE*ETOH*NADH/(KiADHETOH*KiADHNADH*KmADHACE))));  // kegg.reaction:R00754
  v_AK: -> AMP + ATP; VmAK*(ADP^2 - AMP*ATP/KeqAK);
  v_ALD: F16P -> 2 TRIO; VmALD*(F16P - KeqTPI*TRIO^2/(KeqALD*(1 + KeqTPI)^2))/(KmALDF16P*(1 + F16P/KmALDF16P + TRIO/((1 + KeqTPI)*KmALDDHAP) + KeqTPI*TRIO/((1 + KeqTPI)*KmALDGAP) + KeqTPI*F16P*TRIO/((1 + KeqTPI)*KmALDF16P*KmALDGAPi) + KeqTPI*TRIO^2/((1 + KeqTPI)^2*KmALDDHAP*KmALDGAP)));  // kegg.reaction:R01068
  v_ATP: ATP -> ; KATPASE*ATP^nATP/(KmATP^nATP + ATP^nATP);  // obo.go:0006200
  v_ENO: P2G -> PEP; VmENO*(P2G - PEP/KeqENO)/(KmENOP2G*(1 + P2G/KmENOP2G + PEP/KmENOPEP));  // kegg.reaction:R00658
  v_ETOH: ETOH -> 6.34417 ETOHo; kETOH*(ETOH - ETOHo);
  v_FlowACEo: ACEo -> ; ACEo*piecewise(kLow, time < t1, kHigh);
  v_FlowETOHo: ETOHo -> ; ETOHo*piecewise(kLow, time < t1, kHigh);
  v_G3PA: G3P -> ; VmG3PA*G3P/(KmG3PAG3P*(1 + Phi/KmG3PAPhi)*(1 + G3P/KmG3PAG3P));
  v_G3PDH: NADH + TRIO -> G3P; VmG3PDH*(-(NAD*G3P/KeqG3PDH) + NADH*TRIO/(1 + KeqTPI))/(KmG3PDHDHAP*KmG3PDHNADH*(1 + ADP/KmG3PDHADP + ATP/KmG3PDHATP + F16P/KmG3PDHF16P)*(1 + NAD/KmG3PDHNAD + NADH/KmG3PDHNADH)*(1 + G3P/KmG3PDHG3P + TRIO/((1 + KeqTPI)*KmG3PDHDHAP)));  // modifiers: ATP, F16P
  v_GAPDH: TRIO -> BPG + NADH; (-(VmGAPDHf*BPG*NADH/(KeqGAPDH*KmGAPDHGAP*KmGAPDHNAD)) + KeqTPI*NAD*VmGAPDHf*TRIO/((1 + KeqTPI)*KmGAPDHGAP*KmGAPDHNAD))/((1 + NAD/KmGAPDHNAD + NADH/KmGAPDHNADH)*(1 + BPG/KmGAPDHBPG + KeqTPI*TRIO/((1 + KeqTPI)*KmGAPDHGAP)));  // kegg.reaction:R01061
  v_GLK: ATP + GLCi -> G6P; VmGLK*(-(ADP*G6P/KeqGLK) + ATP*GLCi)/(KmGLKATP*KmGLKGLCi*(1 + ADP/KmGLKADP + ATP/KmGLKATP)*(1 + G6P/KmGLKG6P + GLCi/KmGLKGLCi));  // kegg.reaction:R00299
  v_GLT: -> GLCi; VmGLT*(GLCo - GLCi/KeqGLT)/(KmGLTGLCo*(1 + GLCo/KmGLTGLCo + GLCi/KmGLTGLCi + alpha*GLCo*GLCi/(KmGLTGLCi*KmGLTGLCo)));  // obo.go:0015758
  v_GLYCO: ATP + G6P -> ; KGLYCOGEN*ATP*G6P;
  v_LACTO: ACEo -> ; CN*kLACTO*ACEo;
  v_PDC: PYR -> ACE; VmPDC*PYR^nPDC/(KmPDCPYR^nPDC*(1 + PYR^nPDC/KmPDCPYR^nPDC));  // kegg.reaction:R00224
  v_PFK: ATP + F6P -> F16P; gR*VmPFK*ATP*F6P*(1 + ATP/KmPFKATP + F6P/KmPFKF6P + gR*ATP*F6P/(KmPFKATP*KmPFKF6P))/(KmPFKATP*KmPFKF6P*(L0*(1 + CPFKAMP*AMP/KPFKAMP)^2*(1 + CiPFKATP*ATP/KiPFKATP)^2*(1 + CPFKATP*ATP/KmPFKATP)^2*(1 + CPFKF26BP*F26BP/KPFKF26BP + CPFKF16BP*F16P/KPFKF16BP)^2/((1 + AMP/KPFKAMP)^2*(1 + ATP/KiPFKATP)^2*(1 + F26BP/KPFKF26BP + F16P/KPFKF16BP)^2) + (1 + ATP/KmPFKATP + F6P/KmPFKF6P + gR*ATP*F6P/(KmPFKATP*KmPFKF6P))^2));  // modifiers: AMP; kegg.reaction:R04779
  v_PGI: G6P -> F6P; VmPGI*(-(F6P/KeqPGI) + G6P)/(KmPGIG6P*(1 + F6P/KmPGIF6P + G6P/KmPGIG6P));  // kegg.reaction:R02740
  v_PGK: BPG -> ATP + P3G; VmPGK*(ADP*KeqPGK*BPG - ATP*P3G)/(KmPGKATP*KmPGKP3G*(1 + ADP/KmPGKADP + ATP/KmPGKATP)*(1 + BPG/KmPGKBPG + P3G/KmPGKP3G));  // kegg.reaction:R01512
  v_PGM: P3G -> P2G; VmPGM*(-(P2G/KeqPGM) + P3G)/(KmPGMP3G*(1 + P2G/KmPGMP2G + P3G/KmPGMP3G));  // kegg.reaction:R01518
  v_PYK: PEP -> ATP + PYR; VmPYK*(ADP*PEP - ATP*PYR/KeqPYK)/(KmPYKADP*KmPYKPEP*(1 + ADP/KmPYKADP + ATP/KmPYKATP)*(1 + PEP/KmPYKPEP + PYR/KmPYKPYR));
  v_SUC: 2 ACE + 4 ATP -> 3 NADH; KSUCC*ACE;
  v_Treha: ATP + 2 G6P -> ; KTREHALOSE*ATP*G6P;

  // Unit definitions:
  unit mmol = 1e-3 mole;
  unit min = 60 second;
  unit L = litre;
  unit mM = 1e-3 mole / litre;
end
