// SBML level 3 version 1

model haanstra()

  // Compartments:
  compartment default_compartment = 1;

  // Species:
  species PGKBmRNA in default_compartment = 0;
  species PGKBp in default_compartment = 0;
  species PGKCmRNA in default_compartment = 0;
  species PGKCp in default_compartment = 0;
  species $ext in default_compartment = 0;
  species precur in default_compartment = 0;

  // Parameters:
  kdegrB = 0.092;
  kdegrC = 0.015;
  kdegrp = 0.08;
  kdegrpB = 1e-20;
  kdegrpC = 1e-20;
  ksplic = 0.41;
  ktransl = 13.4;
  mu = 0.0019;
  nribo = 12;
  vtranscr = 0.24;

  // Reactions:
  v_1: $ext -> precur; vtranscr;
  v_10: $ext -> PGKCp; ktransl*nribo*PGKCmRNA;  // modifiers: PGKCmRNA
  v_11: PGKBp -> $ext; mu*PGKBp;
  v_12: PGKCp -> $ext; mu*PGKCp;
  v_13: PGKBp -> $ext; kdegrpB*PGKBp;
  v_14: PGKCp -> $ext; kdegrpC*PGKCp;
  v_2: precur -> PGKBmRNA + PGKCmRNA; ksplic*precur;
  v_3: precur -> $ext; kdegrp*precur;
  v_4: precur -> $ext; mu*precur;
  v_5: PGKBmRNA -> $ext; mu*PGKBmRNA;
  v_6: PGKBmRNA -> $ext; kdegrB*PGKBmRNA;
  v_7: PGKCmRNA -> $ext; mu*PGKCmRNA;
  v_8: PGKCmRNA -> $ext; kdegrC*PGKCmRNA;
  v_9: $ext -> PGKBp; ktransl*nribo*PGKBmRNA;  // modifiers: PGKBmRNA
end
