// SBML level 3 version 1

model haus1()

  // Compartments:
  compartment default_compartment = 1;

  // Species:
  species A in default_compartment = 42.65;
  species AC in default_compartment = 0;
  species Aa in default_compartment = 0;
  species AaC in default_compartment = 0;
  species Ad in default_compartment = 0;
  species Ah in default_compartment = 0;
  species An in default_compartment = 2.66;
  species B in default_compartment = 55.83;
  species BC in default_compartment = 0;
  species Bn in default_compartment = 0;
  species Cf in default_compartment = 0;
  species En in default_compartment = 5.63;
  species $extVariable in default_compartment = 0;

  // Parameters:
  Chemostat = 1;
  Dvar = 0.075;
  G = 40;
  K1 = 0.00158;
  K10 = 1.4e-5;
  K2 = 0.00181;
  K4 = 1.87;
  K8 = 7.92e-6;
  V1 = 4.94;
  V10 = 4.75;
  V2 = 2.92;
  V4 = 22.8;
  V8 = 64.8;
  alpha3 = 0.00517;
  alpha5 = 0.014;
  alpha6 = 0.00537;
  alpha7 = 4790;
  alpha9 = 347000;
  compartment = 1;
  k0 = 0;
  n = 485;
  pstar = 4.5;
  rAd = 0.00547;
  rAdplus = 0.1037;
  rAh = 0.289;
  rAhplus = 2.5594;
  rCf = 0.000324;
  rCfplus = 1.063;

  // Reactions:
  v_1: $extVariable -> AC; 2*V1*G/(K1 + G);
  v_10: $extVariable -> Ad; rAd + rAdplus*(1 - tanh(n*(5.7 - 0.6*tanh(141.9436*0.1846) + 0.6*tanh(-0.1846*(time - 141.9436)) - pstar))) - Dvar*Ad;
  v_11: $extVariable -> Cf; rCf + rCfplus*(1 - tanh(n*(5.7 - 0.6*tanh(141.9436*0.1846) + 0.6*tanh(-0.1846*(time - 141.9436)) - pstar))) - Dvar*Cf;
  v_12: $extVariable -> Ah; rAh + rAhplus*(1 - tanh(n*(5.7 - 0.6*tanh(141.9436*0.1846) + 0.6*tanh(-0.1846*(time - 141.9436)) - pstar))) - Dvar*Ah;
  v_13: AaC -> BC; V10*AaC/(K10 + AaC);
  v_14: AC -> $extVariable; Dvar*AC;
  v_15: A -> $extVariable; Dvar*A;
  v_16: En -> $extVariable; Dvar*En;
  v_17: AaC -> $extVariable; Dvar*AaC;
  v_18: Aa -> $extVariable; Dvar*Aa;
  v_19: BC -> $extVariable; Dvar*BC;
  v_2: AC -> A; V2*AC/(K2 + AC);
  v_20: B -> $extVariable; Dvar*B;
  v_21: An -> $extVariable; Dvar*An;
  v_22: Bn -> $extVariable; Dvar*Bn + 0*AC + 0*A + 0*AaC + 0*B + 0*Aa + 0*BC + 0*En + 0*An + 0*Bn + 0*Ad + 0*Cf + 0*Ah;  // modifiers: A, AaC, Ah, Ad, B, Cf, AC, Aa, BC, En, An
  v_3: A + AaC -> Aa + AC; alpha3*A*AaC*Cf;  // modifiers: Cf
  v_4: AC -> AaC; V4*AC/(K4 + AC);
  v_5: AC -> En; alpha5*AC*Ah;  // modifiers: Ah
  v_6: AaC + B -> Aa + BC; alpha6*B*AaC*Cf;  // modifiers: Cf
  v_7: Aa -> An; alpha7*Aa*Ad;  // modifiers: Ad
  v_8: BC -> B; V8*BC/(K8 + BC);
  v_9: BC -> Bn; alpha9*BC*Ah;  // modifiers: Ah
end
