// SBML level 3 version 1

model heinrich()

  // Compartments:
  compartment default_compartment = 1;

  // Species:
  species ADP in default_compartment;
  species ATP in default_compartment = 1.2;
  species BPG in default_compartment = 0.0005;
  species BPG2 in default_compartment = 5;
  species PEP in default_compartment = 0.02;
  species fATP in default_compartment;
  species $xvar in default_compartment = 0;

  // Parameters:
  A = 1.5;
  Kiatp = 1;
  kATPase = 1.46;
  kHKtoPFK = 3.2;
  kP2GM = 1500;
  kP2Gase = 0.15;
  kPGK = 15700;
  kPK = 559;
  nH = 4;
  qAK = 2;

  // Assignment rules:
  fATP := (1 + (ATP/Kiatp)^nH)^(-1);
  ADP := A*(-qAK/2 + (qAK^2/4 + qAK*ATP/A*(1 - ATP/A))^0.5);

  // Reactions:
  v_1: 2 ATP -> 2 BPG; kHKtoPFK*ATP*(1 + (ATP/Kiatp)^nH)^(-1);
  v_2: BPG -> BPG2; kP2GM*BPG;
  v_3: BPG2 -> PEP; kP2Gase*BPG2;
  v_4: BPG -> ATP + PEP; kPGK*BPG*ADP;  // modifiers: ADP
  v_5: PEP -> ATP; kPK*PEP*ADP;  // modifiers: ADP
  v_6: ATP -> $xvar; kATPase*ATP;
end
