// SBML level 3 version 1

function Protein_binding(k, substratea, substrateb)
  k*substratea*substrateb;
end

function Virus_release_kinetic(k, substrateA, substrateB, KmB, substrateC, KmC, substrateD, KmD, substrateE, KmE, substrateF, KmF, substrateG, KmG, substrateH, KmH)
  k*substrateA*substrateB*substrateC*substrateD*substrateE*substrateF*substrateG*substrateH/((substrateB + KmB)*(substrateC + KmC)*(substrateD + KmD)*(substrateE + KmE)*(substrateF + KmF)*(substrateG + KmG)*(substrateH + KmH));
end

model heldt1()
  // model units - substance: substance, time: time, volume: volume, area: area, length: length, extent: substance

  // Compartments:
  compartment cell = 1 litre;  // GO:0005623

  // Species:
  // free high-affinity binding sites (sites)
  species Bhi in cell = 150;  // substance in mole; hasPart CHEBI:26667
  // nascent cRNA (molecules)
  species Rc in cell = 0;  // substance in mole; isVersionOf GO:0001172 GO:0019022
  // viral polymerase complex (molecules)
  species P_Rdrp in cell = 0;  // substance in mole; isVersionOf GO:0031381
  // complex of viral polymerase and cRNA (molecules)
  species RcRdrp in cell = 0;  // substance in mole; hasPart GO:0031381 GO:0019022
  // NP proteins (molecules)
  species P_Np in cell = 0;  // substance in mole; isVersionOf uniprot:P03466
  // M1 proteins (molecules)
  species P_M1 in cell = 0;  // substance in mole; isVersionOf uniprot:P05777
  // M1-vRNP complexes in the nucleus (virions)
  species VpNucM1 in cell = 0;  // substance in mole; occursIn GO:0030529 uniprot:P05777 GO:0005634
  // M1-vRNP complexes in the cytoplasm (virions)
  species VpCytM1 in cell = 0;  // substance in mole; occursIn GO:0030529 uniprot:P05777 GO:0005737
  // cRNPs (molecules)
  species Cp in cell = 0;  // substance in mole; isVersionOf GO:0030529
  // nascent vRNA (molecules)
  species Rv in cell = 0;  // substance in mole; isPartOf taxonomy:211044
  // complex of viral polymerase and vRNA (molecules)
  species RvRdrp in cell = 0;  // substance in mole; hasPart GO:0031381 GO:0019022
  // virions attached to high-affinity binding sites (virions)
  species VattHi in cell = 0;  // substance in mole; isVersionOf GO:0019012 GO:0019062
  // mRNA of segment 1 (molecules)
  species Rm1 in cell = 0;  // substance in mole
  // mRNA of segment 2 (molecules)
  species Rm2 in cell = 0;  // substance in mole
  // mRNA of segment 3 (molecules)
  species Rm3 in cell = 0;  // substance in mole
  // mRNA of segment 4 (molecules)
  species Rm4 in cell = 0;  // substance in mole
  // mRNA of segment 5 (molecules)
  species Rm5 in cell = 0;  // substance in mole
  // mRNA of segment 6 (molecules)
  species Rm6 in cell = 0;  // substance in mole
  // unspliced mRNA of segment 7 (molecules)
  species Rm7 in cell = 0;  // substance in mole
  // unspliced mRNA of segment 8 (molecules)
  species Rm8 in cell = 0;  // substance in mole
  // PB1 proteins (molecules)
  species P_Pb1 in cell = 0;  // substance in mole; isVersionOf uniprot:P16511
  // PB2 proteins (molecules)
  species P_Pb2 in cell = 0;  // substance in mole; isVersionOf uniprot:P03427
  // virions in the extracellular medium (virions)
  species Vex in cell = 10;  // substance in mole; occursIn GO:0019012 GO:0005576
  // PA proteins (molecules)
  species P_Pa in cell = 0;  // substance in mole; isVersionOf uniprot:P15659
  // NEP proteins (molecules)
  species P_Nep in cell = 0;  // substance in mole; isVersionOf uniprot:P03508
  // HA proteins (molecules)
  species P_Ha in cell = 0;  // substance in mole; isVersionOf uniprot:P03437
  // NA proteins (molecules)
  species P_Na in cell = 0;  // substance in mole; isVersionOf uniprot:P06820
  // M2 proteins (molecules)
  species P_M2 in cell = 0;  // substance in mole; isVersionOf uniprot:P63231
  // total amount of released virions (virions)
  species Vrel in cell = 0;  // substance in mole; isVersionOf GO:0019012
  // total amount of cRNA in the cell considering all segments (molecules)
  species $total_cRNA in cell;  // substance in mole
  // total amount of cRNA in the cell considering an arbitrary segment (molecules)
  species $total_cRNA_of_a_segment in cell;  // substance in mole
  // total amount of vRNA in the cell considering all segments (molecules)
  species $total_vRNA in cell;  // substance in mole
  // total amount of vRNA in the cell considering an arbitrary segments (molecules)
  species $total_vRNA_of_a_segment in cell;  // substance in mole
  // free low-affinity binding sites (sites)
  species Blo in cell = 1000;  // substance in mole
  // virions attached to low-affinity binding sites (virions)
  species VattLo in cell = 0;  // substance in mole; isVersionOf GO:0019012 GO:0019062
  // virions in endosomes (virions)
  species Ven in cell = 0;  // substance in mole; occursIn GO:0019012 GO:0005768
  // total amount of virions fused with endosomes (virions)
  species Vfus in cell = 0;  // substance in mole; isVersionOf GO:0010008 GO:0036338 GO:0039654
  // parental vRNPs in the cytoplasm (virions)
  species VpCyt in cell = 0;  // substance in mole; occursIn GO:0030529 GO:0005737
  // vRNPs in the nucleus (virions)
  species VpNuc in cell = 0;  // substance in mole; occursIn GO:0030529 GO:0005634

  // Parameters:
  // attachment rate of virus particles to high-affinity binding sites (1/(site*h))
  kAttHi = 0.0809;
  // synthesis rate of vRNAs (1/h)
  kSynV = 13.86;
  // synthesis rate of cRNAs (1/h)
  kSynC = 1.38;
  // binding rate of polymerase complexes to cRNA and vRNA (1/(h*molecule))
  kBindRdrp = 1;
  // binding rate of NP to RdRp-cRNA and RdRp-vRNA complexes (1/(h*molecule))
  kBindNp = 0.000301;
  // binding rate of M1 to nuclear vRNPs (1/(h*molecule))
  kBindM1 = 1.39e-6;
  // combined rate of NEP binding to M1-vRNP complexes and subsequent transport out of the nucleus (1/(molecule*h))
  kExp = 1e-6;
  // fraction of protein synthesis rate and distance between two adjacent ribosomes (1/h)
  var kSynP_Drib;
  // formation rate of functional polymerase complexes from the three subunits (1/(h*molecule^2))
  kRdrp = 1;
  // release rate of progeny virions from the cell (virions/(molecule*h))
  kRel = 0.0037;
  // degradation rate of nascent cRNA and vRNA (1/h)
  kDegR = 36.36;
  // attachment rate of virus particles to low-affinity binding sites (1/(site*h))
  kAttLo = 0.000455;
  // degradation rate of RNPs (1/h)
  kDegRnp = 0.09;
  // degradation rate of mRNA (1/h)
  kDegM = 0.33;
  // degradation rate of RdRp-cRNA and RdRp-vRNA complexes (1/h)
  kDegRrdrp = 4.25;
  // fraction of fusion-competent virions (-)
  Ffus = 0.51;
  // distance between two adjacent ribosomes on an mRNA (nucleotides)
  Drib = 160;
  // fraction of spliced M2 mRNAs compared to total mRNAs of segment 7 (-)
  Fspl7 = 0.02;
  // fraction of spliced NEP mRNAs compared to total mRNAs of segment 8 (-)
  Fspl8 = 0.125;
  // synthesis rate of M1 proteins (1/h)
  var kSynP_M1;
  // synthesis rate of M2 proteins (1/h)
  var kSynP_M2;
  // synthesis rate of NEP proteins (1/h)
  var kSynP_NEP;
  // dissociation rate of virions from high-affinity binding sites (1/h)
  var kDisHi;
  // length of segment 1's mRNA encoding PB2 (nucleotides)
  L1 = 2320;
  // length of segment 2's mRNA encoding PB1 (nucleotides)
  L2 = 2320;
  // length of segment 3's mRNA encoding PA (nucleotides)
  L3 = 2211;
  // length of segment 4's mRNA encoding HA (nucleotides)
  L4 = 1757;
  // length of segment 5's mRNA encoding NP (nucleotides)
  L5 = 1540;
  // length of segment 6's mRNA encoding NA (nucleotides)
  L6 = 1392;
  // length of segment 7's unspliced mRNA encoding M1 (nucleotides)
  L7 = 1005;
  // length of segment 8's unspliced mRNA encoding NS1 (nucleotides)
  L8 = 868;
  // synthesis rate of mRNAs (nucleotides/h)
  kSynM = 250000;
  // synthesis rate of segment 1's mRNA (1/h)
  var kSynM1;
  // dissociation rate of virions from low-affinity binding sites (1/h)
  var kDisLo;
  // synthesis rate of segment 2's mRNA (1/h)
  var kSynM2;
  // synthesis rate of segment 3's mRNA (1/h)
  var kSynM3;
  // synthesis rate of segment 4's mRNA (1/h)
  var kSynM4;
  // synthesis rate of segment 5's mRNA (1/h)
  var kSynM5;
  // synthesis rate of segment 6's mRNA (1/h)
  var kSynM6;
  // synthesis rate of segment 7's mRNA (1/h)
  var kSynM7;
  // synthesis rate of segment 8's mRNA (1/h)
  var kSynM8;
  // equilibrium constant for the attachment of virions to the high-affinity binding sites (1/site)
  kEqHi = 0.0113;
  // equilibrium constant for the attachment of virions to the low-affinity binding sites (1/site)
  kEqLo = 8.33e-5;
  // endocytosis rate of virions bound to high-affinity or low-affinity binding sites (1/h)
  kEn = 4.8;
  // fusion rate of virions in late endosomes (1/h)
  kFus = 3.21;
  // degradation rate of virions which do not fuse with the endosomal membrane (1/h)
  var kDegVen;
  // nuclear import rate of cytoplasmic vRNPs which are not bound to M1 (1/h)
  kImp = 6;
  // synthesis rate of proteins (nucleotides/h)
  kSynP = 64800;

  // Assignment rules:
  total_cRNA_of_a_segment := total_cRNA/8;
  total_vRNA_of_a_segment := total_vRNA/8;
  total_cRNA := Rc + RcRdrp + Cp;
  total_vRNA := 8*(VattHi + VattLo + Ven) + VpCyt + VpNuc + Rv + RvRdrp + VpNucM1 + VpCytM1;
  kSynM7 := kSynM/L7/8;
  kSynP_NEP := kSynP/Drib*Fspl8;
  kSynP_M2 := kSynP/Drib*Fspl7;
  kSynM4 := kSynM/L4/8;
  kSynM1 := kSynM/L1/8;
  kSynM3 := kSynM/L3/8;
  kSynM2 := kSynM/L2/8;
  kSynM8 := kSynM/L8/8;
  kSynP_M1 := kSynP/Drib*(1 - Fspl7);
  kSynM6 := kSynM/L6/8;
  kSynM5 := kSynM/L5/8;
  kDegVen := (1 - Ffus)/Ffus*kFus;
  kDisLo := kAttLo/kEqLo;
  kDisHi := kAttHi/kEqHi;
  kSynP_Drib := kSynP/Drib;

  // Reactions:
  reaction_1: Bhi + Vex -> VattHi; cell*(kAttHi*Vex*Bhi - kDisHi*VattHi); reaction_1 is "Binding of virions to high-affinity sites";
  reaction_10: 71 P_Np + RcRdrp => Cp; cell*Protein_binding(kBindNp, RcRdrp, P_Np); reaction_10 is "Binding of NP to RdRp-cRNA complexes";
  reaction_11: 8.5 P_M1 + VpNuc => VpNucM1; cell*Protein_binding(kBindM1, VpNuc, P_M1); reaction_11 is "Binding of M1 to vRNPs in the nucleus";
  Nuclear_export_of_vRNPs: P_Nep + VpNucM1 => VpCytM1; cell*kExp*VpNucM1*P_Nep;
  Synthesis_of_vRNA: Cp => Rv + Cp; cell*kSynV*Cp;
  reaction_14: P_Rdrp + Rv => RvRdrp; cell*kBindRdrp*Rv*P_Rdrp; reaction_14 is "Binding of polymerase to nascent vRNA";
  reaction_15: 71 P_Np + RvRdrp => VpNuc; cell*Protein_binding(kBindNp, RvRdrp, P_Np); reaction_15 is "Binding of NP to RdRp-vRNA complexes";
  Synthesis_of_mRNA_of_segment_1: VpNuc => Rm1 + VpNuc; cell*kSynM1*VpNuc;
  Synthesis_of_mRNA_of_segment_2: VpNuc => Rm2 + VpNuc; cell*kSynM2*VpNuc;
  Synthesis_of_mRNA_of_segment_3: VpNuc => Rm3 + VpNuc; cell*kSynM3*VpNuc;
  Synthesis_of_mRNA_of_segment_4: VpNuc => Rm4 + VpNuc; cell*kSynM4*VpNuc;
  reaction_2: Blo + Vex -> VattLo; cell*(kAttLo*Vex*Blo - kDisLo*VattLo); reaction_2 is "Binding of virions to low-affinity sites";
  Synthesis_of_mRNA_of_segment_5: VpNuc => Rm5 + VpNuc; cell*kSynM5*VpNuc;
  Synthesis_of_mRNA_of_segment_6: VpNuc => Rm6 + VpNuc; cell*kSynM6*VpNuc;
  Synthesis_of_mRNA_of_segment_7: VpNuc => Rm7 + VpNuc; cell*kSynM7*VpNuc;
  Synthesis_of_mRNA_of_segment_8: VpNuc => Rm8 + VpNuc; cell*kSynM8*VpNuc;
  Synthesis_of_PB1: Rm2 => P_Pb1 + Rm2; cell*kSynP_Drib*Rm2;
  Synthesis_of_PB2: Rm1 => P_Pb2 + Rm1; cell*kSynP_Drib*Rm1;
  Synthesis_of_PA: Rm3 => P_Pa + Rm3; cell*kSynP_Drib*Rm3;
  Formation_of_polymerases: P_Pa + P_Pb2 + P_Pb1 => P_Rdrp; cell*kRdrp*P_Pb1*P_Pb2*P_Pa;
  Synthesis_of_NP: Rm5 => P_Np + Rm5; cell*kSynP_Drib*Rm5;
  Synthesis_of_M1: Rm7 => P_M1 + Rm7; cell*kSynP_M1*Rm7;
  reaction_3: VattHi => Bhi + Ven; cell*kEn*VattHi; reaction_3 is "Endocytosis of virions bound to high-affinity sites";
  Synthesis_of_NEP: Rm8 => P_Nep + Rm8; cell*kSynP_NEP*Rm8;
  Synthesis_of_HA: Rm4 => P_Ha + Rm4; cell*kSynP_Drib*Rm4;
  Synthesis_of_NA: Rm6 => P_Na + Rm6; cell*kSynP_Drib*Rm6;
  Synthesis_of_M2: Rm7 => P_M2 + Rm7; cell*kSynP_M2*Rm7;
  Virus_release: 40 P_M2 + 100 P_Na + 500 P_Ha + 157 P_Nep + 2932 P_M1 + 433 P_Np + 37 P_Rdrp + 8 VpCytM1 => Vrel; cell*Virus_release_kinetic(kRel, VpCytM1, P_Rdrp, KmB, P_Ha, KmC, P_Np, KmD, P_Na, KmE, P_M1, KmF, P_M2, KmG, P_Nep, KmH);
    KmH = 1650; KmG = 400; KmF = 30000; KmE = 1000; KmD = 10000; KmC = 5000; KmB = 450;
  reaction_35: VpNuc => ; cell*kDegRnp*VpNuc; reaction_35 is "Degradation of vRNPs in the nucleus";
  Degradation_of_nascent_cRNA: Rc => ; cell*kDegR*Rc;
  Degradation_of_nascent_vRNA: Rv => ; cell*kDegR*Rv;
  Degradation_of_RdRp_cRNA: RcRdrp => ; cell*kDegRrdrp*RcRdrp; Degradation_of_RdRp_cRNA is "Degradation of RdRp-cRNA";
  Degradation_of_RdRp_vRNA: RvRdrp => ; cell*kDegRrdrp*RvRdrp; Degradation_of_RdRp_vRNA is "Degradation of RdRp-vRNA";
  reaction_4: VattLo => Blo + Ven; cell*kEn*VattLo; reaction_4 is "Endocytosis of virions bound to low-affinity sites";
  Degradation_of_cRNPs: Cp => ; cell*kDegRnp*Cp;
  reaction_41: VpNucM1 => ; cell*kDegRnp*VpNucM1; reaction_41 is "Degradation of M1-vRNP complexes in the nucleus";
  reaction_42: VpCytM1 => ; cell*kDegRnp*VpCytM1; reaction_42 is "Degradation of M1-vRNP complexes in the cytoplasm";
  Degradation_of_mRNA_of_segment_1: Rm1 => ; cell*kDegM*Rm1;
  Degradation_of_mRNA_of_segment_2: Rm2 => ; cell*kDegM*Rm2;
  Degradation_of_mRNA_of_segment_3: Rm3 => ; cell*kDegM*Rm3;
  Degradation_of_mRNA_of_segment_4: Rm4 => ; cell*kDegM*Rm4;
  Degradation_of_mRNA_of_segment_5: Rm5 => ; cell*kDegM*Rm5;
  Degradation_of_mRNA_of_segment_6: Rm6 => ; cell*kDegM*Rm6;
  Degradation_of_mRNA_of_segment_7: Rm7 => ; cell*kDegM*Rm7;
  Fusion_of_virions_with_endosomes: Ven => 8 VpCyt + Vfus; cell*kFus*Ven;
  Degradation_of_mRNA_of_segment_8: Rm8 => ; cell*kDegM*Rm8;
  reaction_6: Ven => ; cell*kDegVen*Ven; reaction_6 is "Degradation of virions in endosomes";
  Nuclear_import_of_vRNPs: VpCyt => VpNuc; cell*kImp*VpCyt;
  Synthesis_of_cRNA: VpNuc => Rc + VpNuc; cell*kSynC*VpNuc;
  reaction_9: P_Rdrp + Rc => RcRdrp; cell*kBindRdrp*Rc*P_Rdrp; reaction_9 is "Binding of polymerase to nascent cRNA";

  // Unit definitions:
  unit substance = dimensionless;
  unit time = 3600 second;
  unit volume = dimensionless;
  unit area = metre^2;
  unit length = metre;
end
