// SBML level 3 version 1

model hodgkin()
  // model units - time: ms

  // Compartments:
  compartment default_compartment = 1;

  // Species:
  substanceOnly species V in default_compartment = -60;
  substanceOnly species h in default_compartment = 0.5879153;  // substance in dimensionless
  substanceOnly species m in default_compartment = 0.05809171;  // substance in dimensionless
  substanceOnly species n in default_compartment = 0.3212834;  // substance in dimensionless

  // Parameters:
  EK = -72;
  ELeak = -49.387;
  ENa = 55;
  Q10 = 3;
  T = 6.3;
  ah = 0.07;
  am = 0.1;
  an = 0.01;
  barGk = 36;
  barGleak = 0.3;
  barGna = 120;
  bh = 1;
  bm = 4;
  bn = 0.125;
  delay1 = 0;
  dur1 = 60;
  dur2 = 0;
  kalphah = 20;
  kalpham = 10;
  kalphan = 10;
  kbetah = 10;
  kbetam = 18;
  kbetan = 80;
  stim1 = 6;
  stim2 = 0;
  t1 = 5 ms;
  t2 has ms;
  t3 has ms;
  t4 has ms;
  valphah = -60;
  valpham = -36;
  valphan = -50;
  vbetah = -30;
  vbetam = -60;
  vbetan = -60;

  // Assignment rules:
  t2 := t1 + dur1;
  t3 := t1 + dur1 + delay1;
  t4 := t3 + dur2;
  alphah := Q10^((T - 6.3)/10)*ah*exp(-(V - valphah)/kalphah);
  betan := Q10^((T - 6.3)/10)*bn*exp(-(V - vbetan)/kbetan);
  betah := Q10^((T - 6.3)/10)*bh/(1 + exp(-(V - vbetah)/kbetah));
  alphan := piecewise(Q10^((T - 6.3)/10)*0.1, V == valphan, Q10^((T - 6.3)/10)*an*(V - valphan)/(1 - exp(-(V - valphan)/kalphan)));
  betam := Q10^((T - 6.3)/10)*bm*exp(-(V - vbetam)/kbetam);
  extInput := piecewise(stim1, (t1 <= time) && (time < t2), stim2, (t3 <= time) && (time < t4), 0);
  alpham := piecewise(Q10^((T - 6.3)/10)*0.1, V == valpham, Q10^((T - 6.3)/10)*am*(V - valpham)/(1 - exp(-(V - valpham)/kalpham)));

  // Reactions:
  v_vH: -> h; alphah*(1 - h) - betah*h;
  v_vM: -> m; alpham*(1 - m) - betam*m;
  v_vN: -> n; alphan*(1 - n) - betan*n;
  v_vV: -> V; barGna*m^3*h*(ENa - V) + barGk*n^4*(EK - V) + barGleak*(ELeak - V) + extInput;  // modifiers: h, m, n

  // Unit definitions:
  unit ms = 1e-3 second;
  unit mV = 1e-3 volt;
end
