// SBML level 3 version 1

model hoefnagel1()

  // Compartments:
  compartment default_compartment = 1;

  // Species:
  species $AC in default_compartment = 0.01;
  species ACAL in default_compartment = 0.11;
  species ACCOA in default_compartment = 0.11;
  species ACET in default_compartment = 1e-5;
  species $ACETOUT in default_compartment = 0.001;
  species ACLAC in default_compartment = 1e-5;
  species ACP in default_compartment = 0.03145;
  species ADP in default_compartment = 4.9;
  species ATP in default_compartment = 0.1;
  species $BUT in default_compartment = 0.01;
  species COA in default_compartment = 0.89;
  species $ETOH in default_compartment = 0.1;
  species $GLC in default_compartment = 15;
  species $LAC in default_compartment = 0.1;
  species NAD in default_compartment = 6.33;
  species NADH in default_compartment = 3.67;
  species $O2 in default_compartment = 0.2;
  species $P in default_compartment = 10;
  species PYR in default_compartment = 1;

  // Parameters:
  KATP = 6.196;
  Keq10 = 0.0065;
  Keq11 = 174.217;
  Keq13 = 1;
  Keq14 = 12354.9;
  Keq2 = 21120.69;
  Keq5 = 9000000000000;
  Keq9 = 1400;
  Ki10ACCOA = 0.2;
  Ki10ACP = 0.2;
  Ki10COA = 0.029;
  Ki10P = 2.6;
  Ki12 = 46.4159;
  Km10ACP = 0.7;
  Km10P = 2.6;
  Km11AC = 7;
  Km11ACP = 0.16;
  Km11ADP = 0.5;
  Km11ATP = 0.07;
  Km12ACCOA = 0.008;
  Km12COA = 0.014;
  Km12NAD = 0.4;
  Km12NADH = 0.1;
  Km12PYR = 1;
  Km13ACAL = 10;
  Km13ACCOA = 0.007;
  Km13COA = 0.008;
  Km13NAD = 0.08;
  Km13NADH = 0.025;
  Km14ACAL = 0.03;
  Km14ETOH = 1;
  Km14NAD = 0.08;
  Km14NADH = 0.05;
  Km1ADP = 0.04699;
  Km1ATP = 0.01867;
  Km1GLC = 0.1;
  Km1NAD = 0.1412;
  Km1NADH = 0.08999;
  Km1PYR = 2.5;
  Km2LAC = 100;
  Km2NAD = 2.4;
  Km2NADH = 0.08;
  Km2PYR = 1.5;
  Km4NAD = 1;
  Km4NADH = 0.041;
  Km4O = 0.2;
  Km5ACLAC = 100;
  Km5PYR = 50;
  Km6ACET = 100;
  Km6ACLAC = 10;
  Km7ACET = 5;
  Km9ACET = 0.06;
  Km9BUT = 2.6;
  Km9NAD = 0.16;
  Km9NADH = 0.02;
  Vmax1 = 2397;
  Vmax10 = 42;
  Vmax11 = 2700;
  Vmax12 = 259;
  Vmax13 = 97;
  Vmax14 = 162;
  Vmax2 = 5118;
  Vmax3 = 900;
  Vmax4 = 118;
  Vmax5 = 600;
  Vmax6 = 106;
  Vmax7 = 200;
  Vmax9 = 105;
  h5 = 2.4;
  k8 = 0.0003;
  n3 = 2.58;

  // Reactions:
  v_1: $GLC + 2 NAD + 2 ADP -> 2 PYR + 2 NADH + 2 ATP; Vmax1*(GLC/Km1GLC)*(NAD/Km1NAD)*(ADP/Km1ADP)/((1 + GLC/Km1GLC + PYR/Km1PYR)*(1 + NAD/Km1NAD + NADH/Km1NADH)*(1 + ADP/Km1ADP + ATP/Km1ATP));
  v_10: ACCOA + $P -> ACP + COA; Vmax10/(Ki10ACCOA*Km10P)*(ACCOA*P - ACP*COA/Keq10)/(1 + ACCOA/Ki10ACCOA + P/Ki10P + ACP/Ki10ACP + COA/Ki10COA + ACCOA*P/(Ki10ACCOA*Km10P) + ACP*COA/(Km10ACP*Ki10COA));
  v_11: ACP + ADP -> $AC + ATP; Vmax11*(ACP/Km11ACP)*(ADP/Km11ADP)*(1 - AC*ATP/(ACP*ADP*Keq11))/((1 + ACP/Km11ACP + AC/Km11AC)*(1 + ADP/Km11ADP + ATP/Km11ATP));
  v_12: PYR + NAD + COA -> NADH + ACCOA; Vmax12*(PYR/Km12PYR*(NAD/Km12NAD)*(COA/Km12COA)/((1 + PYR/Km12PYR)*(1 + NAD/Km12NAD + NADH/Km12NADH)*(1 + COA/Km12COA + ACCOA/Km12ACCOA)))*(1/(1 + Ki12*NADH/NAD));
  v_13: NADH + ACCOA -> NAD + COA + ACAL; (Vmax13*NADH*ACCOA/(Km13NADH*Km13ACCOA) - Vmax13*NAD*COA*ACAL/(Km13NADH*Km13ACCOA*Keq13))/((1 + NADH/Km13NADH + NAD/Km13NAD)*(1 + ACCOA/Km13ACCOA + COA/Km13COA)*(1 + ACAL/Km13ACAL));
  v_14: ACAL + NADH -> $ETOH + NAD; Vmax14*(ACAL/Km14ACAL)*(NADH/Km14NADH)*(1 - ETOH*NAD/(ACAL*NADH*Keq14))/((1 + ACAL/Km14ACAL + ETOH/Km14ETOH)*(1 + NADH/Km14NADH + NAD/Km14NAD));
  v_2: PYR + NADH -> $LAC + NAD; Vmax2*(PYR/Km2PYR)*(NADH/Km2NADH)*(1 - LAC*NAD/(PYR*NADH*Keq2))/((1 + PYR/Km2PYR + LAC/Km2LAC)*(1 + NADH/Km2NADH + NAD/Km2NAD));
  v_3: ATP -> ADP + $P; Vmax3*(ATP/ADP)^n3/(KATP^n3 + (ATP/ADP)^n3);
  v_4: NADH + $O2 -> NAD; Vmax4*NADH/Km4NADH*O2/Km4O/((1 + NADH/Km4NADH + NAD/Km4NAD)*(1 + O2/Km4O));
  v_5: 2 PYR -> ACLAC; Vmax5*(PYR/Km5PYR)*(1 - ACLAC/(PYR*Keq5))*(PYR/Km5PYR + ACLAC/Km5ACLAC)^(h5 - 1)/(1 + (PYR/Km5PYR + ACLAC/Km5ACLAC)^h5);
  v_6: ACLAC -> ACET; Vmax6*ACLAC/Km6ACLAC/(1 + ACLAC/Km6ACLAC + ACET/Km6ACET);
  v_7: ACET -> $ACETOUT; Vmax7*ACET/(Km7ACET + ACET);
  v_8: ACLAC -> ACET; k8*ACLAC;
  v_9: ACET + NADH -> $BUT + NAD; Vmax9*(ACET/Km9ACET)*(NADH/Km9NADH)*(1 - BUT*NAD/(ACET*NADH*Keq9))/((1 + ACET/Km9ACET + BUT/Km9BUT)*(1 + NADH/Km9NADH + NAD/Km9NAD));
end
