// SBML level 3 version 1

model hoefnagel_mixedacid()
  // hoefnagel_mixedacid_demo

  // Compartments:
  compartment default_compartment = 1;

  // Species:
  species $AC in default_compartment = 0.01;
  species ACAL in default_compartment = 0.11;
  species ACCOA in default_compartment = 0.11;
  species ACP in default_compartment = 0.03145;
  species ADP in default_compartment = 4.9;
  species ATP in default_compartment = 0.1;
  species COA in default_compartment = 0.89;
  species $ETOH in default_compartment = 0.1;
  species $GLC in default_compartment = 15;
  species $H2CO2 in default_compartment = 1;
  species $LAC in default_compartment = 0.1;
  species NAD in default_compartment = 6.33;
  species NADH in default_compartment = 3.67;
  species $O2 in default_compartment = 0.2;
  species $P in default_compartment = 10;
  species PYR in default_compartment = 1;

  // Parameters:
  KATP = 6.196;
  Keq10 = 0.0065;
  Keq11 = 174.217;
  Keq13 = 1;
  Keq14 = 12354.9;
  Keq2 = 21120.69;
  Keq5 = 9000000000000;
  Keq9 = 1400;
  Ki10ACCOA = 0.2;
  Ki10ACP = 0.2;
  Ki10COA = 0.029;
  Ki10P = 2.6;
  Ki12 = 46.4159;
  Km10ACP = 0.7;
  Km10P = 2.6;
  Km11AC = 7;
  Km11ACP = 0.16;
  Km11ADP = 0.5;
  Km11ATP = 0.07;
  Km12ACCOA = 0.008;
  Km12COA = 0.014;
  Km12NAD = 0.4;
  Km12NADH = 0.1;
  Km12PYR = 1;
  Km13ACAL = 10;
  Km13ACCOA = 0.007;
  Km13COA = 0.008;
  Km13NAD = 0.08;
  Km13NADH = 0.025;
  Km14ACAL = 0.03;
  Km14ETOH = 1;
  Km14NAD = 0.08;
  Km14NADH = 0.05;
  Km1ADP = 0.04699;
  Km1ATP = 0.01867;
  Km1GLC = 0.1;
  Km1NAD = 0.1412;
  Km1NADH = 0.08999;
  Km1PYR = 2.5;
  Km2LAC = 100;
  Km2NAD = 2.4;
  Km2NADH = 0.08;
  Km2PYR = 1.5;
  Km4NAD = 1;
  Km4NADH = 0.041;
  Km4O = 0.2;
  Km5ACLAC = 100;
  Km5PYR = 50;
  Km6ACET = 100;
  Km6ACLAC = 10;
  Km7ACET = 5;
  Km9ACET = 0.06;
  Km9BUT = 2.6;
  Km9NAD = 0.16;
  Km9NADH = 0.02;
  Vmax1 = 2397;
  Vmax10 = 42;
  Vmax11 = 2700;
  Vmax12 = 259;
  Vmax13 = 97;
  Vmax14 = 162;
  Vmax2 = 5118;
  Vmax3 = 900;
  Vmax4 = 118;
  Vmax5 = 600;
  Vmax6 = 106;
  Vmax7 = 200;
  Vmax9 = 105;
  h5 = 2.4;
  k8 = 0.0003;
  kpfl = 10;
  n3 = 2.58;

  // Reactions:
  v_1: ATP -> ADP + $P; Vmax3*(ATP/ADP)^n3/(KATP^n3 + (ATP/ADP)^n3);
  v_2: COA + PYR -> ACCOA + $H2CO2; kpfl*COA*PYR;
  v_3: ACAL + NADH -> $ETOH + NAD; Vmax14*ACAL/Km14ACAL*NADH/Km14NADH*(1 - ETOH*NAD/(ACAL*NADH*Keq14))/((1 + ACAL/Km14ACAL + ETOH/Km14ETOH)*(1 + NADH/Km14NADH + NAD/Km14NAD));
  v_4: $O2 + NADH -> NAD; Vmax4*NADH/Km4NADH*O2/Km4O/((1 + NADH/Km4NADH + NAD/Km4NAD)*(1 + O2/Km4O));
  v_5: $P + ACCOA -> COA + ACP; Vmax10/(Ki10ACCOA*Km10P)*(ACCOA*P - ACP*COA/Keq10)/(1 + ACCOA/Ki10ACCOA + P/Ki10P + ACP/Ki10ACP + COA/Ki10COA + ACCOA*P/(Ki10ACCOA*Km10P) + ACP*COA/(Km10ACP*Ki10COA));
  v_6: ADP + ACP -> ATP + $AC; Vmax11*ACP/Km11ACP*ADP/Km11ADP*(1 - AC*ATP/(ACP*ADP*Keq11))/((1 + ACP/Km11ACP + AC/Km11AC)*(1 + ADP/Km11ADP + ATP/Km11ATP));
  v_7: NADH + PYR -> $LAC + NAD; Vmax2*(PYR/Km2PYR)*(NADH/Km2NADH)*(1 - LAC*NAD/(PYR*NADH*Keq2))/((1 + PYR/Km2PYR + LAC/Km2LAC)*(1 + NADH/Km2NADH + NAD/Km2NAD));
  v_8: ACCOA + NADH -> ACAL + COA + NAD; (Vmax13*NADH*ACCOA/(Km13NADH*Km13ACCOA) - Vmax13*NAD*COA*ACAL/(Km13NADH*Km13ACCOA*Keq13))/((1 + NADH/Km13NADH + NAD/Km13NAD)*(1 + ACCOA/Km13ACCOA + COA/Km13COA)*(1 + ACAL/Km13ACAL));
  v_9: $GLC + 2 NAD + 2 ADP -> 2 PYR + 2 NADH + 2 ATP; Vmax1*(GLC/Km1GLC)*(NAD/Km1NAD)*(ADP/Km1ADP)/((1 + GLC/Km1GLC + PYR/Km1PYR)*(1 + NAD/Km1NAD + NADH/Km1NADH)*(1 + ADP/Km1ADP + ATP/Km1ATP));
end
