// SBML level 2 version 3

model hofmeyr1()

  // Compartments:
  compartment cell = 1;  // GO:0005623

  // Species:
  species A in cell = 0;
  species B in cell = 0;
  species C in cell = 0;
  species D in cell = 0;
  species E in cell = 0;
  species F in cell = 0;
  species $X in cell = 10;
  species $Y in cell = 2;
  species $Z in cell = 1;

  // Reactions:
  R1: $X -> A; cell*((10*X - A)/(1 + X + A + B^2));  // modifiers: B
  R2: A -> B; cell*((2*A - B)/(1 + A + B));
  R3: B -> C; cell*((B - C)/(1 + B + C + D^2));  // modifiers: D
  R4: C -> D; cell*((5*C - D)/(1 + C + D));
  R5: D -> $Y; cell*((10*D - Y)/(1 + D + Y));
  R6: B -> E; cell*((B - E)/(1 + B + E + F^2));  // modifiers: F
  R7: E -> F; cell*((5*E - F)/(1 + E + F));
  R8: F -> $Z; cell*((10*F - Z)/(1 + F + Z));

  // Unit definitions:
  unit substance = dimensionless;
  unit time = dimensionless;
end
