// SBML level 3 version 1

model jabbari()

  // Compartments:
  compartment default_compartment = 1;

  // Species:
  species $G in default_compartment = 1;
  species a in default_compartment = 0;
  species cy in default_compartment = 0;
  species cyg in default_compartment = 0;
  species $extvariable in default_compartment = 0;
  species h in default_compartment = 0;
  species ir in default_compartment = 0;
  species ivar in default_compartment = 0;
  species ka in default_compartment = 0;
  species kap in default_compartment = 0;
  species kas in default_compartment = 0;
  species kb in default_compartment = 0;
  species kbp in default_compartment = 0;
  species pa in default_compartment = 0;
  species par in default_compartment = 0;
  species pe in default_compartment = 0;
  species pint in default_compartment = 0;
  species r in default_compartment = 0;
  species ra in default_compartment = 0;
  species rap in default_compartment = 0;
  species sa in default_compartment = 0;
  species sap in default_compartment = 0;
  species sb in default_compartment = 0;
  species sbp in default_compartment = 0;
  species sd in default_compartment = 0;
  species se in default_compartment = 0;
  species sep in default_compartment = 0;
  species sf in default_compartment = 0;
  species sfp in default_compartment = 0;
  species sigmah in default_compartment = 0;

  // Parameters:
  EXTERNAL = 0;
  alphaa = 0.1;
  alphab = 0.1;
  baa = 1;
  bah = 1;
  bakb = 1;
  base = 1;
  basigmah = 1;
  bcycy = 1;
  bcygkb = 1;
  bcygra = 1;
  betacyg = 0.0001;
  betair = 0.083;
  betakas = 0.083;
  betapar = 0.083;
  bhi = 1;
  bhr = 1;
  bri = 1;
  brkb = 1;
  brr = 1;
  brsa = 1;
  bsapa = 1;
  bsapi = 1;
  bsapka = 1;
  bsapr = 1;
  bsapsa = 1;
  bsapsf = 1;
  bsigmahka = 1;
  bsigmahsa = 1;
  bsigmahsf = 1;
  ca1 = 0.4;
  ca2 = 0.4;
  ccy = 0.4;
  cg = 200;
  ch = 0.4;
  ci = 24;
  cka = 40;
  ckb = 10;
  cq = 0;
  cr1 = 0.42;
  cr3 = 0.783;
  cra = 0.4;
  csa1 = 0.4;
  csa2h = 40;
  csa2l = 0.4;
  csb = 0.4;
  csd = 10;
  cse = 0.4;
  csf1 = 0.4;
  csf2h = 40;
  csf2l = 0.4;
  csigmah = 0.4;
  deltara = 0.0004;
  deltase = 0.0004;
  gAfter = 0;
  gBefore = 10000;
  gTriggerTime = 14400;
  gammacyg = 0.1;
  gammakas = 0.1;
  gammapar = 1;
  lambdaa = 0.002;
  lambdacy = 0.002;
  lambdacyg = 0.002;
  lambdag = 0.02;
  lambdah = 0.002;
  lambdai = 0.02;
  lambdair = 0.002;
  lambdaka = 0.002;
  lambdakap = 0.002;
  lambdakas = 0.002;
  lambdakb = 0.002;
  lambdakbp = 0.002;
  lambdapa = 0.02;
  lambdapar = 0.002;
  lambdape = 0.02;
  lambdapint = 0.02;
  lambdar = 0.002;
  lambdara = 0.002;
  lambdarap = 0.002;
  lambdasa = 0.002;
  lambdasap = 1e-5;
  lambdasb = 0.002;
  lambdasbp = 0.002;
  lambdasd = 0.02;
  lambdase = 0.02;
  lambdasep = 0.02;
  lambdasf = 0.002;
  lambdasfp = 0.002;
  lambdasigmah = 0.0004;
  mue = 1;
  mui = 1;
  phikapsa = 1.7e-8;
  phikapsf = 1e-6;
  phikbpsf = 1e-6;
  phisapsb = 1e-6;
  phisbpsa = 1e-6;
  phisbpsf = 1e-6;
  phisfpkb = 1.7e-8;
  phisfpsb = 1e-6;
  psikap = 0.0004;
  psikbp = 0.0004;
  psirap = 0.0004;
  psisap = 0.0004;
  psisbp = 0.0004;
  psisep = 0.0004;
  psisfp = 0.0004;
  thetah = 1;
  uaa = 20;
  uah = 20;
  uakb = 20;
  uase = 20;
  uasigmah = 20;
  ucycy = 20;
  ucygkb = 20;
  ucygra = 20;
  uhi = 20;
  uhr = 20;
  uri = 20;
  urkb = 20;
  urr = 20;
  ursa = 20;
  usapa = 20;
  usapi = 20;
  usapka = 20;
  usapr = 20;
  usapsa = 20;
  usapsf = 20;
  usigmahka = 20;
  usigmahsa = 20;
  usigmahsf = 20;

  // Reactions:
  v_1: $extvariable -> $G; cg;
  v_10: ka + sd -> kas; betakas*ka*sd;
  v_11: kas -> ka + sd; gammakas*kas;
  v_12: $extvariable -> pint + ra; cra*ucygra/(ucygra + bcygra*cyg);  // modifiers: cyg
  v_13: ra + sfp -> rap + sf; deltara*ra*sfp;
  v_14: pa + ra -> par; betapar*pa*ra;
  v_15: par -> pa + ra; gammapar*par;
  v_16: rap -> ra; psirap*rap;
  v_17: ra -> $extvariable; lambdara*ra;
  v_18: rap -> $extvariable; lambdarap*rap;
  v_19: pint -> pe; mue*pint;
  v_2: $G -> $extvariable; lambdag*piecewise(gAfter, time > gTriggerTime, gBefore);
  v_20: pint -> $extvariable; lambdapint*pint;
  v_21: $extvariable -> pe; cq;
  v_22: pe -> pa; mui*thetah*pe/(thetah + h);  // modifiers: h
  v_23: pe -> $extvariable; lambdape*pe;
  v_24: pa -> $extvariable; lambdapa*pa;
  v_25: par -> $extvariable; lambdapar*par;
  v_26: $extvariable -> 0.5 ka; bsigmahka*cka*usapka*sigmah/((usapka + bsapka*sap)*(usigmahka + bsigmahka*sigmah));  // modifiers: sigmah, sap
  v_27: ka -> kap; alphaa*ka;
  v_28: kap + sf -> ka + sfp; phikapsf*kap*sf;
  v_29: kap + 2 sa -> ka + sap; phikapsa*kap*sa;
  v_3: cy + $G -> cyg; betacyg*cy*piecewise(gAfter, time > gTriggerTime, gBefore);
  v_30: kap -> ka; psikap*kap;
  v_31: ka -> $extvariable; lambdaka*ka;
  v_32: kap -> $extvariable; lambdakap*kap;
  v_33: kas -> $extvariable; lambdakas*kas;
  v_34: $extvariable -> kb; ckb*uakb*ucygkb*urkb/((uakb + bakb*a)*(ucygkb + bcygkb*cyg)*(urkb + brkb*r));  // modifiers: a, cyg, r
  v_35: kb -> kbp; alphab*kb;
  v_36: kbp + sf -> kb + sfp; phikbpsf*kbp*sf;
  v_37: kb + sfp -> kbp + sf; phisfpkb*kb*sfp;
  v_38: kbp -> kb; psikbp*kbp;
  v_39: kb -> $extvariable; lambdakb*kb;
  v_4: cyg -> cy + $G; gammacyg*cyg;
  v_40: kbp -> $extvariable; lambdakbp*kbp;
  v_41: $extvariable -> sf; csf1*usapsf/(usapsf + bsapsf*sap) + (bsigmahsf*csf2l*usapsf*sigmah + bsapsf*bsigmahsf*csf2h*sap*sigmah)/((usapsf + bsapsf*sap)*(usigmahsf + bsigmahsf*sigmah));  // modifiers: sigmah, sap
  v_42: sb + sfp -> sbp + sf; phisfpsb*sb*sfp;
  v_43: sbp + sf -> sb + sfp; phisbpsf*sbp*sf;
  v_44: sfp -> sf; psisfp*sfp;
  v_45: sf -> $extvariable; lambdasf*sf;
  v_46: sfp -> $extvariable; lambdasfp*sfp;
  v_47: $extvariable -> 0.5 sb; csb;
  v_48: sbp + 2 sa -> sap + sb; phisbpsa*sa*sbp;
  v_49: sap + sb -> sbp + 2 sa; phisapsb*sap*sb;
  v_5: $extvariable -> cy; ccy*ucycy/(ucycy + bcycy*cy);
  v_50: sbp -> sb; psisbp*sbp;
  v_51: sb -> $extvariable; lambdasb*sb;
  v_52: sbp -> $extvariable; lambdasbp*sbp;
  v_53: $extvariable -> sa; csa1*usapsa/(usapsa + bsapsa*sap) + (bsigmahsa*csa2l*ursa*usapsa*sigmah + bsapsa*bsigmahsa*csa2h*ursa*sap*sigmah)/((usapsa + bsapsa*sap)*(ursa*usigmahsa + brsa*usigmahsa*r + bsigmahsa*ursa*sigmah));  // modifiers: r, sigmah, sap
  v_54: sap + se -> sep + 2 sa; deltase*sap*se;
  v_55: sap -> 2 sa; psisap*sap;
  v_56: sa -> $extvariable; lambdasa*sa;
  v_57: sap -> $extvariable; lambdasap*sap;
  v_58: $extvariable -> se; cse*uase/(uase + base*a);  // modifiers: a
  v_59: sep -> se; psisep*sep;
  v_6: cy -> $extvariable; lambdacy*cy;
  v_60: se -> $extvariable; lambdase*se;
  v_61: sep -> $extvariable; lambdasep*sep;
  v_62: $extvariable -> 0.25 a; ca1*uaa/(uaa + baa*a) + ca2*usapa/(usapa + bsapa*sap);  // modifiers: sap
  v_63: a -> $extvariable; lambdaa*a;
  v_64: $extvariable -> h; bah*ch*a/(uah + bah*a);  // modifiers: a
  v_65: h -> $extvariable; lambdah*h;
  v_66: $extvariable -> ivar; bsapi*ci*uhi*uri*sap/((uhi + bhi*h)*(uri + bri*r)*(usapi + bsapi*sap));  // modifiers: sap, r, h
  v_67: 0.25 r + ivar -> ir; betair*ivar*r;
  v_68: ivar -> $extvariable; lambdai*ivar;
  v_69: $extvariable -> 0.25 r; cr3 + bsapr*cr1*uhr*urr*sap/((uhr + bhr*h)*(urr + brr*r)*(usapr + bsapr*sap));  // modifiers: sap, h
  v_7: cyg -> $extvariable; lambdacy*cyg;
  v_70: r -> $extvariable; lambdar*r;
  v_71: ir -> $extvariable; lambdair*ir;
  v_72: $extvariable -> sigmah; csigmah*uasigmah/(uasigmah + basigmah*a);  // modifiers: a
  v_73: sigmah -> $extvariable; lambdasigmah*sigmah;
  v_8: $extvariable -> sd; csd;
  v_9: sd -> $extvariable; lambdasd*sd;
end
