// SBML level 3 version 1

model jabbari2()

  // Compartments:
  compartment default_compartment = 1;

  // Species:
  species A in default_compartment = 1;
  species AP in default_compartment = 0;
  species B in default_compartment = 1;
  species M in default_compartment = 1;
  species P in default_compartment = 0;
  species R in default_compartment = 1;
  species Rstar in default_compartment = 0;
  species S in default_compartment = 1;
  species T in default_compartment = 1;
  species aa in default_compartment = 0;
  species c in default_compartment = 1;
  species d in default_compartment = 1;
  species $sink in default_compartment = 0;
  species $source in default_compartment = 0;

  // Parameters:
  EXTERNAL = 0;
  alpha = 1;
  basal = 1;
  beta = 1;
  epsilon = 0.001;
  eta = 1;
  gamma = 1;
  k = 1;
  lambda = 1;
  lambdaa = 1;
  mu = 1;
  phi = 1;
  u = 1;
  v = 1;

  // Reactions:
  v_1: $source -> M; basal;
  v_10: $source -> B + c + d; alpha*M;  // modifiers: M
  v_11: B -> $sink; alpha*B;
  v_12: $sink -> T; lambda*B;  // modifiers: B
  v_13: c -> $sink; alpha*c;
  v_14: $sink -> R; lambda*c;  // modifiers: c
  v_15: d -> $sink; alpha*d;
  v_16: $sink -> S; lambda*d;  // modifiers: d
  v_17: T -> $sink; lambda*T;
  v_18: aa -> $sink; beta*aa*R/epsilon;  // modifiers: R
  v_19: $sink -> Rstar; aa*R;  // modifiers: R, aa
  v_2: $source -> M; v*P/epsilon;  // modifiers: P
  v_20: R -> $sink; epsilon*eta*aa*R/phi;  // modifiers: aa
  v_21: $sink -> aa; beta*gamma*Rstar/epsilon;  // modifiers: Rstar
  v_22: $sink -> R; epsilon*eta*gamma*Rstar/phi;  // modifiers: Rstar
  v_23: Rstar -> $sink; gamma*Rstar;
  v_24: R -> $sink; lambda*R;
  v_25: S -> $sink; lambda*S;
  v_26: S -> $sink; k*S*T;  // modifiers: T
  v_27: $sink -> aa; beta*k*phi*S*T/(epsilon^2*eta);  // modifiers: T, S
  v_28: aa -> $sink; lambdaa*aa;
  v_29: Rstar -> $sink; lambda*Rstar;
  v_3: M -> $sink; M;
  v_30: AP -> $sink; lambda*AP;
  v_31: $source -> P; AP*(1 - P) - u*P;  // modifiers: AP
  v_4: $source -> A; lambda*M;  // modifiers: M
  v_5: A -> $sink; eta*A*Rstar;  // modifiers: Rstar
  v_6: $sink -> AP; A*Rstar;  // modifiers: A, Rstar
  v_7: $source -> A; epsilon*eta*mu*AP;  // modifiers: AP
  v_8: AP -> $sink; epsilon*mu*AP;
  v_9: A -> $sink; lambda*A;
end
