// SBML level 3 version 1

model jullesson2()

  // Compartments:
  compartment default = 1;  // 0-D

  // Species:
  species IR in default = 0.9181;
  species IRS1 in default = 0.9999;
  species IRS1p in default = 0.0001;
  species IRS1ser307 in default = 0.5408;
  species IRS1ser307p in default = 0.4592;
  species IRi in default = 0.0818;
  species IRp in default = 0.0001;
  species S6 in default = 0.7765;
  species S6K in default = 0.9999;
  species S6KDN in default = 99.7272;
  species S6Kp in default = 8.035e-5;
  species S6p in default = 0.2235;
  species mTOR in default = 0.7271;
  species mTORp in default = 8.045e-5;
  species mTORpS6KDN in default = 0.2728;

  // Parameters:
  I = 0.0006;
  IRbasal = 0.0635;
  Ins = 100;
  k1 = 6.0982;
  k1m = 366.2795;
  k2 = 0.4397;
  k2m = 0.5174;
  k3 = 20660.1506;
  k3m = 1.9552;
  k4 = 0.085;
  k4m = 0.082;
  k5 = 0.1965;
  k5m = 0.1968;
  k5tm = 1.7709e-5;
  k6 = 35.9042;
  k6m = 0.0138;
  k7 = 0.1499;
  k7m = 97.5553;

  // Assignment rules:
  fig3b_S6p := S6p*140.6884;
  fig6d_S6p := S6p*5.003627;
  fig6e_IRS1p := (IRS1p - 0.000106747)/0.001193688*100;
  fig3b_IRS1ser307p := IRS1ser307p*110.7958;
  fig6b_S6Kp := S6Kp*4455.786;
  fig6c_IRS1ser307p := IRS1ser307p*2.604124;
  fig6g_IRS1ser307p := (IRS1ser307p - 0.538627)/0.3529625*100;
  fig6f_S6p := (S6p - 0.000106747)/0.4475025*100;
  fig6a_IRS1p := IRS1p*28765.53;

  // Reactions:
  v1: IR -> IRp; IRbasal*IR + IR*Ins*k1;
  v1m: IRp -> IR; IRp*k1m;
  v2: IRS1 -> IRS1p; IRS1*IRp*k2;  // modifiers: IRp
  v2m: IRS1p -> IRS1; IRS1p*k2m;
  v3: IRS1ser307 -> IRS1ser307p; IRS1ser307*k3*S6Kp;  // modifiers: S6Kp
  v3m: IRS1ser307p -> IRS1ser307; IRS1ser307p*k3m;
  v4: mTOR -> mTORp; k4*IRS1p*mTOR;  // modifiers: IRS1p
  v4m: mTORp -> mTOR; mTORp*k4m;
  v5: S6K -> S6Kp; S6K*mTORp*k5;  // modifiers: mTORp
  v5T: S6KDN + mTORp -> mTORpS6KDN; S6KDN*mTORp*I;
  v5m: S6Kp -> S6K; S6Kp*k5m;
  v6: S6 -> S6p; S6*k6*S6Kp;  // modifiers: S6Kp
  v6m: S6p -> S6; S6p*k6m;
  v7: IRi -> IR; IRi*k7;
  v7m: IRp -> IRi; IRp*k7m;
  vM5T: mTORpS6KDN -> S6KDN + mTORp; mTORpS6KDN*k5tm;
end
