// SBML level 2 version 4

model kallenberger4()

  // Compartments:
  compartment cell = 1;  // isVersionOf GO:0005623

  // Species:
  species Bid in cell = 224;  // isVersionOf uniprot:P55957
  species CD95 in cell = 12;  // isVersionOf uniprot:P25445
  species CD95L in cell = 16.6;  // isVersionOf uniprot:P48023
  species DISC in cell = 0;  // isVersionOf GO:0031264
  species DISCp55 in cell = 0;  // hasPart GO:0031264 ensembl:ENSG00000064012
  species FADD in cell = 90;  // isVersionOf uniprot:Q13158
  species PrER in cell = 0;  // hasPart uniprot:P27824 CHEBI:50406
  species PrER_mGFP in cell = 3316;  // hasProperty uniprot:P42212 uniprot:P27824 CHEBI:50406
  species PrNES in cell = 0;  // hasPart SO:0001531 CHEBI:50406
  species PrNES_mCherry in cell = 1909;  // hasProperty SO:0001531 uniprot:Q9U6Y8 CHEBI:50406
  species mCherry in cell = 0;  // isVersionOf uniprot:Q9U6Y8
  species mGFP in cell = 0;  // isVersionOf uniprot:P42212
  species p18 in cell = 0;  // isPartOf uniprot:Q14790
  species p18inactive in cell = 0;  // hasProperty uniprot:Q14790 PATO:0002355
  species p30 in cell = 0;  // isEncodedBy ensembl:ENSG00000064012
  species p43 in cell = 0;  // isPartOf uniprot:O15519
  species p55free in cell = 127;  // isEncodedBy ensembl:ENSG00000064012
  species tBid in cell = 0;  // hasPart GO:0097345 uniprot:P55957

  // Parameters:
  KDL = 30.00604;
  KDR = 57.205;
  kBid = 0.0005213406;
  kD216 = 0.006397759;
  kD216trans_p43 = 5.29907e-5;
  kD216trans_p55 = 0.0002232464;
  kD374 = 0.0006446126;
  kD374probe = 0.0015371;
  kD374trans_p43 = 0.004135301;
  kD374trans_p55 = 0.0005435186;
  kDISC = 0.0003649659;
  kdiss_p18 = 0.06471365;
  koff_FADD = 0.00130855;
  kon_FADD = 0.001088719;

  // Assignment rules:
  CD95act := CD95^3*KDL^2*CD95L/((CD95L + KDL)*(CD95^2*KDL^2 + KDR*CD95L^2 + 2*KDR*KDL*CD95L + KDR*KDL^2));

  // Reactions:
  reaction_1: FADD => DISC; kon_FADD*CD95act*FADD*cell;
  reaction_10: DISCp55 => p43; kD374*DISCp55*cell;
  reaction_11: DISCp55 => p43; kD374trans_p55*DISCp55*(DISCp55 + p30)*cell;  // modifiers: p30
  reaction_12: DISCp55 => p43; kD374trans_p43*DISCp55*p43*cell;
  reaction_13: p30 => DISC + p18; kD374*p30*cell;
  reaction_14: p30 => DISC + p18; kD374trans_p55*p30*(DISCp55 + p30)*cell;  // modifiers: DISCp55
  reaction_15: p30 => DISC + p18; kD374trans_p43*p30*p43*cell;  // modifiers: p43
  reaction_16: p18 => p18inactive; kdiss_p18*p18*cell;
  reaction_17: Bid => tBid; kBid*Bid*(p43 + p18)*cell;  // modifiers: p18, p43
  reaction_18: PrNES_mCherry => mCherry + PrNES; kD374probe*PrNES_mCherry*(p43 + p18)*cell;  // modifiers: p18, p43
  reaction_19: PrER_mGFP => mGFP + PrER; kD374probe*PrER_mGFP*p18*cell;  // modifiers: p18
  reaction_2: DISC => FADD; koff_FADD*DISC*cell;
  reaction_3: DISC + p55free => DISCp55; kDISC*p55free*DISC*cell;
  reaction_4: DISCp55 => p30; kD216*DISCp55*cell;
  reaction_5: DISCp55 => p30; kD216trans_p55*DISCp55*(DISCp55 + p30)*cell;
  reaction_6: DISCp55 => p30; kD216trans_p43*DISCp55*p43*cell;  // modifiers: p43
  reaction_7: p43 => DISC + p18; kD216*p43*cell;
  reaction_8: p43 => DISC + p18; kD216trans_p55*p43*(DISCp55 + p30)*cell;  // modifiers: p30, DISCp55
  reaction_9: p43 => DISC + p18; kD216trans_p43*p43*p43*cell;
end
