// SBML level 3 version 1

model kamboj1()
  // model units - substance: cells, time: days, volume: uL

  // Compartments:
  compartment default = 1;

  // Species:
  species CD8 in default = 1; CD8 is "Immune population of CTLs";
  species T in default = 300; T is "uninfected CD4 T cells";
  species T1 in default = 0; T1 is "preRT infected T cells";
  species T2 in default = 0; T2 is "postRT infected T cells";
  species V in default = 10; V is "Free virus";

  // Parameters:
  Nv = 1000;
  PI = 0;
  RT = 0;
  Tmax = 1500;
  a = 0.4;
  b = 0.05;
  dE = 0.1;
  delta = 0.24;
  dx = 0.01;
  k = 2.4e-5;
  mu = 0.01;
  mu1 = 0.015;
  muv = 2.4;
  p = 1.02;
  r = 0.03;
  s = 10;

  // Reactions:
  v1: -> T; s;
  v10: -> T2; (1 - RT)*a*T1;  // modifiers: T1
  v11: T2 -> ; delta*T2;
  v12: T2 -> ; dx*CD8*T2;  // modifiers: CD8
  v13: -> V; (1 - PI)*delta*Nv*T2;  // modifiers: T2
  v14: V -> ; muv*V;
  v15: -> CD8; p*T2;  // modifiers: T2
  v16: CD8 -> ; dE*CD8;
  v2: T -> ; mu*T;
  v3: -> T; r*T*(1 - T/Tmax);
  v4: T -> T1; k*V*T;  // modifiers: V
  v5: T1 -> T; b*T1;
  v6: -> T; RT*a*T1;  // modifiers: T1
  v7: T1 -> ; mu1*T1;
  v8: T1 -> ; a*T1;
  v9: T1 -> ; b*T1;

  // Unit definitions:
  unit uL = 1e-6 litre;
  unit cells = 1;
  unit _1_per_uL = 1 / (1e-6 litre); _1_per_uL is "1/uL";
  unit days = 86400 second;
end
