// SBML level 2 version 4

model kolmeisky1()

  // Compartments:
  compartment compartment_ = 1e-15;

  // Species:
  species $ADP in compartment_ = 0;  // kegg.compound:C00008 CHEBI:16761 pubchem.substance:3310
  species $ATP in compartment_ = 20;  // CHEBI:15422 kegg.compound:C00002 pubchem.substance:3304
  species $Pi_ in compartment_ = 0;  // CHEBI:18367 kegg.compound:C00009
  substanceOnly species S0 in compartment_ = 10;  // GO:0031475
  substanceOnly species S1 in compartment_ = 0;  // hasPart CHEBI:16761 GO:0031475
  substanceOnly species back_step1 in compartment_ = 0;
  substanceOnly species back_step2 in compartment_ = 0;
  substanceOnly species fwd_step1 in compartment_ = 0;
  substanceOnly species fwd_step2 in compartment_ = 0;

  // Parameters:
  Force = 0;
  d = 36;
  kT = 4.1164;
  k_1 = 0.7;
  k_2 = 12;
  k_3 = 5e-6;
  k_4 = 6e-6;
  th_1 = -0.01;
  th_2 = 0.045;
  th_3 = 0.58;
  th_4 = 0.385;

  // Assignment rules:
  tau := (k_1*ATP*exp(-th_1*Force*d/kT) + k_2*exp(-th_2*Force*d/kT) + k_3*ATP*exp(th_3*Force*d/kT) + k_4*exp(th_4*Force*d/kT))/(k_1*ATP*exp(-th_1*Force*d/kT)*k_2*exp(-th_2*Force*d/kT) + k_3*ATP*exp(th_3*Force*d/kT)*k_4*exp(th_4*Force*d/kT));
  V_ave := d*((fwd_step1 + fwd_step2)/2 - (back_step1 + back_step2)/2)/(S_tot*time);
  V := d*((Fw_1st_step + Fw_2nd_step)/2 - (Bw_1st_step + Bw_2nd_step)/2)/S_tot;
  S_tot := S0 + S1;

  // Reactions:
  Bw_1st_step: S0 + $ATP => S1 + $Pi_ + back_step1; k_3*S0*ATP*exp(th_3*Force*d/kT);  // hasPart ec-code:3.6.4.1
  Bw_2nd_step: S1 => S0 + $ADP + back_step2; k_4*S1*exp(th_4*Force*d/kT);
  Fw_1st_step: S0 + $ATP => S1 + $Pi_ + fwd_step1; k_1*S0*ATP*exp(-th_1*Force*d/kT);  // hasPart ec-code:3.6.4.1
  Fw_2nd_step: S1 => S0 + $ADP + fwd_step2; k_2*S1*exp(-th_2*Force*d/kT);

  // Unit definitions:
  unit molecules = item;
  unit micromole = 1e-6 mole;
  unit uM = 1e-6 mole / litre;
end
