// SBML level 3 version 1

model kolodkin8()
  // model units - substance: nmol, time: min, volume: L, extent: nM

  // Compartments:
  compartment default_compartment = 1;

  // Species:
  species Deg in default_compartment = 0;
  species ImpNRLc in default_compartment = 0;
  species ImpNRLn in default_compartment = 0;
  species Impc in default_compartment = 0.84;
  species Impn in default_compartment = 0;
  species NRLcyt in default_compartment = 0.84;
  species NRLnuc in default_compartment = 0;
  species RE in default_compartment = 3.7;
  species RENRLnuc in default_compartment = 0;

  // Parameters:
  EXTERNAL = 0;
  Kap2b = 5.4e-12;
  Kap2f = 5.4e-12;
  Kap3b = 5.4e-12;
  Kap3f = 5.4e-12;
  Vcytosol = 1.55e-12;
  Vnucleus = 4.5e-13;
  k1b = 300;
  k1f = 60;
  k4b = 300;
  k4f = 60;
  k5b = 60;
  k5f = 60;
  k6 = 0.1;

  // Reactions:
  v_1: NRLnuc + RE -> RENRLnuc; k5f*NRLnuc*RE - k5b*RENRLnuc;
  v_2: Impn + NRLnuc -> ImpNRLn; -(k4b*ImpNRLn) + k4f*Impn*NRLnuc;
  v_3: Impc + NRLcyt -> ImpNRLc; -(k1b*ImpNRLc) + k1f*Impc*NRLcyt;
  v_4: Impc -> 3.444444 Impn; (Kap3f*Impc - Kap3b*Impn)/Vcytosol;
  v_5: ImpNRLc -> 3.444444 ImpNRLn; (Kap2f*ImpNRLc - Kap2b*ImpNRLn)/Vcytosol;
  v_6: RENRLnuc -> Deg + RE; k6*RENRLnuc + 0*NRLnuc + 0*RE + 0*Impn + 0*Impc + 0*NRLcyt + 0*ImpNRLc + 0*RENRLnuc + 0*ImpNRLn + 0*Deg + 0*NRLnuc + 0*RE + 0*Impn + 0*Impc + 0*NRLcyt + 0*ImpNRLc + 0*RENRLnuc + 0*ImpNRLn + 0*Deg;  // modifiers: ImpNRLc, ImpNRLn, Impc, Impn, NRLcyt, NRLnuc

  // Unit definitions:
  unit nmol = 1e-9 mole;
  unit nM = 1e-9 mole / litre;
  unit L = litre;
  unit min = 60 second;
end
