// SBML level 3 version 1

model komarova1()

  // Compartments:
  compartment default = 1;

  // Species:
  species x1 in default = 5.08098;
  species x2 in default = 1397.73;
  species z in default = 90;

  // Parameters:
  Fig7AR1alphaOnOff = 1;
  Ratex1appearanceOnOff = 0;
  Ratex1appearanceOnOffPiecewise = 0;
  Ratex1appearanceduration = 1;
  Ratex1appearancemagnitude = 7;
  Ratex1appearancetimefirst = 10;
  Ratex1appearancetimesecond = 150;
  alpha1 = 7;
  alpha2 = 7;
  beta1basalvalue = 0.2;
  beta1increaseOnOff = 1;
  beta1increaseOntime = 500;
  beta1increasevalue = 0;
  beta1increasevalue2 = 0.03;
  beta2 = 0.02;
  flagformation = 1;
  flagresorption = 1;
  g11 = 1.09;
  g12 = 1;
  g21 = -0.5;
  g22 = 0.09;
  initialvaluex1 = 5.08098;
  initialvaluex2 = 1397.73;
  initialvaluez = 90;
  k1 = 0.26;
  k2 = 0.0008;
  plotzyaxisdenominator = 113.749;

  // Assignment rules:
  y1 := flagresorption*(-x1bar + x1);
  x2bar := (beta1/alpha1)^(g12/gamma)*(beta2/alpha2)^((1 - g11)/gamma);
  x1variable := x1;
  Ratex1appearance := Ratex1appearancemagnitude*Ratex1appearanceOnOff*Ratex1appearanceOnOffPiecewise;
  y2 := flagformation*(-x2bar + x2);
  x2variable := x2;
  gamma := g12*g21 - (1 - g11)*(1 - g22);
  beta1 := beta1basalvalue + beta1increaseOnOff*beta1increasevalue;
  plotzyaxis := 100*z/plotzyaxisdenominator;
  x1bar := (beta1/alpha1)^((1 - g22)/gamma)*(beta2/alpha2)^(g21/gamma);
  plotx2yaxis := -initialvaluex2 + y2 + x2;

  // Reactions:
  R1: -> x1; Ratex1appearance + alpha1*(1 - Fig7AR1alphaOnOff + Fig7AR1alphaOnOff*x1^g11*x2^g21);  // modifiers: x2
  R2: x1 -> ; beta1*x1;
  R3: -> x2; alpha2*x1^g12*x2^g22;  // modifiers: x1
  R4: x2 -> ; beta2*x2;
  R5: z -> ; k1*y1;  // GO:0045453
  R6: -> z; k2*y2;

  // Events:
  y2_gt_trigger: at (x2 > x2bar), t0=false, persistent=false: flagformation = 1;
  Rx1_geq_2nd_trig: at (time >= Ratex1appearancetimesecond), t0=false, persistent=false: Ratex1appearanceOnOffPiecewise = 1;
  y1_gt_trigger: at (x1 > x1bar), t0=false, persistent=false: flagresorption = 1;
  y1_leq_trigger: at (x1 <= x1bar), t0=false, persistent=false: flagresorption = 0;
  Rx1_gt_1stdur_trig: at (time > Ratex1appearanceduration + Ratex1appearancetimefirst), t0=false, persistent=false: Ratex1appearanceOnOffPiecewise = 0;
  Rx1_lt_1st_trigger: at (time < Ratex1appearancetimefirst), t0=false, persistent=false: Ratex1appearanceOnOffPiecewise = 0;
  beta1_geq_on_trigger: at (time >= beta1increaseOntime), t0=false, persistent=false: beta1increasevalue = beta1increasevalue2, flagresorption = 1;
  Rx1_geq_1st_trigger: at (time >= Ratex1appearancetimefirst), t0=false, persistent=false: Ratex1appearanceOnOffPiecewise = 1;
  Rx1_gt_2nddur_trig: at (time > Ratex1appearanceduration + Ratex1appearancetimesecond), t0=false, persistent=false: Ratex1appearanceOnOffPiecewise = 0;
  y2_leq_trigger: at (x2 <= x2bar), t0=false, persistent=false: flagformation = 0;
end
