// SBML level 2 version 1

model kongas1()

  // Compartments:
  compartment CYT = 0.75;  // isVersionOf GO:0005829
  compartment IMS = 0.0625;  // isVersionOf GO:0005758

  // Species:
  species ADP in CYT = 0;  // CHEBI:16761 kegg.compound:C00008
  species ADPi in IMS = 0;  // CHEBI:16761 kegg.compound:C00008
  species ATP in CYT = 9700;  // CHEBI:15422 kegg.compound:C00002
  species ATPi in IMS = 0;  // CHEBI:15422 kegg.compound:C00002
  species Cr in CYT = 26000;  // CHEBI:16919 kegg.compound:C00300
  species Cri in IMS = 0;  // CHEBI:16919 kegg.compound:C00300
  species P in CYT = 0; P is "Pi";  // CHEBI:18367 kegg.compound:C00009
  species PCr in CYT = 0;  // CHEBI:17287 kegg.compound:C02305
  species PCri in IMS = 0;  // CHEBI:17287 kegg.compound:C02305
  species Pi in IMS = 32000; Pi is "Pii";  // CHEBI:18367 kegg.compound:C00009

  // Reactions:
  ADP_diffusion: ADPi -> ADP; IMS*k1_7*ADPi - CYT*k1_7*ADP; ADP_diffusion is "Jadp";  // isVersionOf GO:0015866
    k1_7 = 8.16;
  ATP_diffusion: ATPi -> ATP; IMS*k1_9*ATPi - CYT*k1_9*ATP; ATP_diffusion is "Jatp";  // isVersionOf GO:0015867
    k1_9 = 8.16;
  ATPase: ATP => ADP + P; CYT*v_4*ATP; ATPase is "Vhyd";  // isVersionOf GO:0016887
    v_4 = 4600;
  Cr_diffusion: Cri -> Cr; IMS*k1_6*Cri - CYT*k1_6*Cr; Cr_diffusion is "Jcr";  // isVersionOf GO:0015881
    k1_6 = 14.6;
  MMCK: ATP + Cr -> PCr + ADP; CYT*((Vf_3*ATP*Cr/(Kia_3*Kb_3) - Vb_3*ADP*PCr/(Kic_3*Kd_3))/(1 + Cr/Kib_3 + PCr/Kid_3 + ATP*(1/Kia_3 + Cr/(Kia_3*Kb_3)) + ADP*(1/Kic_3 + Cr/(Kic_3*Kib_3) + PCr/(Kid_3*(Kic_3*Kd_3/Kid_3))))); MMCK is "Vmmck";  // isVersionOf ec-code:2.7.3.2 GO:0004111
    Vf_3 = 6966; Kia_3 = 900; Kb_3 = 15500; Vb_3 = 29250; Kic_3 = 222.4; Kd_3 = 1670; Kib_3 = 34900; Kid_3 = 4730;
  MiCK: ATPi + Cri -> ADPi + PCri; IMS*((Vf_2*ATPi*Cri/(Kia_2*Kb_2) - Vb_2*ADPi*PCri/(Kic_2*Kd_2))/(1 + Cri/Kib_2 + PCri/Kid_2 + ATPi*(1/Kia_2 + Cri/(Kia_2*Kb_2)) + ADPi*(1/Kic_2 + Cri/(Kic_2*Kib_2) + PCri/(Kid_2*(Kic_2*Kd_2/Kid_2))))); MiCK is "Vmick";  // isVersionOf ec-code:2.7.3.2 GO:0004111
    Vf_2 = 2658; Kia_2 = 750; Kb_2 = 5200; Vb_2 = 11160; Kic_2 = 204.8; Kd_2 = 500; Kib_2 = 28800; Kid_2 = 1600;
  OxPhos: ADPi + Pi -> ATPi; IMS*(V_1*ADPi*Pi/(Ka_1*Kb_1*(1 + ADPi/Ka_1 + Pi/Kb_1 + ADPi*Pi/(Ka_1*Kb_1)))); OxPhos is "Vsyn";  // isVersionOf GO:0006119
    V_1 = 4600; Ka_1 = 800; Kb_1 = 20;
  PCr_diffusion: PCri -> PCr; IMS*k1_8*PCri - CYT*k1_8*PCr; PCr_diffusion is "Jpcr";  // isVersionOf GO:0015881
    k1_8 = 14.6;
  Pi_diffusion: Pi -> P; IMS*k2_5*Pi - CYT*k2_5*P; Pi_diffusion is "Jpi";  // isVersionOf GO:0006817
    k2_5 = 18.4;

  // Unit definitions:
  unit micromole = 1e-6 mole;
end
