// SBML level 2 version 4

model koo1()

  // Compartments:
  compartment Cell = 1 volume;
  compartment ER = 1 volume;
  compartment default = 1 volume;  // GO:0005576

  // Species:
  substanceOnly species Ca_ex in default = 1500000;
  substanceOnly species s10 in Cell = 0;
  substanceOnly species s11 in Cell = 0;
  substanceOnly species Shear_Stress in default = 0;
  substanceOnly species TimeT in default = 0;
  substanceOnly species s13 in default = 0;
  substanceOnly species Ca_s in ER = 2830000;
  substanceOnly species Ca_c in Cell = 117.2;
  substanceOnly species Ca_B in Cell = 3870;
  substanceOnly species s5 in default = 0;
  substanceOnly species IP3 in Cell = 0;
  substanceOnly species s7 in Cell = 0;
  substanceOnly species s8 in Cell = 0;
  substanceOnly species s9 in Cell = 0;

  // Parameters:
  B_T = 120000 substance;
  Cao = 100 substance;
  K1 = 0 substance;
  K2 = 200 substance;
  K3 = 150 substance;
  K4 = 80 substance;
  K5 = 321 substance;
  K_CICR = 0 substance;
  K_hi = 380 substance;
  R_T = 44000 dimensionless;
  dot_Vex = 9165 sub_sec;
  dot_Vhi = 2380 sub_sec;
  dot_Vp = 815 sub_sec;
  dot_q_inpass = 3000 sub_sec;
  fracK = 7071067.81 substance;
  half = 0.5 dimensionless;
  k1 = 0.0006 sub_sec;
  k2 = 1 inv_sec;
  k3 = 3.32 inv_sec;
  k4 = 2500 sub_sec;
  k5 = 5e-11 inv_sec_sub;
  k6 = 0.05 inv_sec_sub;
  k7 = 150 inv_sec;
  k_CCE = 0 inv_sec_sub;
  k_CICR = 1 dimensionless;
  tau_I = 66 substance;
  tau_II = 0.01 substance;

  // Reactions:
  re10: s11 => Ca_c; dot_q_inpass;
  re11: s13 => TimeT; unisec;
    unisec = 1 sub_sec;
  re12: Ca_c => s9; dot_Vp*Ca_c^2/(K4^2 + Ca_c^2);
  re1: Ca_B => Ca_c; -k6*Ca_c*(B_T - Ca_B) + k7*Ca_B;
  re4: s5 => Ca_s; k_CCE*(fracK*Cao/(K3 + Cao) - Ca_s)*(Ca_ex - Ca_s);  // modifiers: Ca_ex
  re5: s7 => IP3; k1*(R_T - half*R_T*(exp(-TimeT/tau_I) + exp(-TimeT/tau_II) + (exp(-TimeT/tau_I) - exp(-TimeT/tau_II))*(tau_I + tau_II)/(tau_I - tau_II)))*Ca_c/(K1 + Ca_c);  // modifiers: Ca_c, TimeT, Shear_Stress
  re6: IP3 => s8; k2*IP3;
  re7: Ca_s => Ca_c; k3*(k_CICR*Ca_c/(K_CICR + Ca_c))*(IP3/(K2 + IP3))^3*Ca_s - k4*(Ca_c/(K3 + Ca_c))^2 + k5*Ca_s*Ca_s;  // modifiers: IP3
  re8: Ca_c => s9; dot_Vhi*Ca_c^4/(K_hi^4 + Ca_c^4);
  re9: Ca_c => s10; dot_Vex*Ca_c/(K5 + Ca_c);

  // Unit definitions:
  unit inv_nM_s = 1 / (second * 1e-9 mole);
  unit nM_inv_s = 1e-9 mole / second;
  unit inv_sec_sub = 1 / (second * 1e-9 mole);
  unit inv_sec = 1 / second;
  unit sub_sec = 1e-9 mole / second;
  unit volume = litre;
  unit length = metre;
  unit area = metre^2;
  unit substance = 1e-9 mole;
  unit time = second;
end
