// SBML level 2 version 4

model koo2()

  // Compartments:
  compartment Cell = 1 volume;
  compartment default = 1 volume;

  // Species:
  substanceOnly species Shear_Stress in default = 0;
  substanceOnly species PDK1 in Cell = 0.246;
  substanceOnly species PP2A in Cell = 150;
  substanceOnly species AKT in Cell = 167.616;
  substanceOnly species PI3P in Cell = 0.345;
  substanceOnly species PTEN in Cell = 0.1;
  substanceOnly species PIP2 in Cell = 6967.271;
  substanceOnly species p_PI3K in Cell = 0.03; p_PI3K is "p-PI3K";
  substanceOnly species s3 in Cell = 0;
  substanceOnly species PI3K in Cell = 99.97;
  substanceOnly species Time in Cell = 0;
  substanceOnly species PDK2 in Cell = 3;
  substanceOnly species PDK1_cyto in Cell = 999.754;
  substanceOnly species p_AKT_PI3P in Cell = 1.457; p_AKT_PI3P is "p-AKT:PI3P";
  substanceOnly species pp_AKT_PI3P in Cell = 1.723; pp_AKT_PI3P is "pp-AKT:PI3P";
  substanceOnly species AKT_PI3P in Cell = 29.203; AKT_PI3P is "AKT:PI3P";

  // Reactions:
  re57: PI3K -> p_PI3K; exp(unity - (Time/tf)^1.8)*normal*(Time/unimol)^0.8*(unity - (Time/tf)^1.8);  // modifiers: Time, Shear_Stress
    tf = 15 substance; unimol = 1 substance; unity = 1 dimensionless; normal = 0.907 sub_sec;
  re58: PIP2 => PI3P; k2*PIP2*p_PI3K/(Km2 + PIP2);  // modifiers: p_PI3K
    Km2 = 6170 substance; k2 = 0.2 inv_sec;
  re59: PI3P => PIP2; k3*PI3P*PTEN/(Km3 + PI3P);  // modifiers: PTEN
    Km3 = 80.9 substance; k3 = 7.5 inv_sec;
  re60: AKT + PI3P -> AKT_PI3P; k4*PI3P*AKT - kr4*AKT_PI3P;
    kr4 = 0.089 inv_sec; k4 = 0.045 inv_sec_sub;
  re61: AKT_PI3P => p_AKT_PI3P; k8*AKT_PI3P*PDK1/(Km8 + AKT_PI3P);  // modifiers: PDK1
    Km8 = 80000 substance; k8 = 20 inv_sec;
  re62: p_AKT_PI3P => pp_AKT_PI3P; k10*p_AKT_PI3P*PDK2/(Km10 + p_AKT_PI3P);  // modifiers: PDK2
    Km10 = 80000 substance; k10 = 20 inv_sec;
  re63: p_AKT_PI3P => AKT_PI3P; k7*p_AKT_PI3P*PP2A/(Km7 + p_AKT_PI3P);  // modifiers: PP2A
    Km7 = 8800 substance; k7 = 0.037 inv_sec;
  re64: pp_AKT_PI3P => p_AKT_PI3P; k9*pp_AKT_PI3P*PP2A/(Km9 + pp_AKT_PI3P);  // modifiers: PP2A
    Km9 = 48000 substance; k9 = 0.04 inv_sec;
  re65: pp_AKT_PI3P => AKT + PI3P; k11*pp_AKT_PI3P*PP2A/(Km11 + pp_AKT_PI3P);  // modifiers: PP2A
    Km11 = 48000 substance; k11 = 0.163 inv_sec;
  re66: PDK1_cyto => PDK1; k5*PI3P*PDK1_cyto;  // modifiers: PI3P
    k5 = 0.0007 inv_sec_sub;
  re67: PDK1 => PDK1_cyto; k6*PDK1;
    k6 = 0.98 inv_sec;
  re68: s3 => Time; unitime;
    unitime = 1 sub_sec;

  // Unit definitions:
  unit inv_nM_s = 1 / (second * 1e-9 mole);
  unit nM_inv_s = 1e-9 mole / second;
  unit inv_sec_sub = 1 / (second * 1e-9 mole);
  unit inv_sec = 1 / second;
  unit sub_sec = 1e-9 mole / second;
  unit volume = litre;
  unit length = metre;
  unit area = metre^2;
  unit substance = 1e-9 mole;
  unit time = second;
end
