// SBML level 2 version 4

model koo3()

  // Compartments:
  compartment Cell = 1 volume;
  compartment nucleus = 1 volume;
  compartment default = 1 volume;

  // Species:
  substanceOnly species p_JNKK in Cell = 0.288; p_JNKK is "p-JNKK";
  substanceOnly species p_MEKK1 in Cell = 1.486; p_MEKK1 is "p-MEKK1";
  substanceOnly species Ras_GTP in Cell = 0.616; Ras_GTP is "Ras:GTP";
  substanceOnly species Ras_GDP in Cell = 119.384; Ras_GDP is "Ras:GDP";
  substanceOnly species p_JNK in Cell = 0.003; p_JNK is "p-JNK";
  substanceOnly species s105 in Cell = 0; s105 is "KLF2";
  substanceOnly species eNOS_Cell in Cell = 3.214;
  substanceOnly species aAP_1 in nucleus = 0; aAP_1 is "aAP-1";
  substanceOnly species s108 in nucleus = 0; s108 is "eNOS";
  substanceOnly species p_FAK_Shc in Cell = 0.857; p_FAK_Shc is "p-FAK:Shc";
  substanceOnly species Grb2_Sos in Cell = 3.23; Grb2_Sos is "Grb2:Sos";
  substanceOnly species p_FAK_p_Shc in Cell = 15.962; p_FAK_p_Shc is "p-FAK:p-Shc";
  substanceOnly species p_FAK_p_Shc_Grb2_Sos in Cell = 5.577; p_FAK_p_Shc_Grb2_Sos is "p-FAK:p-Shc:Grb2:Sos";
  substanceOnly species p_Shc_Grb2_Sos in Cell = 1.193; p_Shc_Grb2_Sos is "p-Shc:Grb2:Sos";
  substanceOnly species s115 in nucleus = 0.09; s115 is "eNOS";
  substanceOnly species Shear_Stress in default = 0;
  substanceOnly species s35 in Cell = 0;
  substanceOnly species s37 in Cell = 10000;
  substanceOnly species pre_time in Cell = 0;
  substanceOnly species Time in Cell = 0;
  substanceOnly species AP_1 in nucleus = 50; AP_1 is "AP-1";
  substanceOnly species pp_JNKK in Cell = 0.006; pp_JNKK is "pp-JNKK";
  substanceOnly species pp_JNK in Cell = 0; pp_JNK is "pp-JNK";
  substanceOnly species s49 in Cell = 10; s49 is "KLF2";
  substanceOnly species eNOS_Cav_1 in Cell = 34.98; eNOS_Cav_1 is "eNOS-Cav-1";
  substanceOnly species Shc in Cell = 819.25;
  substanceOnly species p_Src in Cell = 18; p_Src is "p-Src";
  substanceOnly species p_FAK in Cell = 0.605; p_FAK is "p-FAK";
  substanceOnly species Src in Cell = 72;
  substanceOnly species FAK in Cell = 57;
  substanceOnly species JNKK in Cell = 299.706;
  substanceOnly species MEKK1 in Cell = 98.514;
  substanceOnly species p_Shc in Cell = 157.162; p_Shc is "p-Shc";
  substanceOnly species JNK in Cell = 299.997;

  // Reactions:
  re102: FAK -> p_FAK; exp(re102_unity - (Time/re102_tf)^0.35)*re102_normal*((Time + tiny_num)/re102_unimol)^(-0.65)*(re102_unity - (Time/re102_tf)^0.35);  // modifiers: Time, Shear_Stress
    tiny_num = 1e-6 substance; re102_unimol = 1 substance; re102_unity = 1 dimensionless; re102_tf = 60 substance; re102_normal = 4 nM_inv_s;
  re103: Src -> p_Src; exp(re103_unity - (Time/re103_tf)^1.3)*re103_normal*(Time/re103_unimol)^0.3*(re103_unity - (Time/re103_tf)^1.3);  // modifiers: Time, Shear_Stress
    re103_unimol = 1 substance; re103_unity = 1 dimensionless; re103_tf = 540 substance; re103_normal = 0.026 nM_inv_s;
  re104: p_FAK + Shc -> p_FAK_Shc; k3*Shc*p_FAK - kr3*p_FAK_Shc;
    kr3 = 1 inv_sec; k3 = 0.1 inv_nM_s;
  re105: p_FAK_Shc -> p_FAK_p_Shc; k4*p_FAK_Shc*p_Src - kr4*p_FAK_p_Shc;  // modifiers: p_Src
    kr4 = 5 inv_sec; k4 = 8.33 inv_nM_s;
  re106: Grb2_Sos + p_FAK_p_Shc -> p_FAK_p_Shc_Grb2_Sos; k5*Grb2_Sos*p_FAK_p_Shc - kr5*p_FAK_p_Shc_Grb2_Sos;
    kr5 = 546 inv_sec; k5 = 60 inv_nM_s;
  re107: p_FAK_p_Shc_Grb2_Sos -> p_FAK + p_Shc_Grb2_Sos; k6*p_FAK_p_Shc_Grb2_Sos - kr6*p_FAK*p_Shc_Grb2_Sos;
    kr6 = 15700 inv_nM_s; k6 = 2040 inv_sec;
  re108: p_Shc => Shc; V8*p_Shc/(Km8 + p_Shc);
    Km8 = 340 substance; V8 = 154 nM_inv_s;
  re109: p_Shc_Grb2_Sos => Grb2_Sos + p_Shc; k7*p_Shc_Grb2_Sos;
    k7 = 40.8 inv_sec;
  re110: s115 => eNOS_Cell; k25*s115;
    k25 = 0.001 inv_sec;
  re111: s108 => s115; k24t1*aAP_1 + k24t2*s49;  // modifiers: s49, aAP_1
    k24t2 = 9e-6 nM_inv_s; k24t1 = 0.00012 nM_inv_s;
  re112: Ras_GDP => Ras_GTP; k9*p_Shc_Grb2_Sos*Ras_GDP/(Ras_GDP + Km9);  // modifiers: p_Shc_Grb2_Sos
    Km9 = 0.181 substance; k9 = 0.222 inv_sec;
  re113: Ras_GTP => Ras_GDP; V10*Ras_GTP/(Km10 + Ras_GTP);
    Km10 = 0.0571 substance; V10 = 0.289 nM_inv_s;
  re114: MEKK1 => p_MEKK1; k11*Ras_GTP*MEKK1/(Km11 + MEKK1);  // modifiers: Ras_GTP
    Km11 = 10 substance; k11 = 0.035 inv_sec;
  re115: p_MEKK1 => MEKK1; V12*p_MEKK1/(Km12 + p_MEKK1);
    V12 = 0.125 nM_inv_s; Km12 = 8 substance;
  re116: JNKK => p_JNKK; k13*p_MEKK1*JNKK/(Km13 + JNKK);  // modifiers: p_MEKK1
    Km13 = 15 substance; k13 = 0.005 inv_sec;
  re117: p_JNKK => JNKK; V14*p_JNKK/(p_JNKK + Km14);
    V14 = 0.375 nM_inv_s; Km14 = 15 substance;
  re118: JNK => p_JNK; k17*JNK*pp_JNKK/(JNK + Km17);  // modifiers: pp_JNKK
    Km17 = 30 substance; k17 = 0.002 inv_sec;
  re119: p_JNK => JNK; V18*p_JNK/(p_JNK + Km18);
    V18 = 0.05 nM_inv_s; Km18 = 15 substance;
  re120: eNOS_Cell => s35; k26*eNOS_Cell;
    k26 = 2.8e-5 inv_sec;
  re121: s37 => eNOS_Cav_1; V27*eNOS_Cell/(eNOS_Cell + Km27);  // modifiers: eNOS_Cell
    Km27 = 16 substance; V27 = 0.02824 nM_inv_s;
  re122: pre_time => Time; unitime;
    unitime = 1 nM_inv_s;
  re123: pp_JNKK => p_JNKK; V16*pp_JNKK/(pp_JNKK + Km16);
    Km16 = 15 substance; V16 = 0.375 nM_inv_s;
  re124: p_JNKK => pp_JNKK; k15*p_JNKK*p_MEKK1/(Km15 + p_JNKK);  // modifiers: p_MEKK1
    Km15 = 15 substance; k15 = 0.005 inv_sec;
  re125: pp_JNK => p_JNK; V20*pp_JNK/(Km20 + pp_JNK);
    Km20 = 15 substance; V20 = 0.05 nM_inv_s;
  re126: p_JNK => pp_JNK; k19*p_JNK*pp_JNKK/(Km19 + p_JNK);  // modifiers: pp_JNKK
    Km19 = 30 substance; k19 = 0.002 inv_sec;
  re127: AP_1 => aAP_1; pp_JNK*AP_1*k21/(Km21 + AP_1);  // modifiers: pp_JNK
    k21 = 4e-5 inv_sec; Km21 = 25 substance;
  re128: aAP_1 => AP_1; V22*aAP_1/(aAP_1 + Km22);
    V22 = 0.002 nM_inv_s; Km22 = 5 substance;
  re129: s105 => s49; exp(tau*(delay - Time/tc))/(1 + 2*exp(tau*(delay - Time/tc)) + exp(2*tau*(delay - Time/tc)))/uc*29.256;  // modifiers: Time
    re129_unity = 20 nM_inv_s; delay = 5 dimensionless; uc = 3600 dimensionless; tc = 3600 substance; tau = 0.55 dimensionless;

  // Unit definitions:
  unit inv_nM_s = 1 / (second * 1e-9 mole);
  unit nM_inv_s = 1e-9 mole / second;
  unit inv_sec_sub = 1 / (second * 1e-9 mole);
  unit inv_sec = 1 / second;
  unit sub_sec = 1e-9 mole / second;
  unit volume = litre;
  unit length = metre;
  unit area = metre^2;
  unit substance = 1e-9 mole;
  unit time = second;
end
