// SBML level 2 version 4

model koo4()

  // Compartments:
  compartment Cell = 1 volume;
  compartment ER = 1 volume;
  compartment nucleus = 1 volume;
  compartment default = 1 volume;

  // Species:
  substanceOnly species Ca_ex in default = 1500000;
  substanceOnly species s10 in Cell = 0;
  substanceOnly species p_JNKK in Cell = 0.288; p_JNKK is "p-JNKK";
  substanceOnly species p_MEKK1 in Cell = 1.486; p_MEKK1 is "p-MEKK1";
  substanceOnly species Ras_GTP in Cell = 0.616; Ras_GTP is "Ras:GTP";
  substanceOnly species Ras_GDP in Cell = 119.384; Ras_GDP is "Ras:GDP";
  substanceOnly species p_JNK in Cell = 0.003; p_JNK is "p-JNK";
  substanceOnly species s105 in Cell = 0; s105 is "KLF2";
  substanceOnly species eNOS_Cell in Cell = 3.214;
  substanceOnly species aAP_1 in nucleus = 0; aAP_1 is "aAP-1";
  substanceOnly species s108 in nucleus = 0; s108 is "eNOS";
  substanceOnly species s11 in Cell = 0;
  substanceOnly species p_FAK_Shc in Cell = 0.857; p_FAK_Shc is "p-FAK:Shc";
  substanceOnly species Grb2_Sos in Cell = 3.23; Grb2_Sos is "Grb2:Sos";
  substanceOnly species p_FAK_p_Shc in Cell = 15.962; p_FAK_p_Shc is "p-FAK:p-Shc";
  substanceOnly species p_FAK_p_Shc_Grb2_Sos in Cell = 5.577; p_FAK_p_Shc_Grb2_Sos is "p-FAK:p-Shc:Grb2:Sos";
  substanceOnly species p_Shc_Grb2_Sos in Cell = 1.193; p_Shc_Grb2_Sos is "p-Shc:Grb2:Sos";
  substanceOnly species s115 in nucleus = 0.09; s115 is "eNOS";
  substanceOnly species sa49_degraded in Cell = 0;
  substanceOnly species s117 in Cell = 0;
  substanceOnly species s118 in Cell = 0;
  substanceOnly species Shear_Stress in default = 0;
  substanceOnly species TimeT in Cell = 0;
  substanceOnly species s13 in Cell = 0;
  substanceOnly species PDK1 in Cell = 0.246;
  substanceOnly species PP2A in Cell = 150;
  substanceOnly species AKT in Cell = 167.616;
  substanceOnly species PI3P in Cell = 0.345;
  substanceOnly species PTEN in Cell = 0.1;
  substanceOnly species PIP2 in Cell = 6967.271;
  substanceOnly species Ca_s in ER = 2830000;
  substanceOnly species p_PI3K in Cell = 0.03; p_PI3K is "p-PI3K";
  substanceOnly species s21 in Cell = 0; s21 is "s3";
  substanceOnly species PI3K in Cell = 99.97;
  substanceOnly species s23 in Cell = 0; s23 is "Time";
  substanceOnly species PDK2 in Cell = 3;
  substanceOnly species PDK1_cyto in Cell = 999.754;
  substanceOnly species p_AKT_PI3P in Cell = 1.457; p_AKT_PI3P is "p-AKT:PI3P";
  substanceOnly species pp_AKT_PI3P in Cell = 1.723; pp_AKT_PI3P is "pp-AKT:PI3P";
  substanceOnly species AKT_PI3P in Cell = 29.203; AKT_PI3P is "AKT:PI3P";
  substanceOnly species Ca_c in Cell = 117.2;
  substanceOnly species s35 in Cell = 0;
  substanceOnly species s37 in Cell = 10000;
  substanceOnly species pre_time in Cell = 0;
  substanceOnly species s39 in Cell = 0; s39 is "Time";
  substanceOnly species Ca_B in Cell = 3870;
  substanceOnly species AP_1 in nucleus = 50; AP_1 is "AP-1";
  substanceOnly species pp_JNKK in Cell = 0.006; pp_JNKK is "pp-JNKK";
  substanceOnly species pp_JNK in Cell = 0; pp_JNK is "pp-JNK";
  substanceOnly species eNOS_CaM_Ca4 in Cell = 0.0415; eNOS_CaM_Ca4 is "eNOS-CaM-Ca4";
  substanceOnly species CaM_Ca4 in Cell = 2.827; CaM_Ca4 is "CaM-Ca4";
  substanceOnly species CaM_Ca2 in Cell = 347.52; CaM_Ca2 is "CaM-Ca2";
  substanceOnly species s49 in Cell = 10; s49 is "KLF2";
  substanceOnly species s5 in default = 0;
  substanceOnly species eNOS_CaM_Ca2 in Cell = 2.12; eNOS_CaM_Ca2 is "eNOS-CaM-Ca2";
  substanceOnly species eNOS_Cav_1 in Cell = 34.98; eNOS_Cav_1 is "eNOS-Cav-1";
  substanceOnly species Calmodulin in Cell = 7635.36;
  substanceOnly species Hsp90 in Cell = 199987;
  substanceOnly species Hsp90_eNOS_CaM_Ca4 in Cell = 1.037; Hsp90_eNOS_CaM_Ca4 is "Hsp90-eNOS-CaM-Ca4";
  substanceOnly species IP3 in Cell = 0;
  substanceOnly species Hsp90_p_eNOS_CaM_Ca4 in Cell = 0.0089; Hsp90_p_eNOS_CaM_Ca4 is "Hsp90-p-eNOS-CaM-Ca4";
  substanceOnly species Hsp90_eNOS_CaM_Ca2 in Cell = 10.98; Hsp90_eNOS_CaM_Ca2 is "Hsp90-eNOS-CaM-Ca2";
  substanceOnly species Hsp90_p_eNOS_CaM_Ca2 in Cell = 0.106; Hsp90_p_eNOS_CaM_Ca2 is "Hsp90-p-eNOS-CaM-Ca2";
  substanceOnly species L_Arg in Cell = 500000; L_Arg is "L-Arg";
  substanceOnly species NO in Cell = 0;
  substanceOnly species Hsp90_p_eNOS in Cell = 0.643; Hsp90_p_eNOS is "Hsp90-p-eNOS";
  substanceOnly species Hsp90_eNOS in Cell = 0.083; Hsp90_eNOS is "Hsp90-eNOS";
  substanceOnly species s7 in Cell = 0;
  substanceOnly species s8 in Cell = 0;
  substanceOnly species s9 in Cell = 0;
  substanceOnly species Shc in Cell = 819.25;
  substanceOnly species p_Src in Cell = 18; p_Src is "p-Src";
  substanceOnly species p_FAK in Cell = 0.605; p_FAK is "p-FAK";
  substanceOnly species Src in Cell = 72;
  substanceOnly species FAK in Cell = 57;
  substanceOnly species JNKK in Cell = 299.706;
  substanceOnly species MEKK1 in Cell = 98.514;
  substanceOnly species p_Shc in Cell = 157.162; p_Shc is "p-Shc";
  substanceOnly species JNK in Cell = 299.997;

  // Parameters:
  B_T = 120000 substance;
  Cao = 100 substance;
  K1 = 0 substance;
  K2 = 200 substance;
  K3 = 150 substance;
  K4 = 80 substance;
  K5 = 321 substance;
  K_CICR = 0 substance;
  K_hi = 380 substance;
  Kmdp = 20 substance;
  Kmp = 5 substance;
  R_T = 44000 dimensionless;
  Vc_Vs = 3.5 dimensionless;
  Vdp = 4 sub_sec;
  alp = 10 time;
  dot_Vex = 18330 sub_sec;
  dot_Vhi = 4760 sub_sec;
  dot_Vp = 1630 sub_sec;
  dot_q_inpass = 6000 sub_sec;
  dot_q_instim = 2500 sub_sec;
  fracK = 7071067.81 substance;
  gam = 0.1 time;
  half = 0.5 dimensionless;
  k1 = 0.0012 sub_sec;
  k11 = 0.004 inv_sec_sub;
  k12 = 10.3 inv_sec;
  k13 = 0.08 inv_sec_sub;
  k14 = 1152 inv_sec;
  k15 = 0.015 inv_sec_sub;
  k16 = 0 inv_sec;
  k17 = 0.00015 inv_sec_sub;
  k18 = 1.5 inv_sec;
  k2 = 2 inv_sec;
  k3 = 6.64 inv_sec;
  k4 = 5000 sub_sec;
  k5 = 1e-10 inv_sec_sub;
  k6 = 0.1 inv_sec_sub;
  k7 = 300 inv_sec;
  k8 = 7.5e-5 time;
  k90 = 0.002 inv_sec_sub;
  kDD = 9.45e-5 inv_sec;
  k_CCE = 0 inv_sec_sub;
  k_CICR = 1 dimensionless;
  kp = 0.1 inv_sec;
  kr90 = 1.5 inv_sec;
  tau_I = 33 substance;
  tau_II = 0.005 substance;

  // Reactions:
  re10: s11 => Ca_c; 0.5*dot_q_inpass;
  re102: FAK -> p_FAK; exp(re102_unity - (s39/re102_tf)^0.35)*re102_normal*((s39 + tiny_num)/re102_unimol)^(-0.65)*(re102_unity - (s39/re102_tf)^0.35);  // modifiers: s39, Shear_Stress
    tiny_num = 1e-6 substance; re102_unimol = 1 substance; re102_unity = 1 dimensionless; re102_tf = 60 substance; re102_normal = 4 nM_inv_s;
  re103: Src -> p_Src; exp(re103_unity - (s39/re103_tf)^1.3)*re103_normal*(s39/re103_unimol)^0.3*(re103_unity - (s39/re103_tf)^1.3);  // modifiers: s39, Shear_Stress
    re103_unimol = 1 substance; re103_unity = 1 dimensionless; re103_tf = 540 substance; re103_normal = 0.026 nM_inv_s;
  re104: p_FAK + Shc -> p_FAK_Shc; k105*Shc*p_FAK - k_105*p_FAK_Shc;
    k_105 = 1 inv_sec; k105 = 0.1 inv_nM_s;
  re105: p_FAK_Shc -> p_FAK_p_Shc; kcat_src*p_FAK_Shc*p_Src - k_6*p_FAK_p_Shc;  // modifiers: p_Src
    k_6 = 5 inv_sec; kcat_src = 8.33 inv_nM_s;
  re106: Grb2_Sos + p_FAK_p_Shc -> p_FAK_p_Shc_Grb2_Sos; k107*Grb2_Sos*p_FAK_p_Shc - k_107*p_FAK_p_Shc_Grb2_Sos;
    k_107 = 546 inv_sec; k107 = 60 inv_nM_s;
  re107: p_FAK_p_Shc_Grb2_Sos -> p_FAK + p_Shc_Grb2_Sos; k108*p_FAK_p_Shc_Grb2_Sos - k_108*p_FAK*p_Shc_Grb2_Sos;
    k_108 = 15700 inv_nM_s; k108 = 2040 inv_sec;
  re108: p_Shc => Shc; V10*p_Shc/(K10 + p_Shc);
    K10 = 340 substance; V10 = 154 nM_inv_s;
  re109: p_Shc_Grb2_Sos => Grb2_Sos + p_Shc; k9*p_Shc_Grb2_Sos;
    k9 = 40.8 inv_sec;
  re11: s13 => TimeT; unisec*0.5;
    unisec = 1 sub_sec;
  re110: s115 => eNOS_Cell; s115*kT;
    kT = 0.001 inv_sec;
  re111: s108 => s115; ktr1*aAP_1 + ktr1k2*s49;  // modifiers: s49, aAP_1
    tr2 = 3e-6 nM_inv_s; ktr1k2 = 9e-6 nM_inv_s; ktr1 = 0.00012 nM_inv_s;
  re112: Ras_GDP => Ras_GTP; k111*p_Shc_Grb2_Sos*Ras_GDP/(Ras_GDP + K111);  // modifiers: p_Shc_Grb2_Sos
    K111 = 0.181 substance; k111 = 0.222 inv_sec;
  re113: Ras_GTP => Ras_GDP; V12*Ras_GTP/(K12 + Ras_GTP);
    K12 = 0.0571 substance; V12 = 0.289 nM_inv_s;
  re114: MEKK1 => p_MEKK1; k113*Ras_GTP*MEKK1/(K113 + MEKK1);  // modifiers: Ras_GTP
    K113 = 10 substance; k113 = 0.035 inv_sec;
  re115: p_MEKK1 => MEKK1; V18*p_MEKK1/(K18 + p_MEKK1);
    V18 = 0.125 nM_inv_s; K18 = 8 substance;
  re116: JNKK => p_JNKK; k19*p_MEKK1*JNKK/(K19 + JNKK);  // modifiers: p_MEKK1
    K19 = 15 substance; k19 = 0.005 inv_sec;
  re117: p_JNKK => JNKK; V20*p_JNKK/(p_JNKK + K20);
    V20 = 0.375 nM_inv_s; K20 = 15 substance;
  re118: JNK => p_JNK; k21*JNK*pp_JNKK/(JNK + K21);  // modifiers: pp_JNKK
    K21 = 30 substance; k21 = 0.002 inv_sec;
  re119: p_JNK => JNK; V22*p_JNK/(p_JNK + K22);
    V22 = 0.05 nM_inv_s; K22 = 15 substance;
  re12: Ca_c => s9; 0.5*dot_Vp*Ca_c^2/(K4^2 + Ca_c^2);
  re120: eNOS_Cell => s35; kD*eNOS_Cell;
    kD = 2.8e-5 inv_sec;
  re121: s37 => eNOS_Cav_1; kP*eNOS_Cell/(eNOS_Cell + K30);  // modifiers: eNOS_Cell
    K30 = 16 substance; kP = 0.02824 nM_inv_s;
  re122: pre_time => s39; re122_unitime;
    re122_unitime = 1 nM_inv_s;
  re123: pp_JNKK => p_JNKK; V37*pp_JNKK/(pp_JNKK + K37);
    K37 = 15 substance; V37 = 0.375 nM_inv_s;
  re124: p_JNKK => pp_JNKK; k38*p_JNKK*p_MEKK1/(K38 + p_JNKK);  // modifiers: p_MEKK1
    K38 = 15 substance; k38 = 0.005 inv_sec;
  re125: pp_JNK => p_JNK; V39*pp_JNK/(K39 + pp_JNK);
    K39 = 15 substance; V39 = 0.05 nM_inv_s;
  re126: p_JNK => pp_JNK; k40*p_JNK*pp_JNKK/(K40 + p_JNK);  // modifiers: pp_JNKK
    K40 = 30 substance; k40 = 0.002 inv_sec;
  re127: AP_1 => aAP_1; pp_JNK*AP_1*k43/(K43 + AP_1);  // modifiers: pp_JNK
    k43 = 4e-5 inv_sec; K43 = 25 substance;
  re128: aAP_1 => AP_1; V44*aAP_1/(aAP_1 + K44);
    V44 = 0.002 nM_inv_s; K44 = 5 substance;
  re129: s105 => s49; exp(tau*(delay - s39/tc))/(1 + 2*exp(tau*(delay - s39/tc)) + exp(2*tau*(delay - s39/tc)))/uc*29.256;  // modifiers: s39
    re129_unity = 20 nM_inv_s; delay = 5 dimensionless; uc = 3600 dimensionless; tc = 3600 substance; tau = 0.55 dimensionless;
  re131: eNOS_Cav_1 => sa49_degraded; kDD*eNOS_Cav_1;
  re132: eNOS_CaM_Ca4 => CaM_Ca4 + s117; kDD*eNOS_CaM_Ca4;
  re133: eNOS_CaM_Ca2 => CaM_Ca2 + s117; kDD*eNOS_CaM_Ca2;
  re134: Hsp90_eNOS => s118 + Hsp90; kDD*Hsp90_eNOS;
  re135: Hsp90_p_eNOS => Hsp90 + s118; kDD*Hsp90_p_eNOS;
  re136: Hsp90_eNOS_CaM_Ca2 => CaM_Ca2 + Hsp90; kDD*Hsp90_eNOS_CaM_Ca2;
  re137: Hsp90_p_eNOS_CaM_Ca2 => CaM_Ca2 + Hsp90; kDD*Hsp90_p_eNOS_CaM_Ca2;
  re138: Hsp90_eNOS_CaM_Ca4 => CaM_Ca4 + Hsp90; kDD*Hsp90_eNOS_CaM_Ca4;
  re139: Hsp90_p_eNOS_CaM_Ca4 => CaM_Ca4 + Hsp90; kDD*Hsp90_p_eNOS_CaM_Ca4;
  re1: Ca_B => Ca_c; -k6*Ca_c*(B_T - Ca_B) + k7*Ca_B;
  re37: CaM_Ca4 + eNOS_Cav_1 => eNOS_CaM_Ca4; k15*CaM_Ca4*eNOS_Cav_1;
  re38: eNOS_Cav_1 + CaM_Ca2 -> eNOS_CaM_Ca2; k17*eNOS_Cav_1*CaM_Ca2 - k18*eNOS_CaM_Ca2;
  re4: s5 => Ca_s; k_CCE*(fracK*Cao/(K3 + Cao) - Ca_s)*(Ca_ex - Ca_s);  // modifiers: Ca_ex
  re41: Calmodulin -> CaM_Ca2; k11*Ca_c*Calmodulin - k12*CaM_Ca2;  // modifiers: Ca_c
  re42: CaM_Ca2 => CaM_Ca4; k13*Ca_c*CaM_Ca2 - k14*CaM_Ca4;  // modifiers: Ca_c
  re5: s7 => IP3; 0.5*k1*(R_T - half*R_T*(exp(-TimeT/tau_I) + exp(-TimeT/tau_II) + (exp(-TimeT/tau_I) - exp(-TimeT/tau_II))*(tau_I + tau_II)/(tau_I - tau_II)))*Ca_c/(K1 + Ca_c);  // modifiers: Ca_c, TimeT, Shear_Stress
  re50: eNOS_CaM_Ca4 -> eNOS_CaM_Ca2; gam*k14*eNOS_CaM_Ca4 - k13*Ca_c*eNOS_CaM_Ca2;  // modifiers: Ca_c
  re51: Hsp90 + eNOS_CaM_Ca4 => Hsp90_eNOS_CaM_Ca4; k90*eNOS_CaM_Ca4*Hsp90;
  re52: Hsp90_eNOS_CaM_Ca4 -> Hsp90_eNOS_CaM_Ca2; gam*k14*Hsp90_eNOS_CaM_Ca4 - k13*Ca_c*Hsp90_eNOS_CaM_Ca2;  // modifiers: Ca_c
  re53: Hsp90_eNOS_CaM_Ca2 => Hsp90 + eNOS_CaM_Ca2; kr90*Hsp90_eNOS_CaM_Ca2;
  re54: Hsp90_p_eNOS_CaM_Ca4 -> Hsp90_p_eNOS_CaM_Ca2; gam*k14*Hsp90_p_eNOS_CaM_Ca4 - k13*Ca_c*Hsp90_p_eNOS_CaM_Ca2;  // modifiers: Ca_c
  re55: Hsp90_eNOS_CaM_Ca4 -> Hsp90_p_eNOS_CaM_Ca4; kp*Hsp90_eNOS_CaM_Ca4*pp_AKT_PI3P/(Hsp90_eNOS_CaM_Ca4 + Kmp) - Vdp*Hsp90_p_eNOS_CaM_Ca4/(Hsp90_p_eNOS_CaM_Ca4 + Kmdp);  // modifiers: pp_AKT_PI3P
  re56: Hsp90_eNOS_CaM_Ca2 -> Hsp90_p_eNOS_CaM_Ca2; kp*Hsp90_eNOS_CaM_Ca2*pp_AKT_PI3P/(Hsp90_eNOS_CaM_Ca2 + Kmp) - Vdp*Hsp90_p_eNOS_CaM_Ca2/(Hsp90_p_eNOS_CaM_Ca2 + Kmdp);  // modifiers: pp_AKT_PI3P
  re57: PI3K -> p_PI3K; exp(re57_unity - (s23/re57_tf)^1.8)*re57_normal*(s23/re57_unimol)^0.8*(re57_unity - (s23/re57_tf)^1.8);  // modifiers: s23, Shear_Stress
    re57_tf = 15 substance; re57_unimol = 1 substance; re57_unity = 1 dimensionless; re57_normal = 0.907 sub_sec;
  re58: PIP2 => PI3P; k58*PIP2*p_PI3K/(Km58 + PIP2);  // modifiers: p_PI3K
    Km58 = 6170 substance; k58 = 0.2 inv_sec;
  re59: PI3P => PIP2; k59*PI3P*PTEN/(Km59 + PI3P);  // modifiers: PTEN
    Km59 = 80.9 substance; k59 = 7.5 inv_sec;
  re6: IP3 => s8; 0.5*k2*IP3;
  re60: AKT + PI3P -> AKT_PI3P; k60*PI3P*AKT - kr60*AKT_PI3P;
    kr60 = 0.089 inv_sec; k60 = 0.045 inv_sec_sub;
  re61: AKT_PI3P => p_AKT_PI3P; k61*AKT_PI3P*PDK1/(Km61 + AKT_PI3P);  // modifiers: PDK1
    Km61 = 80000 substance; k61 = 20 inv_sec;
  re62: p_AKT_PI3P => pp_AKT_PI3P; k62*p_AKT_PI3P*PDK2/(Km62 + p_AKT_PI3P);  // modifiers: PDK2
    Km62 = 80000 substance; k62 = 20 inv_sec;
  re63: p_AKT_PI3P => AKT_PI3P; k63*p_AKT_PI3P*PP2A/(Km63 + p_AKT_PI3P);  // modifiers: PP2A
    Km63 = 8800 substance; k63 = 0.037 inv_sec;
  re64: pp_AKT_PI3P => p_AKT_PI3P; k64*pp_AKT_PI3P*PP2A/(Km64 + pp_AKT_PI3P);  // modifiers: PP2A
    Km64 = 48000 substance; k64 = 0.04 inv_sec;
  re65: pp_AKT_PI3P => AKT + PI3P; k65*pp_AKT_PI3P*PP2A/(Km65 + pp_AKT_PI3P);  // modifiers: PP2A
    Km65 = 48000 substance; k65 = 0.163 inv_sec;
  re66: PDK1_cyto => PDK1; k66*PI3P*PDK1_cyto;  // modifiers: PI3P
    k66 = 0.0007 inv_sec_sub;
  re67: PDK1 => PDK1_cyto; PDK1*k67;
    k67 = 0.98 inv_sec;
  re68: s21 => s23; re68_unitime;
    re68_unitime = 1 sub_sec;
  re69: L_Arg => NO; K_cam_no*(eNOS_CaM_Ca4 + Hsp90_eNOS_CaM_Ca4) + K_p_no*(Hsp90_p_eNOS_CaM_Ca2 + Hsp90_p_eNOS) + K_pcam_no*Hsp90_p_eNOS_CaM_Ca4;  // modifiers: Hsp90_p_eNOS_CaM_Ca4, Hsp90_p_eNOS, Hsp90_p_eNOS_CaM_Ca2, Hsp90_eNOS_CaM_Ca4, eNOS_CaM_Ca4, Hsp90_eNOS_CaM_Ca2, eNOS_CaM_Ca2
    K_pcam_no = 17 inv_sec; K_p_no = 5 inv_sec; K_cam_no = 17 inv_sec;
  re7: Ca_s => Ca_c; 0.5*k3*(k_CICR*Ca_c/(K_CICR + Ca_c))*(IP3/(K2 + IP3))^3*Ca_s - 0.5*k4*(Ca_c/(K3 + Ca_c))^2 + 0.5*k5*Ca_s*Ca_s;  // modifiers: IP3
  re70: Hsp90_p_eNOS => Hsp90_eNOS; Vdp*Hsp90_p_eNOS/(Hsp90_p_eNOS + Kmdp);
  re71: Hsp90_eNOS => Hsp90 + eNOS_Cav_1; kr90*Hsp90_eNOS;
  re72: Hsp90_p_eNOS_CaM_Ca2 -> CaM_Ca2 + Hsp90_p_eNOS; k18*Hsp90_p_eNOS_CaM_Ca2 - k17*Hsp90_p_eNOS*CaM_Ca2;
  re8: Ca_c => s9; 0.5*dot_Vhi*Ca_c^4/(K_hi^4 + Ca_c^4);
  re9: Ca_c => s10; 0.5*dot_Vex*Ca_c/(K5 + Ca_c);

  // Unit definitions:
  unit inv_nM_s = 1 / (second * 1e-9 mole);
  unit nM_inv_s = 1e-9 mole / second;
  unit inv_sec_sub = 1 / (second * 1e-9 mole);
  unit inv_sec = 1 / second;
  unit sub_sec = 1e-9 mole / second;
  unit volume = litre;
  unit length = metre;
  unit area = metre^2;
  unit substance = 1e-9 mole;
  unit time = second;
end
