// SBML level 3 version 1

model koster()

  // Compartments:
  compartment default_compartment = 1;

  // Species:
  species Prot in default_compartment = 1330000000000;
  species RNA in default_compartment = 570000000;
  species $XX in default_compartment = 0;

  // Parameters:
  coef = 3.6;
  kPd = 0.0077;
  kPs = 343;
  kRd = 0.231;
  ktranscriptionattenuation = 14;
  mDNA = 3.15e-12;
  mProt = 15300;
  nA = 6.02e23;
  nfac = 1;
  ng = 50;
  wfr = 0.236;

  // Assignment rules:
  kRS := piecewise(540, time < 11.35, 540/ktranscriptionattenuation);
  DNA := piecewise(2, time < 0.917, 4*2.71828^(1.188*(-1.5 + time)), time < 8.1, 4*2.71828^(1.188*(-1.5 + time)), nfac == 0, 1000*(10.1 + 12.1*(-8.1 + time) + 4.02e-5*(-8.1 + time)^coef));
  LogDNA := ln(DNA);

  // Reactions:
  v_1: $XX -> RNA; kRS*ng*DNA;
  v_2: RNA -> $XX; kRd*RNA;
  v_3: $XX -> Prot; kPs*RNA;  // modifiers: RNA
  v_4: Prot -> $XX; kPd*Prot;
end
