// SBML level 3 version 1

model kouril2()
  // model units - substance: mmol, time: min, volume: Ln, extent: mM

  // Compartments:
  compartment default_compartment = 1;

  // Species:
  species $adp in default_compartment = 0;  // kegg.compound:C00008
  species $atp in default_compartment = 10;  // kegg.compound:C00002
  species bpg in default_compartment = 0;  // kegg.compound:C00236
  species dhap in default_compartment = 0;  // kegg.compound:C00111
  species $f6p in default_compartment = 0;  // kegg.compound:C05345
  species gap in default_compartment = 0;  // kegg.compound:C00118
  species $nadp in default_compartment = 0;  // kegg.compound:C00006
  species $nadph in default_compartment = 0.2;  // kegg.compound:C00004
  species $p3g in default_compartment = 2;  // kegg.compound:C00197

  // Parameters:
  KaldDHAP = 0.170995;
  KaldF6P = 1;
  KaldGAP = 0.0522437;
  KbisP = 0.000406744;
  Kgap = 0.83766;
  KiADP = 1.14174;
  Knadp = 0.271013;
  Knadph = 0.0735253;
  KpgkADP = 0.0848049;
  KpgkATP = 9.68404;
  KpgkP3G = 0.541454;
  KpgkbisP = 5.59;
  Kpi = 408.523;
  KtimDHAP = 0.811626;
  KtimGAP = 0.245106;
  KtimP3G = 0.399822;
  KtimPEP = 0.660519;
  Vmarev = 24.054;
  VmfALD = 2.64096;
  VmfPGK = 17.3221;
  VmfTIM = 239.835;
  Vmfor = 20.6526;
  VmrPGK = 30.04;
  VmrTIM = 239.414;
  kGDH = 10;
  kPK = 10;
  kdbpg = 1.05824;
  kddhap = 0.0225;
  kdgap = 0.0559;
  n = 1.56416;
  pep = 5;
  pi = 0;
  protALDPase = 0.0036;
  protGAPdh = 0.0421;
  protPGK = 0.0034;
  protTIM = 0.00085;

  // Reactions:
  v_1: $atp + $p3g -> bpg + $adp; protPGK*(-VmrPGK*adp*bpg/(KpgkADP*KpgkbisP) + VmfPGK*atp*p3g/(KpgkATP*KpgkP3G))/((1 + adp/KiADP)*(1 + p3g/KpgkP3G*(1 + atp/KpgkATP) + bpg/KpgkbisP*(1 + adp/KpgkADP)));
  v_2: bpg + $nadph -> gap + $nadp; protGAPdh*(-Vmarev*(gap*nadp/(Kgap*Knadp))*(pi/Kpi) + Vmfor*bpg*nadph/(KbisP*Knadph))*(gap/Kgap*pi/Kpi + bpg/KbisP)^(n - 1)/((1 + nadp/Knadp + nadph/Knadph)*(1 + (gap/Kgap)^n + (pi/Kpi)^n + (gap/Kgap*(pi/Kpi) + bpg/KbisP)^n));
  v_3: gap -> dhap; protTIM*(-VmrTIM*dhap/KtimDHAP + VmfTIM*gap/KtimGAP)/(1 + dhap/KtimDHAP + gap/KtimGAP + pep/KtimPEP + p3g/KtimP3G);  // modifiers: p3g
  v_4: dhap + gap -> $f6p; protALDPase*(VmfALD*gap*dhap/(KaldGAP*KaldDHAP))/(1 + gap/KaldGAP + dhap/KaldDHAP + gap*dhap/(KaldGAP*KaldDHAP) + f6p/KaldF6P);
  v_5: gap -> ; kdgap*gap;
  v_6: dhap -> ; kddhap*dhap;
  v_7: bpg -> ; kdbpg*bpg;

  // Unit definitions:
  unit Ln = litre;
  unit min = 60 second;
  unit mmol = 1e-3 mole;
  unit mM = 1e-3 mole / litre;
end
