// SBML level 3 version 1

model kouril9()

  // Compartments:
  compartment default = 1;  // 0-D

  // Species:
  species adp in default = 0;  // kegg.compound:C00008 CHEBI:16761
  species atp in default = 10;  // obo.chebi:CHEBI/15422 kegg.compound:C00002
  species bpg in default = 0;  // CHEBI:28907 kegg.compound:C00236
  species dhap in default = 0.03;  // CHEBI:16108 kegg.compound:C00111
  species f6p in default = 0.12;  // kegg.compound:C00085 CHEBI:15946
  species $ga in default = 0;
  species gap in default = 0.09;  // obo.chebi:CHEBI/17138 kegg.compound:C00661
  species glc in default = 10;  // CHEBI:17234 kegg.compound:C00031
  species nadp in default = 0;  // CHEBI:18009 kegg.compound:C00006
  species nadph in default = 0.2;  // CHEBI:16474 kegg.compound:C00005
  species p3g in default = 1.8;  // kegg.compound:C00197 CHEBI:17794
  species pep in default = 5;  // CHEBI:44897 kegg.compound:C00074
  species pyr in default = 0.4;  // kegg.compound:C00022 CHEBI:32816

  // Parameters:
  KaldDHAP = 0.170995;
  KaldF6P = 1;
  KaldGAP = 0.0522437;
  KbisP = 0.0893221;
  Kgap = 3.090064;
  KiADP = 1.016612;
  Knadp = 0.2043807;
  Knadph = 0.09244402;
  KpgkADP = 0.3746839;
  KpgkATP = 9.3094;
  KpgkP3G = 0.5678007;
  KpgkbisP = 0.008243227;
  Kpi = 112.3899;
  KtimDHAP = 0.811626;
  KtimGAP = 0.245106;
  KtimP3G = 0.399822;
  KtimPEP = 0.660519;
  Vmarev = 35.87103;
  VmfALD = 2.64096;
  VmfPGK = 17.21256;
  VmfTIM = 239.835;
  Vmfor = 23.39906;
  VmrPGK = 37.96026;
  VmrTIM = 239.414;
  kGDH = 10;
  kPK = 10;
  kdbpg = 0.736416;
  kddhap = 0.0225;
  kdgap = 0.0559;
  kdnadph = 0.01986;
  pi = 0;
  protALDPase = 0.0036;
  protGAPDH = 0.0421;
  protPGK = 0.0034;
  protTIM = 0.00085;

  // Reactions:
  v1: p3g + atp -> bpg + adp; protPGK*(-(VmrPGK*adp*bpg/(KpgkADP*KpgkbisP)) + VmfPGK*atp*p3g/(KpgkATP*KpgkP3G))/((1 + adp/KiADP)*(1 + (1 + adp/KpgkADP)*bpg/KpgkbisP + (1 + atp/KpgkATP)*p3g/KpgkP3G));
  v10: nadph -> nadp; kdnadph*nadph;
  v2: nadph + bpg -> nadp + gap; protGAPDH*((-Vmarev*(gap*nadp/(Kgap*Knadp))*(pi/Kpi) + Vmfor*bpg*nadph/(KbisP*Knadph))/((1 + nadp/Knadp + nadph/Knadph)*((1 + gap/Kgap)*(1 + pi/Kpi) + bpg/KbisP)));
  v3: gap -> dhap; protTIM*(-(VmrTIM*dhap/KtimDHAP) + VmfTIM*gap/KtimGAP)/(1 + dhap/KtimDHAP + gap/KtimGAP + p3g/KtimP3G + pep/KtimPEP);  // modifiers: p3g, pep
  v4: gap + dhap -> f6p; protALDPase*VmfALD*dhap*gap/(KaldDHAP*KaldGAP*(1 + dhap/KaldDHAP + gap/KaldGAP + dhap*gap/(KaldDHAP*KaldGAP)));
  v5: gap -> ; kdgap*gap;
  v6: dhap -> ; kddhap*dhap;
  v7: bpg -> p3g; kdbpg*bpg;
  v8: nadp + glc -> $ga + nadph; kGDH*glc*nadp;
  v9: pep + adp -> pyr + atp; kPK*adp*pep;
end
