// SBML level 3 version 1

model laub()
  // model units - time: min

  // Compartments:
  compartment default_compartment = 1;

  // Species:
  species ACA in default_compartment = 3.39;
  species CAR1 in default_compartment = 2.45;
  species ERK2 in default_compartment = 1.13;
  species PKA in default_compartment = 2.2;
  species REGA in default_compartment = 1.24;
  species cAMP in default_compartment = 1.38;
  species excAMP in default_compartment = 0.48;
  species $p in default_compartment = 1;
  species $s in default_compartment = 1;

  // Parameters:
  k1 = 2;
  k10 = 0.8;
  k11 = 0.7;
  k12 = 4.9;
  k13 = 23;
  k14 = 4.5;
  k2 = 0.9;
  k3 = 2.5;
  k4 = 1.5;
  k5 = 0.6;
  k6 = 0.8;
  k7 = 1;
  k8 = 1.3;
  k9 = 0.3;

  // Reactions:
  v_1: $s -> ACA; k1*CAR1;  // modifiers: CAR1
  v_10: cAMP -> $p; k10*REGA*cAMP;  // modifiers: REGA
  v_11: $s -> excAMP; k11*ACA;  // modifiers: ACA
  v_12: excAMP -> $p; k12*excAMP;
  v_13: $s -> CAR1; k13*excAMP;  // modifiers: excAMP
  v_14: CAR1 -> $p; k14*CAR1;
  v_2: ACA -> $p; k2*ACA*PKA;  // modifiers: PKA
  v_3: $s -> PKA; k3*cAMP;  // modifiers: cAMP
  v_4: PKA -> $p; k4*PKA;
  v_5: $s -> ERK2; k5*CAR1;  // modifiers: CAR1
  v_6: ERK2 -> $p; k6*PKA*ERK2;  // modifiers: PKA
  v_7: $s -> REGA; k7;
  v_8: REGA -> $p; k8*ERK2*REGA;  // modifiers: ERK2
  v_9: $s -> cAMP; k9*ACA;  // modifiers: ACA

  // Unit definitions:
  unit min = 60 second;
end
