// SBML level 2 version 4

function Rate_Law_for_Commensal_Harmful_Death_1(K, S, m1, A1, m2, A2)
  K*S*(m1*A1 + m2*A2);
end

function Rate_Law_for_Commensal_Regrowth(k1, S, m1, m2, k2, P)
  k1*S*m1*m2 - k2*P;
end

function Rate_Law_for_N_Activation_Migration(v, S, m, k1, A1, k2, A2, k3, I1)
  v*S*(m*(k1*A1 + k2*A2) - k3*I1);
end
Rate_Law_for_N_Activation_Migration is "Rate Law for N Activation/Migration";

function Rate_Law_for_M_Activation(K, S, e1, A1, A2, e2, I1)
  K*S*(e1*A1 + A2 - e2*I1);
end

function Rate_Law_for_tDC_Production(K, S, k1, M1, M2, k2, M3, M4)
  K*S*(k1*M1/M2 + k2*M3/(M4 + 100));
end

function Rate_Law_for_CD_Lumen_death(K, S, A1, m2, A2, m3, A3)
  K*S*(A1 + m2*A2 - m3*A3);
end

function Rate_Law_for_eDC(K, S, M1, M2, k2, M3, k1)
  K*S*M1/(k1*M2 + k2*M3);
end

function Rate_Law_for_Effector_DC_Production_1(k, S)
  k*S;
end

function Rate_Law_for_Th17plas(k1, s, k2, m2, p)
  k1*s - k2*m2*p;
end

function Rate_Law_for_E_damage(v, S, k1, a1, k2, a2, k3, a3)
  v*S*(k1*a1 + k2*a2 + k3*a3);
end

function KSA(K, S, A)
  K*S*A;
end

model leber1()

  // Compartments:
  compartment Epithelium = 4;  // isVersionOf BTO:0000416
  compartment LP = 0.07;  // isVersionOf BTO:0002330
  compartment Lumen = 1;  // FMA:14586
  compartment MLN = 1;  // isVersionOf BTO:0000767

  // Species:
  species Cdiff in Lumen = 484;  // taxonomy:1496
  species Commensal_Beneficial in Lumen = 1;  // isVersionOf taxonomy:2
  species Commensal_Dead in Lumen = 50000000000;  // isVersionOf taxonomy:2
  species Commensal_Harmful in Lumen = 15000000000;  // isVersionOf taxonomy:2
  species E in Epithelium = 1052500;  // isVersionOf BTO:0000414
  species E_d in Epithelium = 0;  // isVersionOf BTO:0000414
  species E_i in Epithelium = 0;  // isVersionOf BTO:0000414
  species $M0 in LP = 1714286;  // isVersionOf BTO:0000801
  species M_LP in Epithelium = 3250;  // occursIn BTO:0000801 BTO:0002330
  species $N_LP in LP = 714285.7;  // occursIn BTO:0000130 BTO:0002330
  species N_Lum in Lumen = 0;  // isVersionOf FMA:14586 BTO:0000130
  species Th17_LP in LP = 0;  // isVersionOf BTO:0002330 BTO:0005655
  species Th17_MLN in MLN = 0;  // occursIn BTO:0005655 BTO:0000767
  species Th1_LP in LP = 0;  // isVersionOf BTO:0002330 BTO:0001678
  species Th1_MLN in MLN = 0;  // occursIn BTO:0001678 BTO:0000767
  species eDC_LP in LP = 0;  // isVersionOf BTO:0002330 BTO:0002042
  species eDC_MLN in MLN = 0;  // occursIn BTO:0002042 BTO:0000767
  species $iDC_E in Epithelium = 500000;  // isVersionOf BTO:0000416 BTO:0002042
  species iTreg_LP in LP = 0;  // isVersionOf BTO:0002330 BTO:0004520
  species iTreg_MLN in MLN = 0;  // occursIn BTO:0004520 BTO:0000767
  species $nT in MLN = 12000000;  // isVersionOf BTO:000782
  species tDC_LP in Lumen = 0;  // isVersionOf BTO:0002330 BTO:0002042
  species tDC_MLN in Lumen = 0;  // isVersionOf BTO:0000767 BTO:0002042

  // Reactions:
  Cdiff_Death: Cdiff => ; Lumen*Rate_Law_for_CD_Lumen_death(Cdiff_Death_K, Cdiff, M_LP, m2, N_Lum, m3, Commensal_Harmful);  // modifiers: Commensal_Harmful, N_Lum, M_LP
    m3 = 0.1027025; m2 = 594.8965; Cdiff_Death_K = 6.270923e-10;
  Cdiff_Growth: Cdiff => 2 Cdiff; Lumen*KSA(Cdiff_Growth_K, Cdiff, Commensal_Harmful);  // modifiers: Commensal_Harmful, Commensal_Beneficial
    Cdiff_Growth_K = 5e-11;
  Commensal_Death: Commensal_Dead => ; Lumen*Commensal_Death_k1*Commensal_Dead;
    Commensal_Death_k1 = 0.09332775;
  Commensal_Harmful_Death: Commensal_Harmful => ; Lumen*Rate_Law_for_Commensal_Harmful_Death_1(Commensal_Harmful_Death_K, Commensal_Harmful, N_LP, A1, E_i, A2);  // modifiers: E_i, N_LP
    A2 = 0.18; A1 = 0.00478; Commensal_Harmful_Death_K = 2.33225e-5;
  Commensal_Regrowth: Commensal_Beneficial -> Commensal_Dead; Lumen*Rate_Law_for_Commensal_Regrowth(Commensal_Regrowth_k1, Commensal_Beneficial, N_Lum, E_i, Commensal_Regrowth_k2, Commensal_Dead);  // modifiers: E_i, N_Lum
    Commensal_Regrowth_k2 = 0.1562874; Commensal_Regrowth_k1 = 4.5e-10;
  E_Damage: E => E_d; Epithelium*Rate_Law_for_E_damage(E_Damage_v, E, E_Damage_k1, N_Lum, E_Damage_k2, Th17_LP, E_Damage_k3, M_LP);  // modifiers: M_LP, Th17_LP, N_Lum
    E_Damage_k3 = 62.59116; E_Damage_k2 = 2.338128e-6; E_Damage_k1 = 1.1e-5; E_Damage_v = 1.599207e-6;
  E_Heal: E_d => E; Epithelium*E_Heal_k1*E_d;
    E_Heal_k1 = 4000;
  E_Inflame: E => E_i; Epithelium*KSA(E_Inflame_K, E, Cdiff);  // modifiers: Cdiff
    E_Inflame_K = 0.0001710798;
  E_i_Damage: E_i => E_d; Epithelium*Rate_Law_for_E_damage(E_i_Damage_v, E_i, E_i_Damage_k1, N_Lum, E_i_Damage_k2, Th17_LP, E_i_Damage_k3, M_LP);  // modifiers: M_LP, Th17_LP, N_Lum
    E_i_Damage_k3 = 1.160135e-6; E_i_Damage_k2 = 0.01066983; E_i_Damage_k1 = 0.006; E_i_Damage_v = 0.065;
  E_i_Natural_Death: E_i => E_d; Epithelium*E_i_Natural_Death_k1*E_i;
    E_i_Natural_Death_k1 = 2.5;
  M_Activation: $M0 => M_LP; Rate_Law_for_M_Activation(M_Activation_K, M0, e1, Th17_LP, Cdiff, e2, iTreg_LP);  // modifiers: iTreg_LP, Cdiff, Th17_LP
    e2 = 0.09230859; e1 = 2; M_Activation_K = 4.5e-5;
  M_Death: M_LP => ; Epithelium*M_Death_k1*M_LP;  // modifiers: iTreg_LP
    M_Death_k1 = 20;
  N_Activation_Migration: $N_LP => N_Lum; Rate_Law_for_N_Activation_Migration(N_Activation_Migration_v, N_LP, Cdiff, N_Activation_Migration_k1, E_d, N_Activation_Migration_k2, Th17_LP, N_Activation_Migration_k3, iTreg_LP); N_Activation_Migration is "N Activation/Migration";  // modifiers: iTreg_LP, Th17_LP, E_d, Cdiff
    N_Activation_Migration_k3 = 0.1297173; N_Activation_Migration_k2 = 0.1711907; N_Activation_Migration_k1 = 0.1209353; N_Activation_Migration_v = 5.298279e-5;
  N_Degradation: N_Lum => ; Lumen*KSA(N_Degradation_K, N_Lum, Commensal_Beneficial);  // modifiers: Commensal_Beneficial
    N_Degradation_K = 2.359329e-7;
  Th17_Degradation: Th17_LP => ; LP*Th17_Degradation_k1*Th17_LP;  // modifiers: iTreg_LP
    Th17_Degradation_k1 = 2.396651;
  Th17_Differentiation: eDC_MLN => Th17_MLN; MLN*Th17_Differentiation_k1*eDC_MLN;
    Th17_Differentiation_k1 = 2255.805;
  Th17_Migration: Th17_MLN => Th17_LP; Th17_Migration_k1*Th17_MLN;  // modifiers: E_i
    Th17_Migration_k1 = 2.504544;
  Th17_Plasticity: Th17_LP -> iTreg_LP; LP*Rate_Law_for_Th17plas(Th17_Plasticity_k1, Th17_LP, Th17_Plasticity_k2, Cdiff, iTreg_LP);  // modifiers: Cdiff
    Th17_Plasticity_k2 = 0.002040146; Th17_Plasticity_k1 = 1.273932;
  Th1_Degradation: Th1_LP => ; LP*Th1_Degradation_k1*Th1_LP;  // modifiers: Commensal_Dead, iTreg_LP
    Th1_Degradation_k1 = 0.9950569;
  Th1_Differentiation: eDC_MLN => Th1_MLN; MLN*Rate_Law_for_eDC(Th1_Differentiation_K, eDC_MLN, Commensal_Dead, Commensal_Beneficial, Th1_Differentiation_k2, E, Th1_Differentiation_k1);  // modifiers: E, Commensal_Beneficial, Commensal_Dead
    Th1_Differentiation_k1 = 0.06484158; Th1_Differentiation_k2 = 9.655681e-5; Th1_Differentiation_K = 0.0430096;
  Th1_Migration: Th1_MLN => Th1_LP; Th1_Migration_k1*Th1_MLN;  // modifiers: E_i
    Th1_Migration_k1 = 1.459;
  Treg_Degradation: iTreg_LP => ; LP*Treg_Degradation_k1*iTreg_LP;  // modifiers: Cdiff
    Treg_Degradation_k1 = 0.5069887;
  Treg_Differentiation: tDC_MLN => iTreg_MLN; Treg_Differentiation_k1*tDC_MLN;
    Treg_Differentiation_k1 = 53.91306;
  Treg_Migration: iTreg_MLN => iTreg_LP; Treg_Migration_k1*iTreg_MLN;  // modifiers: E_i
    Treg_Migration_k1 = 5.5;
  eDC_Degradation: eDC_MLN => ; MLN*eDC_Degradation_k1*eDC_MLN;  // modifiers: iTreg_MLN
    eDC_Degradation_k1 = 1.724952e-5;
  eDC_Migration: eDC_LP => eDC_MLN; eDC_Migration_k1*eDC_LP;
    eDC_Migration_k1 = 10.5;
  eDC_Production: Cdiff + $iDC_E => eDC_LP; Rate_Law_for_Effector_DC_Production_1(eDC_Production_k, Cdiff);  // modifiers: Commensal_Beneficial, Commensal_Dead
    eDC_Production_k = 0.55;
  tDC_Degradation: tDC_MLN => ; Lumen*Rate_Law_for_Effector_DC_Production_1(tDC_Degradation_k, tDC_MLN);  // modifiers: iTreg_MLN
    tDC_Degradation_k = 0.00095;
  tDC_Migration: tDC_LP => tDC_MLN; Lumen*tDC_Migration_k1*tDC_LP;
    tDC_Migration_k1 = 3.65;
  tDC_Production: Cdiff + $iDC_E => tDC_LP; Rate_Law_for_tDC_Production(tDC_Production_K, Cdiff, tDC_Production_k1, Commensal_Beneficial, Commensal_Dead, tDC_Production_k2, E, E_i);  // modifiers: E_i, E, Commensal_Dead, Commensal_Beneficial
    tDC_Production_k2 = 26.87473; tDC_Production_k1 = 559.2971; tDC_Production_K = 0.0002;

  // Unit definitions:
  unit substance = item;
  unit time = 86400 second;
  unit volume = dimensionless;
end
