// SBML level 2 version 1

model legewie2()

  // Compartments:
  compartment cytosol = 1; cytosol is "Cytosol";  // GO:0005829

  // Species:
  species A in cytosol = 20; A is "APAF-1";  // isVersionOf uniprot:O14727
  species AC9 in cytosol = 0; AC9 is "APAF-1-Caspase 9 complex";  // hasPart uniprot:P55211 uniprot:O14727
  species AC9X in cytosol = 0; AC9X is "APAF-1-Caspase 9-XIAP complex";  // hasPart uniprot:P98170 uniprot:P55211 uniprot:O14727
  species AC9X_C3_star in cytosol = 0; AC9X_C3_star is "Apaf-1-Caspase 9 cleaved -XIAP complex";  // hasPart uniprot:P98170 uniprot:P55211 uniprot:O14727
  species AC9_star in cytosol = 0; AC9_star is "APAF-1-Caspase 9 cleaved complex";  // hasPart uniprot:P55211 uniprot:O14727
  species AC9_starX in cytosol = 0; AC9_starX is "Apaf-1-Caspase 9 cleaved -XIAP complex";  // hasPart uniprot:P98170 uniprot:P55211 uniprot:O14727
  species AC9_starX_C3_star in cytosol = 0; AC9_starX_C3_star is "Apaf-1-Caspase 9 cleaved -XIAP complex";  // hasPart uniprot:P42574 uniprot:P55211 uniprot:P98170 uniprot:O14727
  species Caspase_3 in cytosol = 200;  // isVersionOf uniprot:P42574
  species C3_star in cytosol = 0; C3_star is "Caspase 3 cleaved";  // isVersionOf uniprot:P42574
  species C3_starX in cytosol = 0; C3_starX is "Caspase 3 cleaved - XIAP complex";  // hasPart uniprot:P98170 uniprot:P42574
  species Caspase_9 in cytosol = 20;  // isVersionOf uniprot:P55211
  species C9X in cytosol = 0; C9X is "Caspase 9-XIAP complex";  // hasPart uniprot:P98170 uniprot:P55211
  species C9X_C3_star in cytosol = 0; C9X_C3_star is "Apaf-1-Caspase 9 cleaved -XIAP complex";  // hasPart uniprot:P98170 uniprot:P55211
  species C9_star in cytosol = 0; C9_star is "Caspase 9 cleaved";  // isVersionOf uniprot:P55211
  species C9_starX in cytosol = 0; C9_starX is "Caspase 9 cleaved-XIAP complex";  // hasPart uniprot:P98170 uniprot:P55211
  species C9_starX_C3_star in cytosol = 0; C9_starX_C3_star is "Apaf-1-Caspase 9 cleaved -XIAP complex";  // hasPart uniprot:P42574 uniprot:P98170 uniprot:P55211
  species X in cytosol = 40; X is "XIAP";  // isVersionOf uniprot:P98170

  // Parameters:
  a = 1;
  d = 1;
  k1 = 0.002;
  k10 = 0.001;
  k10b = 0.001;
  k11 = 0.001;
  k11b = 0.001;
  k12 = 0.001;
  k12b = 0.001;
  k13 = 0.002;
  k13b = 0.1;
  k14 = 0.002;
  k14b = 0.1;
  k15 = 0.003;
  k15b = 0.001;
  k16 = 0.001;
  k16prod = 0.02;
  k17 = 0.001;
  k17prod = 0.02;
  k18 = 0.001;
  k18prod = 0.04;
  k19 = 0.001;
  k2 = 5e-6;
  k20 = 0.001;
  k21 = 0.001;
  k22 = 0.001;
  k22prod = 0.2;
  k23 = 0.001;
  k24 = 0.001;
  k25 = 0.001;
  k26 = 0.001;
  k27 = 0.001;
  k28 = 0.001;
  k29 = 0.001;
  k3 = 0.00035;
  k30 = 0.001;
  k31 = 0.001;
  k32 = 0.001;
  k4 = 0.0002;
  k41 = 1;
  k42 = 1;
  k5 = 0.0002;
  k6 = 5e-5;
  k7 = 0.0035;
  k8 = 0.002;
  k8b = 0.1;
  k9 = 0.001;
  k9b = 0.001;
  kb1 = 0.1;

  // Reactions:
  Caspase_9_Apaf_1_binding: A + Caspase_9 -> AC9; cytosol*(k1*A*Caspase_9 - kb1*AC9); Caspase_9_Apaf_1_binding is "Caspase 9 / Apaf-1 binding";  // isVersionOf GO:0005515
  Caspase_9_Apaf_1_Xiap_binding: AC9 + X -> AC9X; cytosol*(k10*AC9*X - k10b*AC9X); Caspase_9_Apaf_1_Xiap_binding is "Caspase 9-Apaf-1 Xiap binding";  // isVersionOf GO:0043027 GO:0005515
  cleaved_Caspase_9_XIAP_binding: C9_star + X -> C9_starX; cytosol*(k11*C9_star*X - k11b*C9_starX);  // isVersionOf GO:0006412 GO:0005515
  v12: AC9_star + X -> AC9_starX; cytosol*(k12*AC9_star*X - k12b*AC9_starX); v12 is "cleaved Caspase 9-Apaf-1 XIAP binding";  // isVersionOf GO:0043027 GO:0005515
  Caspase_9_Xiap_Apaf_1_binding: C9X + A -> AC9X; cytosol*(k13*C9X*A - k13b*AC9X); Caspase_9_Xiap_Apaf_1_binding is "Caspase 9-Xiap Apaf-1 binding";  // isVersionOf GO:0005515
  v14: C9_starX + A -> AC9_starX; cytosol*(k14*C9_starX*A - k14b*AC9_starX); v14 is "cleaved Caspase 9-Xiap Apaf-1 binding";  // isVersionOf GO:0005515
  cleaved_Caspase_3_Xiap_binding: C3_star + X -> C3_starX; cytosol*(k15*C3_star*X - k15b*C3_starX); cleaved_Caspase_3_Xiap_binding is "cleaved Caspase 3-Xiap binding";  // isVersionOf GO:0043027 GO:0005515
  Apaf_1_turnover: => A; cytosol*(k16prod - k16*A); Apaf_1_turnover is "Apaf-1 turnover";  // isVersionOf GO:0044257
  Caspase_9_turnover: => Caspase_9; cytosol*(k17prod - k17*Caspase_9);  // isVersionOf GO:0044257
  Xiap_turnover: => X; cytosol*(k18prod - k18*X);  // isVersionOf GO:0044257
  Caspase_9_Xiap_degradation: C9X => ; cytosol*k19*C9X; Caspase_9_Xiap_degradation is "Caspase 9-Xiap degradation";  // isVersionOf GO:0044257
  Caspase_3_cleavage_by_Caspase_9: Caspase_3 + Caspase_9 => C3_star + Caspase_9; cytosol*k2*Caspase_3*Caspase_9;  // isVersionOf GO:0030693 GO:0006919 ec-code:3.4.22.62
  v20: AC9X => ; cytosol*k20*AC9X; v20 is "Apaf-1-Caspase 9-Xiap degradation";  // isVersionOf GO:0044257
  Apaf_1_Caspase_9_degradation: AC9 => ; cytosol*k21*AC9; Apaf_1_Caspase_9_degradation is "Apaf-1-Caspase 9 degradation";  // isVersionOf GO:0044257
  Caspase_3_turnover: => Caspase_3; cytosol*(k22prod - k22*Caspase_3);  // isVersionOf GO:0044257
  Caspase_3_cleaved_degradation: C3_star => ; cytosol*k23*C3_star;  // isVersionOf GO:0044257
  v24: C3_starX => ; cytosol*k24*C3_starX; v24 is "Caspase 3 cleaved-Xiap degradation";  // isVersionOf GO:0044257
  v25: C9_starX => ; cytosol*k25*C9_starX; v25 is "Caspase 9 cleaved-Xiap degradation";  // isVersionOf GO:0044257
  Caspase_9_cleaved_degradation: C9_star => ; cytosol*k26*C9_star;  // isVersionOf GO:0044257
  v27: AC9_star => ; cytosol*k27*AC9_star; v27 is "Apaf-1 Caspase 9 cleaved degradation";  // isVersionOf GO:0044257
  v28: AC9_starX => ; cytosol*k28*AC9_starX; v28 is "Apaf-1 Caspase 9 cleaved-Xiap degradation";  // isVersionOf GO:0044257
  v29: C9X_C3_star => ; cytosol*k29*C9X_C3_star; v29 is "Caspase9-Xiap-Caspase3_star degradation";  // isVersionOf GO:0044257
  v3: Caspase_3 + AC9 => C3_star + AC9; cytosol*k3*Caspase_3*AC9; v3 is "Caspase 3 cleavage by Caspase 9-Apaf-1";  // ec-code:3.4.22.62 GO:0006919
  v30: AC9_starX_C3_star => ; cytosol*k30*AC9_starX_C3_star; v30 is "Apaf-1-Caspase9-Xiap-Caspase3_star degradation";  // isVersionOf GO:0044257
  v31: C9_starX_C3_star => ; cytosol*k31*C9_starX_C3_star; v31 is "Caspase9_star-Xiap-Caspase3_star degradation";  // isVersionOf GO:0044257
  v32: AC9_starX_C3_star => ; cytosol*k32*AC9_starX_C3_star; v32 is "Apaf-1-Caspase9_star-Xiap-Caspase3_star degradation";  // isVersionOf GO:0044257
  v33: C3_star + C9X -> C9X_C3_star; cytosol*(a*k15*C3_star*C9X - d*k15b*C9X_C3_star); v33 is "Cleaved-Caspase 3 binding with Xiap-Caspase 9";  // isVersionOf GO:0005515
  v34: C3_star + AC9X -> AC9X_C3_star; cytosol*(a*k15*C3_star*AC9X - d*k15b*AC9X_C3_star); v34 is "Cleaved-Caspase 3 binding with Apaf-Xiap-Caspase 9";  // isVersionOf GO:0005515
  v35: C3_star + C9_starX -> C9_starX_C3_star; cytosol*(a*k15*C3_star*C9_starX - d*k15b*C9_starX_C3_star); v35 is "Cleaved-Caspase 3 binding with Cleaved-Xiap-Caspase 9";  // isVersionOf GO:0005515
  v36: C3_star + AC9_starX -> AC9_starX_C3_star; cytosol*(a*k15*C3_star*AC9_starX - d*k15b*AC9_starX_C3_star); v36 is "Apaf-Xiap-cleaved Caspase 9 binding with cleaved Caspase 3";  // isVersionOf GO:0005515
  v37: Caspase_9 + C3_starX -> C9X_C3_star; cytosol*(a*k9*Caspase_9*C3_starX - d*k9b*C9X_C3_star); v37 is "Binding of Caspase 9 to cleaved Caspase 3-Xiap";  // isVersionOf GO:0005515
  v38: AC9 + C3_starX -> AC9X_C3_star; cytosol*(a*k9*AC9*C3_starX - d*k9b*AC9X_C3_star); v38 is "Binding of Apaf-Caspase 9 to cleaved Caspase 3-Xiap";  // isVersionOf GO:0005515
  v39: C9_star + C3_starX -> C9_starX_C3_star; cytosol*(a*k9*C9_star*C3_starX - d*k9b*C9_starX_C3_star); v39 is "Binding of cleaved Caspase 9 to cleaved Caspase 3-Xiap";  // isVersionOf GO:0005515
  v4: Caspase_9 + C3_star => C9_star + C3_star; cytosol*k4*Caspase_9*C3_star; v4 is "Caspase 9 cleavage by cleaved caspase 3";  // ec-code:3.4.22.56 GO:0030693
  v40: AC9_star + C3_starX -> AC9_starX_C3_star; cytosol*(a*k9*AC9_star*C3_starX - d*k9b*AC9_starX_C3_star); v40 is "Binding of cleaved Caspase 9-Apaf-1 to cleaved Caspase 3-Xiap";  // isVersionOf GO:0005515
  v41: C9X_C3_star + A -> AC9X_C3_star; cytosol*(a*k1*C9X_C3_star*A - d*kb1*AC9X_C3_star); v41 is "Binding of Caspase 9-Xiap-cleaved Caspase 3 with Apaf";  // isVersionOf GO:0005515
  v42: C9_starX_C3_star + A -> AC9_starX_C3_star; cytosol*(a*k1*C9_starX_C3_star*A - d*kb1*AC9_starX_C3_star); v42 is "Binding of cleaved Caspase 9-Xiap-cleaved Caspase 3 with Apaf";  // isVersionOf GO:0005515
  v5: AC9 + C3_star => AC9_star + C3_star; cytosol*k5*AC9*C3_star; v5 is "Caspase 9 cleavage by cleaved caspase 3 when Apaf-1 is bound";  // ec-code:3.4.22.56 GO:0030693
  v6: Caspase_3 + C9_star => C3_star + C9_star; cytosol*k6*Caspase_3*C9_star; v6 is "Caspase 3 cleavage by cleaved Caspase 9";  // isVersionOf GO:0030693 ec-code:3.4.22.62
  v7: Caspase_3 + AC9_star => C3_star + AC9_star; cytosol*k7*Caspase_3*AC9_star; v7 is "Caspase 3 cleavage by cleaved Caspase 9 - Apaf-1";  // isVersionOf GO:0030693 ec-code:3.4.22.62
  cleaved_Caspase_9_Apaf_1_binding: C9_star + A -> AC9_star; cytosol*(k8*C9_star*A - k8b*AC9_star); cleaved_Caspase_9_Apaf_1_binding is "cleaved Caspase 9 Apaf-1 binding";  // isVersionOf GO:0005515
  Caspase_9_Xiap_binding: Caspase_9 + X -> C9X; cytosol*(k9*Caspase_9*X - k9b*C9X);  // isVersionOf GO:0043027 GO:0005515

  // Unit definitions:
  unit nanomole = 1e-9 mole;
  unit nM_per_sec = 1e-9 mole / (litre * second);
  unit per_nM_per_sec = litre / (1e-9 mole * second);
  unit nM = 1e-9 mole / litre;
  unit sec_inverse = 1 / second;
end
