// SBML level 3 version 1

model leroux2()

  // Compartments:
  compartment default_compartment = 1;

  // Species:
  species $A in default_compartment = 2300;
  species $B in default_compartment = 300;
  species $C in default_compartment = 0;
  species P in default_compartment = 0;
  species $Q in default_compartment = 500;
  species $R in default_compartment = 0;
  species $S in default_compartment = 0;
  species XC in default_compartment = 0;
  species XCB in default_compartment = 0;
  species XCR in default_compartment = 0;
  species XQ in default_compartment = 0;
  species XQB in default_compartment = 0;
  species XQR in default_compartment = 0;
  species e in default_compartment = 1;
  species eA in default_compartment = 0;
  species eAB in default_compartment = 0;
  species eABC in default_compartment = 0;
  species eABQ in default_compartment = 0;
  species eAC in default_compartment = 0;
  species eAQ in default_compartment = 0;
  species eB in default_compartment = 0;
  species eBC in default_compartment = 0;
  species eBQ in default_compartment = 0;
  species eC in default_compartment = 0;
  species eQ_ in default_compartment = 0;
  species eR in default_compartment = 0;
  species eeQ in default_compartment = 0;

  // Parameters:
  Cell = 1;
  eXTeRNAL = 0;
  k1 = 13.49537;
  k10 = 261.19;
  k10a = 7289.28;
  k11 = 6210.123;
  k11a = 315.6838;
  k12 = 29.99581;
  k12a = 1330.848;
  k13 = 2.278958;
  k14 = 543.4766;
  k14a = 1e-10;
  k15 = 34.92676;
  k15a = 4941.845;
  k16 = 488.9019;
  k16a = 2199.406;
  k17 = 48.52664;
  k17a = 82.50435;
  k19 = 0.01739668;
  k19a = 868.3236;
  k1a = 134.294;
  k2 = 6317.117;
  k20 = 2.005268e-6;
  k20a = 1e-10;
  k21 = 94.60314;
  k21a = 56632.72;
  k22 = 897.7373;
  k22a = 26.80024;
  k23 = 1e-10;
  k23a = 1e-10;
  k24 = 54684.42;
  k24a = 13678.38;
  k25 = 8.612856e-14;
  k25a = 1e-10;
  k26 = 0.04749572;
  k26a = 1058.425;
  k27 = 15.17703;
  k28 = 455.4657;
  k28a = 290.4226;
  k29 = 30247.77;
  k29a = 200.1432;
  k2a = 42.44692;
  k3 = 223.4013;
  k30 = 234.2366;
  k30a = 1218.736;
  k31 = 1e-10;
  k31a = 420.5515;
  k32 = 14253.47;
  k3a = 286.7064;
  k4 = 762.2666;
  k4a = 39.71496;
  k5 = 22.91729;
  k5a = 1465.04965;
  k6 = 6.496983e-9;
  k6a = 1e-10;
  k7 = 7067.22;
  k7a = 530.5388;
  k8 = 125.2967;
  k8a = 237.4694;
  k9 = 369.6889;
  k9a = 29.8764;

  // Reactions:
  v1: e + $A -> eA; (A*k1*e - k1a*eA)/Cell;
  v10: eAQ + $B -> eABQ; (-(k10a*eABQ) + B*k10*eAQ)/Cell;
  v11: eQ_ + $B -> eBQ; (-(k11a*eBQ) + B*k11*eQ_)/Cell;
  v12: eBQ + $A -> eABQ; (-(k12a*eABQ) + A*k12*eBQ)/Cell;
  v13: eABQ -> P + XQ; k13*eABQ/Cell;
  v14: XQ -> eR; (-(k14a*eR) + k14*XQ)/Cell;
  v15: eR -> e + $R; (-(k15a*R*e) + k15*eR)/Cell;
  v16: XQ + $B -> XQB; (B*k16*XQ - k16a*XQB)/Cell;
  v17: XQ + $R -> XQR; (k17*R*XQ - k17a*XQR)/Cell;
  v19: e + $C -> eC; (C*k19*e - k19a*eC)/Cell;
  v2: eA + $B -> eAB; (B*k2*eA - k2a*eAB)/Cell;
  v20: eC + $A -> eAC; (-(k20a*eAC) + A*k20*eC)/Cell;
  v21: eAC + $B -> eABC; (-(k21a*eABC) + B*k21*eAC)/Cell;
  v22: eC + $B -> eBC; (-(k22a*eBC) + B*k22*eC)/Cell;
  v23: eBC + $A -> eABC; (-(k23a*eABC) + A*k23*eBC)/Cell;
  v24: eA + $C -> eAC; (C*k24*eA - k24a*eAC)/Cell;
  v25: eB + $C -> eBC; (C*k25*eB - k25a*eBC)/Cell;
  v26: eAB + $C -> eABC; (C*k26*eAB - k26a*eABC)/Cell;
  v27: eABC -> P + XC; k27*eABC/Cell;
  v28: XC -> eeQ; (-(k28a*eeQ) + k28*XC)/Cell;
  v29: eeQ -> e + $Q; (k29*eeQ - k29a*e*Q)/Cell;
  v3: e + $B -> eB; (B*k3*e - k3a*eB)/Cell;
  v30: XC + $B -> XCB; (B*k30*XC - k30a*XCB)/Cell;
  v31: XC + $R -> XCR; (k31*R*XC - k31a*XCR)/Cell;
  v32: P -> $S; k32*P/Cell;
  v4: eB + $A -> eAB; (-(k4a*eAB) + A*k4*eB)/Cell;
  v5: eAB + $Q -> eABQ; (-(k5a*eABQ) + k5*eAB*Q)/Cell;
  v6: eA + $Q -> eAQ; (-(k6a*eAQ) + k6*eA*Q)/Cell;
  v7: eB + $Q -> eBQ; (-(k7a*eBQ) + k7*eB*Q)/Cell;
  v8: e + $Q -> eQ_; (-(k8a*eQ_) + k8*e*Q)/Cell;
  v9: eQ_ + $A -> eAQ; (-(k9a*eAQ) + A*k9*eQ_)/Cell;
end
