// SBML level 3 version 1

model li2()

  // Compartments:
  compartment default = 1;  // 0-D

  // Species:
  species E in default = 0.0001; E is "Population of Immune effectors";
  species H in default = 5000000; H is "Population of RBCs";
  species I in default = 0; I is "Population of iRBCs";
  species M in default = 10000; M is "Population of malaria parasites";

  // Parameters:
  alfa = 9e-7;
  beta = 0.0005;
  d1 = 0.0083;
  d2 = 0.04;
  delta = 1;
  gamma = 0.000667;
  k1 = 2.5e-5;
  k2 = 1.03e-5;
  lambda = 41500;
  mu = 48;
  p1 = 1e-8;
  p2 = 1e-8;
  r = 12;

  // Reactions:
  v1: -> H; lambda;
  v10: -> E; k1*I*E/(1 + beta*I);  // modifiers: I
  v11: -> E; k2*M*E/(1 + gamma*M);  // modifiers: M
  v2: H -> ; d1*H;
  v3: H -> I; alfa*H*M;  // modifiers: M
  v4: I -> ; delta*I;
  v5: I -> ; p1*I*E/(1 + beta*I);  // modifiers: E
  v6: -> M; r*I;  // modifiers: I
  v7: M -> ; mu*M;
  v8: M -> ; p2*M*E/(1 + gamma*M);  // modifiers: E
  v9: E -> ; d2*E;
end
