// SBML level 2 version 4

model liebal1()

  // Compartments:
  compartment compartment = 1;  // GO:0005623

  // Species:
  species $IPTG in compartment = 100;  // CHEBI:61448
  species lacz in compartment = 0;  // GO:0015925
  species sigb in compartment = 0;  // interpro:IPR006288
  species x in compartment = 0;  // CHEBI:35222

  // Parameters:
  kbd = 0.0164812;  // GO:0006508
  kbs = 100;  // GO:0009058
  kxd = 1.08559e-9;  // GO:0006508
  kxs = 9.32517e-8;  // GO:0009058
  kzd = 1.34615e-7;  // GO:0006508
  kzs = 9.03538e-7;  // GO:0009058
  kzx = 0.00317772;  // CHEBI:35222
  multiplier = 1;

  // Reactions:
  v1: $IPTG -> sigb; multiplier*IPTG*kbs - kbd*sigb;  // GO:0009058 GO:0006508
  v2: sigb -> lacz; kzs*sigb - lacz*(kzd + kzx*x);  // modifiers: x; GO:0009058 GO:0006508
  v3: sigb -> x; kxs*sigb - kxd*x;  // GO:0009058 GO:0006508
end
