// SBML level 2 version 4

model liebal2()

  // Compartments:
  compartment compartment = 1;  // GO:0005623

  // Species:
  species $IPTG in compartment = 100;  // CHEBI:61448
  species lacz in compartment = 0;  // GO:0015925
  species sigb in compartment = 0;  // interpro:IPR006288
  species x in compartment = 0;  // CHEBI:35222

  // Parameters:
  kbd = 5.8e-9;  // GO:0006508
  kbs = 100;  // GO:0009058
  kbx = 8.4e-5;  // CHEBI:35222
  kxd = 1.2e-13;  // GO:0006508
  kxs = 2e-6;  // GO:0009058
  kzd = 0.052;  // GO:0006508
  kzs = 1.7e-6;  // GO:0009058
  multiplier = 1;

  // Reactions:
  v1: $IPTG -> sigb; multiplier*IPTG*kbs - sigb*(kbd + kbx*x);  // modifiers: x; GO:0006508 GO:0009058
  v2: sigb -> lacz; -(kzd*lacz) + kzs*sigb;  // GO:0006508 GO:0009058
  v3: sigb -> x; kxs*sigb - kxd*x;  // GO:0006508 GO:0009058
end
