// SBML level 2 version 4

model liebal3()

  // Compartments:
  compartment compartment = 1;  // GO:0005623

  // Species:
  species $IPTG in compartment = 100;  // CHEBI:61448
  species lacz in compartment = 0;  // GO:0004565 ec-code:3.2.1.23
  species sigb in compartment = 0;  // interpro:IPR006288
  species x in compartment = 0;  // CHEBI:35222

  // Parameters:
  kbd = 0.044;  // GO:0006508
  kbs = 100;  // GO:0009058
  kxd = 9;  // GO:0006508
  kxs = 0.76;  // GO:0009058
  kzd = 0.041;  // GO:0006508
  kzs = 0.0004;  // GO:0009058
  multiplier = 1;

  // Reactions:
  v1: $IPTG -> sigb; multiplier*IPTG*kbs - kbd*sigb;  // GO:0009058 GO:0006508
  v2: sigb -> lacz; -(kzd*lacz) + kzs*sigb/(1 + x);  // modifiers: x; GO:0006508 GO:0009058
  v3: sigb -> x; -(kxd*x) + kxs*sigb/(1 + x);  // GO:0009058 GO:0006508
end
