// SBML level 3 version 1

model lin3moi()

  // Compartments:
  compartment default_compartment = 1;

  // Species:
  species m1 in default_compartment = 1;
  species m2 in default_compartment = 0;
  species $p in default_compartment = 0;
  species $s in default_compartment = 1;
  species x2 in default_compartment = 0;
  species x3 in default_compartment = 1;

  // Parameters:
  K1m1 = 1;
  K1m2 = 1;
  K1s = 1;
  K1x2 = 1;
  K2x2 = 1;
  K2x3 = 1;
  K3m1 = 1;
  K3m2 = 1;
  K3p = 1;
  K3x3 = 1;
  Keq1 = 1;
  Keq2 = 1;
  Keq3 = 1;
  Vm1 = 1;
  Vm2 = 1;
  Vm3 = 1;

  // Reactions:
  v_1: $s + m1 -> x2 + m2; Vm1/(K1s*K1m1)*(s*m1 - x2*m2/Keq1)/((1 + s/K1s + x2/K1x2)*(1 + m1/K1m1 + m2/K1m2));
  v_2: x2 -> x3; Vm2/K2x2*(x2 - x3/Keq2)/(1 + x2/K2x2 + x3/K2x3);
  v_3: x3 + m2 -> $p + m1; Vm3/(K3x3*K3m2)*(x3*m2 - p/Keq3)/((1 + x3/K3x3 + p/K3p)*(1 + m1/K3m1 + m2/K3m2));
end
