// SBML level 2 version 4

model machado1()

  // Compartments:
  compartment cytosol = 1;  // isVersionOf GO:0005829
  compartment extracellular = 65;  // isVersionOf GO:0005576

  // Species:
  species accoa in cytosol = 1;  // isVersionOf CHEBI:15351
  species cdhap in cytosol = 0.167; cdhap is "Dihydroxyacetonephosphate";  // isVersionOf CHEBI:57642
  species ce4p in cytosol = 0.098; ce4p is "Erythrose-4-phosphate";  // isVersionOf CHEBI:48153
  species cf6p in cytosol = 0.6; cf6p is "Fructose-6-Phosphate";  // isVersionOf CHEBI:78697
  species cfdp in cytosol = 0.272; cfdp is "Fructose-1,6-bisphosphate";  // isVersionOf CHEBI:40595
  species cg1p in cytosol = 0.653; cg1p is "Glucose-1-Phosphate";  // isVersionOf CHEBI:16077
  species cg6p in cytosol = 3.48; cg6p is "Glucose-6-Phosphate";  // isVersionOf CHEBI:14314
  species cgap in cytosol = 0.218; cgap is "Glyceraldehyde-3-Phosphate";  // isVersionOf CHEBI:17138
  species cglcex in extracellular = 55.5; cglcex is "Extracellular Glucose";  // isVersionOf CHEBI:17234
  species cpep in cytosol = 2.67; cpep is "Phosphoenol pyruvate";  // isVersionOf CHEBI:44897
  species cpg in cytosol = 0.808; cpg is "6-Phosphogluconate";  // isVersionOf CHEBI:48928
  species cpg2 in cytosol = 0.399; cpg2 is "2-Phosphoglycerate";  // isVersionOf CHEBI:24344
  species cpg3 in cytosol = 2.13; cpg3 is "3-Phosphoglycerate";  // isVersionOf CHEBI:17794
  species cpgp in cytosol = 0.008; cpgp is "1,3-diphosphosphoglycerate";  // isVersionOf pubchem.compound:683
  species cpyr in cytosol = 2.67; cpyr is "Pyruvate";  // isVersionOf CHEBI:32816
  species crib5p in cytosol = 0.398; crib5p is "Ribose-5-phosphate";  // isVersionOf CHEBI:58273
  species cribu5p in cytosol = 0.111; cribu5p is "Ribulose-5-phosphate";  // isVersionOf CHEBI:58121
  species csed7p in cytosol = 0.276; csed7p is "sedoheptulose-7-phosphate";  // isVersionOf CHEBI:15721
  species cur in cytosol = 0;  // isVersionOf CHEBI:3962
  species cur_ext in extracellular = 0;  // isVersionOf CHEBI:3962
  species cxyl5p in cytosol = 0.138; cxyl5p is "Xylulose-5-phosphate";  // isVersionOf CHEBI:57737
  species fer in cytosol = 0;  // isVersionOf CHEBI:17620
  species fer_ext in extracellular = 271.5;  // isVersionOf CHEBI:17620
  species fercoa in cytosol = 0;  // isVersionOf CHEBI:14261
  species ferdicoa in cytosol = 0;  // isVersionOf CHEBI:71236
  species malcoa in cytosol = 1;  // isVersionOf CHEBI:15531

  // Parameters:
  Dil = 0 second_inverse;
  cadp = 0.595;
  camp = 0.955;
  catp = 4.27;
  cnad = 1.47;
  cnadh = 0.1;
  cnadp = 0.195;
  cnadph = 0.062;

  // Reactions:
  ACCOAC: accoa => malcoa; cytosol*rmaxACCOAC*accoa/(K_ACCOAC_accoa*(1 + malcoa/Ki_ACCOAC_malcoa) + accoa);
    Ki_ACCOAC_malcoa = 0.1; K_ACCOAC_accoa = 0.0003; rmaxACCOAC = 0.04634 mM_per_second;
  CURS: ferdicoa + fercoa => cur; E_CURS*kcat_CURS*(fercoa/(Km_CURS_fercoa + fercoa))*(ferdicoa/(Km_CURS_ferdicoa + ferdicoa));
    Km_CURS_ferdicoa = 0.018; Km_CURS_fercoa = 0.018; kcat_CURS = 0.02163; E_CURS = 100;
  CUR_t: cur -> cur_ext; cytosol*k_CUR_t*(cur - cur_ext/Keq_CUR_t);
    Keq_CUR_t = 1 dimensionless; k_CUR_t = 1000 second_inverse;
  DCS: malcoa + fercoa => ferdicoa; E_DCS*kcat_DCS*(fercoa^n_DCS_fercoa/(Km_DCS_fercoa^n_DCS_fercoa + fercoa^n_DCS_fercoa))*(malcoa/(Km_DCS_malcoa + malcoa));
    n_DCS_fercoa = 1.8; Km_DCS_malcoa = 0.0084; Km_DCS_fercoa = 0.046; kcat_DCS = 0.01343; E_DCS = 100;
  EX_CUR: cur_ext => ; extracellular*Dil*cur_ext;
  EX_FER: => fer_ext; extracellular*Dil*(cfeed_fer - fer_ext);
    cfeed_fer = 500;
  FER_t: fer_ext -> fer; extracellular*k_FER_t*(fer_ext - fer/Keq_FER_t);
    Keq_FER_t = 1 dimensionless; k_FER_t = 1000 second_inverse;
  R4CL: fer => fercoa; E_4CL*kcat_4CL*fer/(Km_4CL + fer);
    Km_4CL = 0.026; kcat_4CL = 9.572; E_4CL = 100;
  Synth3: accoa => ; cytosol*rmaxSynth3*accoa/(KSynth3accoa + accoa); Synth3 is "Synthesis 3";
    KSynth3accoa = 1; rmaxSynth3 = 0.284 mM_per_second;
  Synth4: malcoa => ; cytosol*rmaxSynth4*malcoa/(KSynth4malcoa + malcoa); Synth4 is "Synthesis 4";
    KSynth4malcoa = 1; rmaxSynth4 = 0.092372 mM_per_second;
  vACCOA: accoa -> ; cytosol*Dil*accoa; vACCOA is "ACCOA dilution";
  vALDO: cfdp -> cgap + cdhap; cytosol*rmaxALDO*(cfdp - cgap*cdhap/kALDOeq)/(kALDOfdp + cfdp + kALDOgap*cdhap/(kALDOeq*VALDOblf) + kALDOdhap*cgap/(kALDOeq*VALDOblf) + cfdp*cgap/kALDOgapinh + cgap*cdhap/(VALDOblf*kALDOeq)); vALDO is "Aldolase";
    kALDOgapinh = 0.6; kALDOdhap = 0.088; VALDOblf = 2 dimensionless; kALDOgap = 0.088; kALDOfdp = 1.75; kALDOeq = 0.144; rmaxALDO = 17.41464 mM_per_second;
  vCUR: cur -> ; cytosol*Dil*cur; vCUR is "CUR dilution";
  vDAHPS: cpep + ce4p => ; cytosol*rmaxDAHPS*ce4p^nDAHPSe4p*cpep^nDAHPSpep/((KDAHPSe4p + ce4p^nDAHPSe4p)*(KDAHPSpep + cpep^nDAHPSpep)); vDAHPS is "DAHP synthesis";
    KDAHPSpep = 0.0053; KDAHPSe4p = 0.035; nDAHPSpep = 2.2 dimensionless; nDAHPSe4p = 2.6 dimensionless; rmaxDAHPS = 0.1079531 mM_per_second;
  vDHAP: cdhap -> ; cytosol*Dil*cdhap; vDHAP is "DHAP degradation";
  vE4P: ce4p -> ; cytosol*Dil*ce4p; vE4P is "E4P dilution";
  vENO: cpg2 -> cpep; cytosol*rmaxENO*(cpg2 - cpep/KENOeq)/(KENOpg2*(1 + cpep/KENOpep) + cpg2); vENO is "Enolase";
    KENOpep = 0.135; KENOpg2 = 0.1; KENOeq = 6.73; rmaxENO = 330.4476 mM_per_second;
  vEXTER: => cglcex; extracellular*Dil*(cfeed_glc - cglcex); vEXTER is "Extracellular glucose kinetics";
    cfeed_glc = 110.96;
  vFER: fer -> ; cytosol*Dil*fer; vFER is "FER dilution";
  vFERCOA: fercoa -> ; cytosol*Dil*fercoa; vFERCOA is "FERCOA dilution";
  vFERDICOA: ferdicoa -> ; cytosol*Dil*ferdicoa; vFERDICOA is "FERDICOA dilution";
  vG1PAT: cg1p => ; cytosol*rmaxG1PAT*cg1p*catp*(1 + (cfdp/KG1PATfdp)^nG1PATfdp)/((KG1PATatp + catp)*(KG1PATg1p + cg1p)); vG1PAT is "Glucose-1-phosphate adenyltransferase";  // modifiers: cfdp
    KG1PATg1p = 3.2; KG1PATatp = 4.42; nG1PATfdp = 1.2; KG1PATfdp = 0.119; rmaxG1PAT = 0.007525458 mM_per_second;
  vG3PDH: cdhap => ; cytosol*rmaxG3PDH*cdhap/(KG3PDHdhap + cdhap); vG3PDH is "Glycerol-3-phosphate dehydrogenase";
    KG3PDHdhap = 1; rmaxG3PDH = 0.01162043 mM_per_second;
  vG6P: cg6p -> ; cytosol*Dil*cg6p; vG6P is "G6P degradation";
  vG6PDH: cg6p => cpg; cytosol*rmaxG6PDH*cg6p*cnadp/((cg6p + KG6PDHg6p)*(1 + cnadph/KG6PDHnadphg6pinh)*(KG6PDHnadp*(1 + cnadph/KG6PDHnadphnadpinh) + cnadp)); vG6PDH is "Glucose-6-phosphate dehydrogenase";
    KG6PDHnadphnadpinh = 0.01; KG6PDHnadp = 0.0246; KG6PDHnadphg6pinh = 6.43; KG6PDHg6p = 14.4; rmaxG6PDH = 1.380197 mM_per_second;
  vGAP: cgap -> ; cytosol*Dil*cgap; vGAP is "GAP degradation";
  vGAPDH: cgap -> cpgp; cytosol*rmaxGAPDH*(cgap*cnad - cpgp*cnadh/KGAPDHeq)/((KGAPDHgap*(1 + cpgp/KGAPDHpgp) + cgap)*(KGAPDHnad*(1 + cnadh/KGAPDHnadh) + cnad)); vGAPDH is "Glyceraldehyde-3-phosphate dehydrogenase";
    KGAPDHnadh = 1.09; KGAPDHnad = 0.252; KGAPDHpgp = 1.04e-5; KGAPDHgap = 0.683; KGAPDHeq = 0.63 dimensionless; rmaxGAPDH = 921.5943 mM_per_second;
  vGLP: cg1p -> ; cytosol*Dil*cg1p; vGLP is "GLP dilution";
  vMALCOA: malcoa -> ; cytosol*Dil*malcoa; vMALCOA is "MALCOA dilution";
  vMURSyNTH: 2 cf6p => ; cytosol*rmaxMurSynth; vMURSyNTH is "Mureine synthesis";
    rmaxMurSynth = 0 mM_per_second;
  vMethSynth: => cpyr; cytosol*rmaxMetSynth; vMethSynth is "Methionine synthesis";
    rmaxMetSynth = 0.0022627 mM_per_second;
  vPDH: cpyr => accoa; cytosol*rmaxPDH*cpyr^nPDH/(KPDHpyr*(1 + accoa/Ki_PDH_accoa) + cpyr^nPDH); vPDH is "Pyruvate dehydrogenase";
    Ki_PDH_accoa = 0.0222222; KPDHpyr = 1159; nPDH = 3.68 dimensionless; rmaxPDH = 270.27734 mM_per_second;
  vPEP: cpep -> ; cytosol*Dil*cpep; vPEP is "PEP degradation";
  vPFK: cf6p => cfdp; cytosol*rmaxPFK*catp*cf6p/((catp + KPFKatps*(1 + cadp/KPFKadpc))*(cf6p + KPFKf6ps*(1 + cpep/KPFKpep + cadp/KPFKadpb + camp/KPFKampb)/(1 + cadp/KPFKadpa + camp/KPFKampa))*(1 + LPFK/(1 + cf6p*(1 + cadp/KPFKadpa + camp/KPFKampa)/(KPFKf6ps*(1 + cpep/KPFKpep + cadp/KPFKadpb + camp/KPFKampb)))^nPFK)); vPFK is "Phosphofructokinase";  // modifiers: cpep
    nPFK = 11.1 dimensionless; LPFK = 5629067 dimensionless; KPFKampa = 19.1; KPFKadpa = 128; KPFKampb = 3.2; KPFKadpb = 3.89; KPFKpep = 3.26; KPFKf6ps = 0.325; KPFKadpc = 4.14; KPFKatps = 0.123; rmaxPFK = 1840.585 mM_per_second;
  vPG: cpg -> ; cytosol*Dil*cpg; vPG is "PG dilution";
  vPG3: cpg3 -> ; cytosol*Dil*cpg3; vPG3 is "PG3 degradation";
  vPGDH: cpg => cribu5p; cytosol*rmaxPGDH*cpg*cnadp/((cpg + KPGDHpg)*(cnadp + KPGDHnadp*(1 + cnadph/KPGDHnadphinh)*(1 + catp/KPGDHatpinh))); vPGDH is "6-Phosphogluconate dehydrogenase";
    KPGDHatpinh = 208; KPGDHnadphinh = 0.0138; KPGDHnadp = 0.0506; KPGDHpg = 37.5; rmaxPGDH = 16.23236 mM_per_second;
  vPGI: cg6p -> cf6p; cytosol*rmaxPGI*(cg6p - cf6p/KPGIeq)/(KPGIg6p*(1 + cf6p/(KPGIf6p*(1 + cpg/KPGIf6ppginh)) + cpg/KPGIg6ppginh) + cg6p); vPGI is "Glucose-6-phosphate isomerase";  // modifiers: cpg
    KPGIg6ppginh = 0.2; KPGIf6ppginh = 0.2; KPGIf6p = 0.266; KPGIg6p = 2.9; KPGIeq = 0.1725 dimensionless; rmaxPGI = 650.9879 mM_per_second;
  vPGK: cpgp -> cpg3; cytosol*rmaxPGK*(cadp*cpgp - catp*cpg3/KPGKeq)/((KPGKadp*(1 + catp/KPGKatp) + cadp)*(KPGKpgp*(1 + cpg3/KPGKpg3) + cpgp)); vPGK is "Phosphoglycerate kinase";
    KPGKpg3 = 0.473; KPGKpgp = 0.0468; KPGKatp = 0.653; KPGKadp = 0.185; KPGKeq = 1934.4 dimensionless; rmaxPGK = 3021.774 mM_per_second;
  vPGM: cg6p -> cg1p; cytosol*rmaxPGM*(cg6p - cg1p/KPGMeq)/(KPGMg6p*(1 + cg1p/KPGMg1p) + cg6p); vPGM is "Phosphoglucomutase";
    KPGMg1p = 0.0136; KPGMg6p = 1.038; KPGMeq = 0.196 dimensionless; rmaxPGM = 0.8398243 mM_per_second;
  vPGP: cpgp -> ; cytosol*Dil*cpgp; vPGP is "PGP degradation";
  vPK: cpep => cpyr; cytosol*rmaxPK*cpep*(cpep/KPKpep + 1)^(nPK - 1)*cadp/(KPKpep*(LPK*((1 + catp/KPKatp)/(cfdp/KPKfdp + camp/KPKamp + 1))^nPK + (cpep/KPKpep + 1)^nPK)*(cadp + KPKadp)); vPK is "Pyruvate kinase";  // modifiers: cfdp
    KPKadp = 0.26; KPKamp = 0.2; KPKfdp = 0.19; KPKatp = 22.5; LPK = 1000 dimensionless; nPK = 4 dimensionless; KPKpep = 0.31; rmaxPK = 0.0611315 mM_per_second;
  vPPK: crib5p => ; cytosol*rmaxRPPK*crib5p/(KRPPKrib5p + crib5p); vPPK is "Ribose phosphate pyrophosphokinase";
    KRPPKrib5p = 0.1; rmaxRPPK = 0.01290045 mM_per_second;
  vPTS: cpep + cglcex => cpyr + cg6p; extracellular*rmaxPTS*cglcex*(cpep/cpyr)/((KPTSa1 + KPTSa2*(cpep/cpyr) + KPTSa3*cglcex + cglcex*(cpep/cpyr))*(1 + cg6p^nPTSg6p/KPTSg6p)); vPTS is "Phosphotransferase system";
    KPTSg6p = 2.15; nPTSg6p = 3.66 dimensionless; KPTSa3 = 245.3 dimensionless; KPTSa2 = 0.01; KPTSa1 = 3082.3; rmaxPTS = 7829.78 mM_per_second;
  vR5PI: cribu5p -> crib5p; cytosol*rmaxR5PI*(cribu5p - crib5p/KR5PIeq); vR5PI is "Ribose-phosphate isomerase";
    KR5PIeq = 4 dimensionless; rmaxR5PI = 4.83841193 second_inverse;
  vRIB5P: crib5p -> ; cytosol*Dil*crib5p; vRIB5P is "Rib5P dilution";
  vRibu5p: cribu5p -> ; cytosol*Dil*cribu5p; vRibu5p is "Ribu5P dilution";
  vRu5P: cribu5p -> cxyl5p; cytosol*rmaxRu5P*(cribu5p - cxyl5p/KRu5Peq); vRu5P is "Ribulose-phosphate epimerase";
    KRu5Peq = 1.4 dimensionless; rmaxRu5P = 6.739029 second_inverse;
  vSED7P: csed7p -> ; cytosol*Dil*csed7p; vSED7P is "SED7P dilution";
  vSynth1: cpep => ; cytosol*rmaxSynth1*cpep/(KSynth1pep + cpep); vSynth1 is "Synthesis 1";
    KSynth1pep = 1; rmaxSynth1 = 0.01953897 mM_per_second;
  vSynth2: cpyr => ; cytosol*rmaxSynth2*cpyr/(KSynth2pyr + cpyr); vSynth2 is "Synthesis 2";
    KSynth2pyr = 1; rmaxSynth2 = 0.07361855 mM_per_second;
  vTA: csed7p + cgap -> ce4p + cf6p; cytosol*rmaxTA*(cgap*csed7p - ce4p*cf6p/KTAeq); vTA is "Transaldolase";
    KTAeq = 1.05 dimensionless; rmaxTA = 10.87164 per_mM_per_second;
  vTIS: cdhap -> cgap; cytosol*rmaxTIS*(cdhap - cgap/kTISeq)/(kTISdhap*(1 + cgap/kTISgap) + cdhap); vTIS is "Triosephosphate isomerase";
    kTISgap = 0.3; kTISdhap = 2.8; kTISeq = 1.39 dimensionless; rmaxTIS = 68.67474 mM_per_second;
  vTKA: cxyl5p + crib5p -> csed7p + cgap; cytosol*rmaxTKa*(crib5p*cxyl5p - csed7p*cgap/KTKaeq); vTKA is "Transketolase a";
    KTKaeq = 1.2 dimensionless; rmaxTKa = 9.473385 per_mM_per_second;
  vTKB: cxyl5p + ce4p -> cf6p + cgap; cytosol*rmaxTKb*(cxyl5p*ce4p - cf6p*cgap/KTKbeq); vTKB is "Transketolase b";
    KTKbeq = 10 dimensionless; rmaxTKb = 86.55856 per_mM_per_second;
  vTRPSYNTH: => cgap + cpyr; cytosol*rmaxTrpSynth; vTRPSYNTH is "Tryptophan synthesis";
    rmaxTrpSynth = 0.001037 mM_per_second;
  vXYL5P: cxyl5p -> ; cytosol*Dil*cxyl5p; vXYL5P is "XYL5P dilution";
  vf6P: cf6p -> ; cytosol*Dil*cf6p; vf6P is "F6P degradation";
  vfdP: cfdp -> ; cytosol*Dil*cfdp; vfdP is "FDP degradation";
  vpepCxylase: cpep => ; cytosol*rmaxpepCxylase*cpep*(1 + (cfdp/KpepCxylasefdp)^npepCxylasefdp)/(KpepCxylasepep + cpep); vpepCxylase is "PEP carboxylase";  // modifiers: cfdp
    KpepCxylasepep = 4.07; npepCxylasefdp = 4.21 dimensionless; KpepCxylasefdp = 0.7; rmaxpepCxylase = 0.1070206 mM_per_second;
  vpg2: cpg2 -> ; cytosol*Dil*cpg2; vpg2 is "PG2 degradation";
  vpyr: cpyr -> ; cytosol*Dil*cpyr; vpyr is "Pyruvate dilution";
  vrpGluMu: cpg3 -> cpg2; cytosol*rmaxPGluMu*(cpg3 - cpg2/KPGluMueq)/(KPGluMupg3*(1 + cpg2/KPGluMupg2) + cpg3); vrpGluMu is "Phosphoglycerate mutase";
    KPGluMupg2 = 0.369; KPGluMupg3 = 0.2; KPGluMueq = 0.188 dimensionless; rmaxPGluMu = 89.04965 mM_per_second;
  vsersynth: cpg3 => ; cytosol*rmaxSerSynth*cpg3/(KSerSynthpg3 + cpg3); vsersynth is "Serine synthesis";
    KSerSynthpg3 = 1; rmaxSerSynth = 0.025712107 mM_per_second;

  // Unit definitions:
  unit per_mM_per_second = litre / (second * 1e-3 mole);
  unit mM_per_second = 1e-3 mole / (second * litre);
  unit second_inverse = 1 / second;
  unit milli_Molar = 1e-3 mole / litre;
  unit millimole = 1e-3 mole;
end
