// SBML level 3 version 1

model maiwald()
  // model units - substance: AU, time: min, extent: AU

  // Compartments:
  compartment default_compartment = 1;

  // Species:
  substanceOnly species ActivatedReceptorComplex in default_compartment = 0;
  substanceOnly species ActivatedReceptorComplexSTAT2c in default_compartment = 0;
  substanceOnly species ActivatedReceptorComplexSTAT2cSTAT1c in default_compartment = 0;
  substanceOnly species CP in default_compartment = 20;
  substanceOnly species IFN in default_compartment = 0;
  substanceOnly species IFNARdimer in default_compartment = 0;
  substanceOnly species IRF9c in default_compartment = 45;
  substanceOnly species IRF9n in default_compartment = 0;
  substanceOnly species ISGF3c in default_compartment = 0;
  substanceOnly species ISGF3cCP in default_compartment = 0;
  substanceOnly species ISGF3n in default_compartment = 0;
  substanceOnly species ISGF3nNP in default_compartment = 0;
  substanceOnly species JAK in default_compartment = 26;
  substanceOnly species NP in default_compartment = 40;
  substanceOnly species OccupiedISGF3nbindingsites in default_compartment = 0;
  substanceOnly species OccupiedISGF3nbindingsitesNP in default_compartment = 0;
  substanceOnly species OpenISGF3nbindingsites in default_compartment = 500;
  substanceOnly species PIAS in default_compartment = 10;
  substanceOnly species PIASISGF3n in default_compartment = 0;
  substanceOnly species ReceptorIFNAR1 in default_compartment = 1000;
  substanceOnly species ReceptorJAKcomplex in default_compartment = 0;
  substanceOnly species ReceptorTYKcomplex in default_compartment = 0;
  substanceOnly species SOCS1 in default_compartment = 0;
  substanceOnly species STAT1c in default_compartment = 1500;
  substanceOnly species STAT1cstarSTAT2cstar in default_compartment = 0;
  substanceOnly species STAT1cstarSTAT2cstarCP in default_compartment = 0;
  substanceOnly species STAT1n in default_compartment = 0;
  substanceOnly species STAT1nstarSTAT2nstar in default_compartment = 0;
  substanceOnly species STAT1nstarSTAT2nstarNP in default_compartment = 0;
  substanceOnly species STAT2c in default_compartment = 250;
  substanceOnly species STAT2cIRF9 in default_compartment = 0;
  substanceOnly species STAT2n in default_compartment = 250;
  substanceOnly species STAT2nIRF9 in default_compartment = 0;
  substanceOnly species TYK in default_compartment = 13;
  substanceOnly species $extVariable in default_compartment = 0;
  substanceOnly species mRNAc in default_compartment = 0;
  substanceOnly species mRNAn in default_compartment = 0;
  substanceOnly species preIFN in default_compartment = 6.5;
  substanceOnly species species6 in default_compartment = 1000;

  // Parameters:
  IRF9deg = 0.0001;
  NPfreebinding = 0.01;
  NPfreeunbinding = 0.1;
  PhosphoTransport = 0.015;
  ReceptorSOCSdeg = 1.2e-5;
  Receptordegradation = 0.0003;
  SOCSbinding = 0.02;
  SOCSunbinding = 0.1;
  STAT1Start = 1500;
  STAT2Start = 250;
  StartingJak = 26;
  StartingReceptor = 1000;
  StartingTyk = 13;
  activatedsynth = 0.045;
  constdeg = 0.0005;
  cytoplasm = 2;
  k1 = 0.1;
  k11 = 0.1;
  k111 = 0.01;
  k112 = 0.1;
  k113 = 2.5e-5;
  k114 = 0.001;
  k118 = 0.01;
  k12 = 0.01;
  k122 = 0.001;
  k123 = 0.003;
  k124 = 0.001;
  k125 = 0.003;
  k127 = 0.1;
  k129 = 0.002;
  k13 = 0.005;
  k130 = 0.0001;
  k131 = 0.1;
  k132 = 0.1;
  k133 = 0.0005;
  k134 = 0.01;
  k135 = 0.0014;
  k136 = 0.01;
  k137 = 0.01;
  k138 = 0.00125;
  k139 = 0.02;
  k140 = 0.0009;
  k17 = 8;
  k18 = 0.1;
  k19 = 0.015;
  k2 = 0.05;
  k21 = 0.05;
  k210 = 0;
  k211 = 0.01;
  k212 = 0.1;
  k214 = 0;
  k22 = 0.01;
  k222 = 0.2;
  k224 = 0.2;
  k230 = 0.1;
  k232 = 0.1;
  k234 = 0.00125;
  k235 = 8.17e-5;
  k236 = 0.01;
  k237 = 0.01;
  k238 = 0.0014;
  k239 = 0.005;
  k28 = 0.1;
  k29 = 0;
  nucleus = 1;
  startkin = 13;
  statrecbinding = 0.002;
  statrecunbinding = 4;
  vactivated = 0.045;
  vconst = 0.005;

  // Assignment rules:
  DNAbinding := OccupiedISGF3nbindingsites*2;
  function6 := activatedsynth*mRNAc - constdeg*SOCS1;
  function4Transcription := k1*OccupiedISGF3nbindingsites;
  function5 := ActivatedReceptorComplex*Receptordegradation + ActivatedReceptorComplex*ReceptorSOCSdeg*SOCS1;
  function4 := vconst + mRNAc*vactivated - IRF9c*IRF9deg;

  // Reactions:
  v_1: 0.5 ReceptorIFNAR1 + 0.5 TYK -> 0.5 ReceptorTYKcomplex; cytoplasm*(k1*ReceptorIFNAR1*TYK - k2*ReceptorTYKcomplex);
  v_10: 0.5 ISGF3c -> ISGF3n; k19*ISGF3c - k29*ISGF3n;
  v_11: 0.5 STAT1cstarSTAT2cstar -> STAT1nstarSTAT2nstar; PhosphoTransport*STAT1cstarSTAT2cstar - k210*STAT1nstarSTAT2nstar;
  v_12: STAT1nstarSTAT2nstar + IRF9n -> ISGF3n; nucleus*(k111*STAT1nstarSTAT2nstar*IRF9n - k211*ISGF3n);
  v_13: OpenISGF3nbindingsites + ISGF3n -> OccupiedISGF3nbindingsites; nucleus*(k112*OpenISGF3nbindingsites*ISGF3n - k212*OccupiedISGF3nbindingsites);
  v_14: $extVariable -> mRNAn; nucleus*function4Transcription;
  v_15: mRNAn -> 0.5 mRNAc; k114*mRNAn - k214*mRNAc;
  v_16: $extVariable -> 0.5 IRF9c; cytoplasm*function4;
  v_17: $extVariable -> 0.5 SOCS1; cytoplasm*function6;
  v_18: 0.5 ActivatedReceptorComplex -> 0.5 ReceptorIFNAR1 + 0.5 species6 + 0.5 JAK + 0.5 TYK; cytoplasm*function5;
  v_19: 0.5 ActivatedReceptorComplex -> 0.5 IFNARdimer; cytoplasm*k118*ActivatedReceptorComplex;
  v_2: 0.5 JAK + 0.5 species6 -> 0.5 ReceptorJAKcomplex; cytoplasm*(k11*JAK*species6 - k21*ReceptorJAKcomplex);
  v_20: IRF9n -> $extVariable; nucleus*IRF9deg*IRF9n;
  v_21: 0.5 STAT2cIRF9 -> 0.5 STAT2c; cytoplasm*IRF9deg*STAT2cIRF9;
  v_22: STAT2nIRF9 -> STAT2n; nucleus*IRF9deg*STAT2nIRF9;
  v_23: 0.5 ISGF3c + 0.5 CP -> 0.5 ISGF3cCP; cytoplasm*(k122*ISGF3c*CP - k222*ISGF3cCP);
  v_24: 0.5 ISGF3cCP -> 0.5 STAT1c + 0.5 STAT2c + 0.5 CP + 0.5 IRF9c; cytoplasm*k123*ISGF3cCP;
  v_25: 0.5 STAT1cstarSTAT2cstar + 0.5 CP -> 0.5 STAT1cstarSTAT2cstarCP; cytoplasm*(k124*STAT1cstarSTAT2cstar*CP - k224*STAT1cstarSTAT2cstarCP);
  v_26: 0.5 STAT1cstarSTAT2cstarCP -> 0.5 STAT1c + 0.5 STAT2c + 0.5 CP; cytoplasm*k125*STAT1cstarSTAT2cstarCP;
  v_27: NP + STAT1nstarSTAT2nstar -> STAT1nstarSTAT2nstarNP; nucleus*(NPfreebinding*NP*STAT1nstarSTAT2nstar - NPfreeunbinding*STAT1nstarSTAT2nstarNP);
  v_28: STAT1nstarSTAT2nstarNP -> STAT1n + STAT2n + NP; nucleus*k127*STAT1nstarSTAT2nstarNP;
  v_29: ISGF3n + NP -> ISGF3nNP; nucleus*(NPfreebinding*ISGF3n*NP - NPfreeunbinding*ISGF3nNP);
  v_3: 0.5 ReceptorJAKcomplex + 0.5 ReceptorTYKcomplex + 0.5 IFN -> 0.5 IFNARdimer; cytoplasm*(k12*ReceptorJAKcomplex*ReceptorTYKcomplex*IFN - k22*IFNARdimer);
  v_30: ISGF3nNP -> STAT1n + STAT2n + NP + IRF9n; nucleus*k129*ISGF3nNP;
  v_31: NP + OccupiedISGF3nbindingsites -> OccupiedISGF3nbindingsitesNP; nucleus*(k130*NP*OccupiedISGF3nbindingsites - k230*OccupiedISGF3nbindingsitesNP);
  v_32: OccupiedISGF3nbindingsitesNP -> STAT1n + STAT2n + IRF9n + OpenISGF3nbindingsites + NP; nucleus*k131*OccupiedISGF3nbindingsitesNP;
  v_33: PIAS + ISGF3n -> PIASISGF3n; nucleus*(k132*PIAS*ISGF3n - k232*PIASISGF3n);
  v_34: 0.5 mRNAc -> $extVariable; cytoplasm*k133*mRNAc;
  v_35: STAT1n -> 0.5 STAT1c; k134*STAT1n - k234*STAT1c;
  v_36: STAT2n -> 0.5 STAT2c; k135*STAT2n - k235*STAT2c;
  v_37: 0.5 STAT2c + 0.5 IRF9c -> 0.5 STAT2cIRF9; cytoplasm*(k136*STAT2c*IRF9c - k236*STAT2cIRF9);
  v_38: STAT2n + IRF9n -> STAT2nIRF9; nucleus*(k137*STAT2n*IRF9n - k237*STAT2nIRF9);
  v_39: 0.5 STAT2cIRF9 -> STAT2nIRF9; k138*STAT2cIRF9 - k238*STAT2nIRF9;
  v_4: 0.5 IFNARdimer -> 0.5 ActivatedReceptorComplex; cytoplasm*k13*IFNARdimer;
  v_40: 0.5 IRF9c -> IRF9n; k139*IRF9c - k239*IRF9n;
  v_41: 0.5 preIFN -> 0.5 IFN; cytoplasm*k140*preIFN;
  v_5: 0.5 STAT2cIRF9 + 0.5 ActivatedReceptorComplex -> 0.5 ActivatedReceptorComplexSTAT2c + 0.5 IRF9c; cytoplasm*statrecbinding*STAT2cIRF9*ActivatedReceptorComplex;
  v_6: 0.5 STAT2c + 0.5 ActivatedReceptorComplex -> 0.5 ActivatedReceptorComplexSTAT2c; cytoplasm*(statrecbinding*STAT2c*ActivatedReceptorComplex - statrecunbinding*ActivatedReceptorComplexSTAT2c);
  v_7: 0.5 STAT1c + 0.5 ActivatedReceptorComplexSTAT2c -> 0.5 ActivatedReceptorComplexSTAT2cSTAT1c; cytoplasm*(statrecbinding*STAT1c*ActivatedReceptorComplexSTAT2c - statrecunbinding*ActivatedReceptorComplexSTAT2cSTAT1c);
  v_8: 0.5 ActivatedReceptorComplexSTAT2cSTAT1c -> 0.5 ActivatedReceptorComplex + 0.5 STAT1cstarSTAT2cstar; cytoplasm*k17*ActivatedReceptorComplexSTAT2cSTAT1c;
  v_9: 0.5 IRF9c + 0.5 STAT1cstarSTAT2cstar -> 0.5 ISGF3c; cytoplasm*(k18*IRF9c*STAT1cstarSTAT2cstar - k28*ISGF3c);

  // Unit definitions:
  unit AU = 1;
  unit min = 60 second;
end
