// SBML level 2 version 1

model mandlik1()

  // Compartments:
  compartment DefaultCompartment = 1;

  // Species:
  species $AUR1 in DefaultCompartment;
  species IPTG in DefaultCompartment = 10000;
  species $LACI in DefaultCompartment;
  species $LAMDAR in DefaultCompartment;
  species $SLS1 in DefaultCompartment;
  species $SLS4 in DefaultCompartment;
  species $TETR in DefaultCompartment;
  species $as1 in DefaultCompartment;
  species ia1_ActiveTF in DefaultCompartment = 100;
  species ia1_InactiveTF in DefaultCompartment = 100;
  species $ope1 in DefaultCompartment;
  species p1 in DefaultCompartment = 10;
  species p2 in DefaultCompartment = 10;
  species p3 in DefaultCompartment = 10;
  species pAUR1 in DefaultCompartment = 10;
  species pSLS1 in DefaultCompartment = 10;
  species pSLS4 in DefaultCompartment = 10;
  species proAUR1 in DefaultCompartment = 0;
  species proLACI in DefaultCompartment = 0;
  species proLAMDAR in DefaultCompartment = 0;
  species proSLS1 in DefaultCompartment = 0;
  species proSLS4 in DefaultCompartment = 0;
  species proTETR in DefaultCompartment = 0;
  species $rs1 in DefaultCompartment;
  species $rs2 in DefaultCompartment;
  species $rs3 in DefaultCompartment;
  species $rs4 in DefaultCompartment;
  species $rs5 in DefaultCompartment;
  species $rs6 in DefaultCompartment;
  species ter1 in DefaultCompartment = 10;
  species ter2 in DefaultCompartment = 10;
  species ter3 in DefaultCompartment = 10;
  species ter4 in DefaultCompartment = 10;
  species ter5 in DefaultCompartment = 10;
  species ter6 in DefaultCompartment = 10;

  // Parameters:
  ia1_Kd = 0.001;
  ia1_repression_Kd = 1;
  ia1_repression_h = 2;
  p1_strength = 2.5;
  p2_strength = 2.4;
  p3_strength = 2.5;
  pAUR1_strength = 2.014;
  pSLS1_strength = 2.5;
  pSLS4_strength = 2.57;
  pp2_translation_rate = 1;
  pp3_translation_rate = 1;
  pp4_translation_rate = 1;
  pp5_translation_rate = 1;
  pp6_translation_rate = 1;
  proAUR1_degradation_rate = 0.1;
  proLACI_degradation_rate = 0.07;
  proLAMDAR_degradation_rate = 0.0415;
  proSLS1_degradation_rate = 0.07;
  proSLS4_degradation_rate = 0.04;
  proTETR_degradation_rate = 0.08;
  ta1_Kd = 1;
  ta1_h = 2;
  tr1_Kd = 1;
  tr1_h = 2;
  tr2_Kd = 1;
  tr2_h = 2;
  tr3_Kd = 1;
  tr3_h = 2;
  tr4_Kd = 1;
  tr4_h = 2;
  tr5_Kd = 1;
  tr5_h = 2;
  tr6_Kd = 1;
  tr6_h = 2;

  // Assignment rules:
  rs3 := 1/(1 + (proLACI/tr6_Kd)^tr6_h);
  LAMDAR := p1_strength*1/(1 + (proTETR/tr4_Kd)^tr4_h);
  TETR := p3_strength*1/(1 + (proLACI/tr3_Kd)^tr3_h);
  AUR1 := pAUR1_strength*1/(1 + (proSLS1/tr1_Kd)^tr1_h);
  SLS4 := pSLS4_strength*1/(1 + (proAUR1/tr2_Kd)^tr2_h);
  SLS1 := pSLS1_strength*(1 + (proSLS4/ta1_Kd)^ta1_h - 1)/(1 + (proSLS4/ta1_Kd)^ta1_h)*1/(1 + (ia1_ActiveTF/ia1_repression_Kd)^ia1_repression_h)*1/(1 + (proLACI/tr6_Kd)^tr6_h);
  as1 := (1 + (proSLS4/ta1_Kd)^ta1_h - 1)/(1 + (proSLS4/ta1_Kd)^ta1_h);
  ope1 := 1/(1 + (ia1_ActiveTF/ia1_repression_Kd)^ia1_repression_h);
  rs2 := 1/(1 + (proAUR1/tr2_Kd)^tr2_h);
  rs1 := 1/(1 + (proSLS1/tr1_Kd)^tr1_h);
  LACI := p2_strength*1/(1 + (proLAMDAR/tr5_Kd)^tr5_h);
  rs5 := 1/(1 + (proLACI/tr3_Kd)^tr3_h);
  rs4 := 1/(1 + (proLAMDAR/tr5_Kd)^tr5_h);
  rs6 := 1/(1 + (proTETR/tr4_Kd)^tr4_h);

  // Reactions:
  ia1_bind_forward: ia1_ActiveTF + IPTG => ia1_InactiveTF; IPTG*ia1_ActiveTF;
  ia1_bind_reverse: ia1_InactiveTF => ia1_ActiveTF + IPTG; ia1_Kd*ia1_InactiveTF;
  pp1_v1: => proSLS1; 1;
  pp1_v2: proSLS1 => ; proSLS1_degradation_rate*proSLS1;
  pp2_v1: => proAUR1; pp2_translation_rate*pAUR1_strength*AUR1;  // modifiers: AUR1
  pp2_v2: proAUR1 => ; proAUR1_degradation_rate*proAUR1;
  pp3_v1: => proSLS4; pp3_translation_rate*pSLS4_strength*SLS4;  // modifiers: SLS4
  pp3_v2: proSLS4 => ; proSLS4_degradation_rate*proSLS4;
  pp4_v1: => proLACI; pp4_translation_rate*p2_strength*LACI;  // modifiers: LACI
  pp4_v2: proLACI => ; proLACI_degradation_rate*proLACI;
  pp5_v1: => proLAMDAR; pp5_translation_rate*p1_strength*LAMDAR;  // modifiers: LAMDAR
  pp5_v2: proLAMDAR => ; proLAMDAR_degradation_rate*proLAMDAR;
  pp6_v1: => proTETR; pp6_translation_rate*p3_strength*TETR;  // modifiers: TETR
  pp6_v2: proTETR => ; proTETR_degradation_rate*proTETR;
end
