// SBML level 2 version 4

function Reversible_Michaelis_Menten(substrate, product, Kms, Kmp, Vf, Vr)
  (Vf*substrate/Kms - Vr*product/Kmp)/(1 + substrate/Kms + product/Kmp);
end
Reversible_Michaelis_Menten is "Reversible Michaelis-Menten";

function Constant_flux__irreversible(v)
  v;
end
Constant_flux__irreversible is "Constant flux (irreversible)";

function PYK_kinetics(A, B, P, Q, Vmax, Kpep, Kadp, Keq, Kpyr, Katp)
  Vmax*(A*B/(Kpep*Kadp) - P*Q/(Kpep*Kadp*Keq))/((1 + A/Kpep + P/Kpyr)*(1 + B/Kadp + Q/Katp));
end

function HPI_rate_equation(G6P, F6P, ERY4P, FBP, PG, Vmf, Kg6p, Vmr, Kf6p, Kery4p, Kfbp, Kpg)
  (Vmf*(G6P/Kg6p) - Vmr*(F6P/Kf6p))/(1 + G6P/Kg6p + F6P/Kf6p + ERY4P/Kery4p + FBP/Kfbp + PG/Kpg);
end
HPI_rate_equation is "HPI rate-equation";

function GAPDH_0(NAD, G3P, P, DPG, NADH, Vmf, Knad, Kg3p, Kp, Vmr, Kdpg, Knadh)
  (Vmf*(NAD*G3P*P/(Knad*Kg3p*Kp)) - Vmr*(DPG*NADH/(Kdpg*Knadh)))/(1 + NAD/Knad + NAD*G3P/(Knad*Kg3p) + NAD*G3P*P/(Knad*Kg3p*Kp) + DPG*NADH/(Kdpg*Knadh) + NADH/Knadh);
end

function PFK_1_rate_equation(ATP, F6P, ADP, FBP, F26BP, CIT, Vm, Katp, beta, alfa, Kf26bp, Kf6p, L, Kcit, Kiatp, Kadp, Kfbp, Keq)
  Vm*(ATP/Katp/(1 + ATP/Katp))*((1 + beta*F26BP/(alfa*Kf26bp))/(1 + F26BP/(alfa*Kf26bp)))*(F6P*(1 + F26BP/(alfa*Kf26bp))/(Kf6p*(1 + F26BP/Kf26bp))*(1 + F6P*(1 + F26BP/(alfa*Kf26bp))/(Kf6p*(1 + F26BP/Kf26bp)))^3/(L*(1 + CIT/Kcit)^4*(1 + ATP/Kiatp)^4/(1 + F26BP/Kf26bp)^4 + (1 + F6P*(1 + F26BP/(alfa*Kf26bp))/(Kf6p*(1 + F26BP/Kf26bp)))^4) - ADP*FBP/(Kadp*Kfbp*Keq)/(ADP/Kadp + FBP/Kfbp + ADP*FBP/(Kadp*Kfbp) + 1));
end
PFK_1_rate_equation is "PFK-1 rate-equation";

function ALDO_rate_equation(FBP, DHAP, G3P, Vmf, Kfbp, Vmr, Kdhap, Kg3p)
  (Vmf*(FBP/Kfbp) - Vmr*(DHAP*G3P/(Kdhap*Kg3p)))/(1 + FBP/Kfbp + DHAP/Kdhap + G3P/Kg3p + DHAP*G3P/(Kdhap*Kg3p));
end
ALDO_rate_equation is "ALDO rate-equation";

function HK_isoforms_rate_equation(A, B, P, Q, Vm, f1, Ka, Kb, Keq, Kp, Kq, f2, Ka2)
  Vm*(f1/(Ka*Kb)*(A*B - P*Q/Keq)/(1 + A/Ka + B/Kb + A*B/(Ka*Kb) + P/Kp + Q/Kq + P*Q/(Kp*Kq) + A*Q/(Ka*Kq) + P*B/(Kp*Kb)) + f2/(Ka2*Kb)*(A*B - P*Q/Keq)/(1 + A/Ka2 + B/Kb + A*B/(Ka2*Kb) + P/Kp + Q/Kq + P*Q/(Kp*Kq) + A*Q/(Ka2*Kq) + P*B/(Kp*Kb)));
end
HK_isoforms_rate_equation is "HK isoforms rate-equation";

function MCT1_0(Lacin, Lacout, Vmf, Keq, Klacin, Klacout)
  Vmf*(Lacin - Lacout/Keq)/(Klacin*(1 + Lacout/Klacout) + Lacin);
end

function GLUT_isoforms_rate_equation(Gluout, Gluin, Vmf, f1, Keq, Kgluout, Kgluin, f2, Keq1, Kgluout1, Kgluin1)
  Vmf*(f1*(Gluout - Gluin/Keq)/(Kgluout*(1 + Gluin/Kgluin) + Gluout) + f2*(Gluout - Gluin/Keq1)/(Kgluout1*(1 + Gluin/Kgluin1) + Gluout));
end
GLUT_isoforms_rate_equation is "GLUT isoforms rate-equation";

function Random_Bi_Bi_reversible_Michaelis_Menten(A, B, P, Q, Vmf, alfa, Ka, Kb, Vmr, beta, Kp, Kq)
  (Vmf*(A*B/(alfa*Ka*Kb)) - Vmr*(P*Q/(beta*Kp*Kq)))/(1 + A/Ka + B/Kb + A*B/(alfa*Ka*Kb) + P*Q/(beta*Kp*Kq) + P/Kp + Q/Kq);
end
Random_Bi_Bi_reversible_Michaelis_Menten is "Random Bi-Bi reversible Michaelis-Menten";

model marinhernandez1()

  // Compartments:
  compartment compartment = 1;

  // Species:
  species ADP in compartment = 2.4;
  species AMP in compartment = 1.1;
  species ATP in compartment = 9;
  species $Cit in compartment = 1.7;
  species DHAP in compartment = 0.5;
  species $Ery4P in compartment = 0.23;
  species $F26BP in compartment = 0.0033;
  species F6P in compartment = 2;
  species FBP in compartment = 0.6;
  species G3P in compartment = 0.27;
  species G6P in compartment = 2.6;
  species Gluin in compartment = 0.001;
  species $Gluout in compartment = 5;
  species Lacin in compartment = 33;
  species $Lacout in compartment = 1.2;
  species NAD in compartment = 1.3;
  species NADH in compartment = 0.05;
  species PEP in compartment = 0.35;
  species $Pi in compartment = 4;
  species Pyr in compartment = 3;
  species $Xy5P in compartment = 0.016;
  species _13BPG in compartment = 0.001;
  species _2PG in compartment = 0.001;
  species _3PG in compartment = 0.001;
  species $_6PG in compartment = 0.48;
  species $glycogen in compartment = 17.4;

  // Reactions:
  AK: AMP + ATP -> 2 ADP; compartment*(AK_k1*ATP*AMP - AK_k2*ADP^2);
    AK_k2 = 2.26; AK_k1 = 1;
  ALDO: FBP -> G3P + DHAP; compartment*ALDO_rate_equation(FBP, DHAP, G3P, ALDO_Vmf, ALDO_Kfbp, ALDO_Vmr, Kdhap, ALDO_Kg3p);
    ALDO_Kg3p = 0.16; Kdhap = 0.08; ALDO_Vmr = 0.063; ALDO_Kfbp = 0.009; ALDO_Vmf = 0.08;
  ATPases: ATP => $Pi + ADP; compartment*ATPases_k1*ATP;
    ATPases_k1 = 0.00322;
  DHases: NADH -> NAD; compartment*(DHases_k1*NADH - DHases_k2*NAD);
    DHases_k2 = 1; DHases_k1 = 250;
  ENO: _2PG -> PEP; compartment*Reversible_Michaelis_Menten(_2PG, PEP, ENO_Kms, ENO_Kmp, ENO_Vf, ENO_Vr);
    ENO_Vr = 0.38; ENO_Vf = 0.34; ENO_Kmp = 0.06; ENO_Kms = 0.038;
  GAPDH: $Pi + G3P + NAD -> NADH + _13BPG; compartment*GAPDH_0(NAD, G3P, Pi, _13BPG, NADH, GAPDH_Vmf, Knad, GAPDH_Kg3p, GAPDH_Kp, GAPDH_Vmr, Kdpg, Knadh);
    Knadh = 0.01; Kdpg = 0.022; GAPDH_Vmr = 0.413; GAPDH_Kp = 11; GAPDH_Kg3p = 0.19; Knad = 0.09; GAPDH_Vmf = 0.331;
  GLUT: $Gluout -> Gluin; compartment*GLUT_isoforms_rate_equation(Gluout, Gluin, GLUT_Vmf, GLUT_f1, GLUT_Keq, Kgluout, Kgluin, GLUT_f2, Keq1, Kgluout1, Kgluin1);
    Kgluin1 = 10; Kgluout1 = 9.3; Keq1 = 1; GLUT_f2 = 0.9; Kgluin = 10; Kgluout = 1.8; GLUT_Keq = 1; GLUT_f1 = 0.1; GLUT_Vmf = 0.028;
  Glycogen_degradation: $Pi + $glycogen => G6P; compartment*Constant_flux__irreversible(Glycogen_degradation_v);
    Glycogen_degradation_v = 0.0045;
  Glycogen_synthesis: ATP + G6P => 2 $Pi + ADP + $glycogen; compartment*Constant_flux__irreversible(Glycogen_synthesis_v);
    Glycogen_synthesis_v = 0.001;
  HK: ATP + Gluin -> ADP + G6P; compartment*HK_isoforms_rate_equation(Gluin, ATP, G6P, ADP, HK_Vm, HK_f1, HK_Ka, HK_Kb, HK_Keq, HK_Kp, HK_Kq, HK_f2, Ka2);
    Ka2 = 0.3; HK_f2 = 0.99; HK_Kq = 3.5; HK_Kp = 0.02; HK_Keq = 651; HK_Kb = 1.1; HK_Ka = 0.03; HK_f1 = 0.01; HK_Vm = 0.041;
  HPI: G6P -> F6P; compartment*HPI_rate_equation(G6P, F6P, Ery4P, FBP, _6PG, HPI_Vmf, Kg6p, HPI_Vmr, HPI_Kf6p, Kery4p, HPI_Kfbp, Kpg);  // modifiers: _6PG, FBP, Ery4P
    Kpg = 0.015; HPI_Kfbp = 0.06; Kery4p = 0.001; HPI_Kf6p = 0.05; HPI_Vmr = 0.63; Kg6p = 0.4; HPI_Vmf = 0.28;
  LDH: Pyr + NADH -> NAD + Lacin; compartment*Random_Bi_Bi_reversible_Michaelis_Menten(NADH, Pyr, Lacin, NAD, LDH_Vmf, LDH_alfa, LDH_Ka, LDH_Kb, LDH_Vmr, LDH_beta, LDH_Kp, LDH_Kq);
    LDH_Kq = 0.07; LDH_Kp = 4.7; LDH_beta = 1; LDH_Vmr = 0.074; LDH_Kb = 0.3; LDH_Ka = 0.002; LDH_alfa = 1; LDH_Vmf = 0.468;
  MCT1: Lacin -> $Lacout; compartment*MCT1_0(Lacin, Lacout, MCT1_Vmf, MCT1_Keq, Klacin, Klacout);
    Klacout = 0.5; Klacin = 8.5; MCT1_Keq = 1; MCT1_Vmf = 0.03;
  MPM: 13 $Pi + 13 ADP + Pyr => 13 ATP; compartment*Constant_flux__irreversible(MPM_v);
    MPM_v = 0.0001;
  OxPhos: $Pi + ADP => ATP; compartment*Constant_flux__irreversible(OxPhos_v);
    OxPhos_v = 0.01875;
  PFK1: ATP + F6P -> ADP + FBP; compartment*PFK_1_rate_equation(F6P, ATP, FBP, ADP, F26BP, Cit, PFK1_Vm, PFK1_Katp, PFK1_beta, PFK1_alfa, Kf26bp, PFK1_Kf6p, L, Kcit, Kiatp, PFK1_Kadp, PFK1_Kfbp, PFK1_Keq);  // modifiers: Cit, F26BP
    PFK1_Keq = 247; PFK1_Kfbp = 5; PFK1_Kadp = 5; Kiatp = 1.1; Kcit = 6.7; L = 6.6; PFK1_Kf6p = 1.1; Kf26bp = 0.00099; PFK1_alfa = 0.75; PFK1_beta = 1.18; PFK1_Katp = 0.0292; PFK1_Vm = 0.022;
  PGAM: _3PG -> _2PG; compartment*Reversible_Michaelis_Menten(_3PG, _2PG, PGAM_Kms, PGAM_Kmp, PGAM_Vf, PGAM_Vr);
    PGAM_Vr = 0.36; PGAM_Vf = 0.94; PGAM_Kmp = 0.12; PGAM_Kms = 0.19;
  PGK: ADP + _13BPG -> ATP + _3PG; compartment*Random_Bi_Bi_reversible_Michaelis_Menten(_13BPG, ADP, _3PG, ATP, PGK_Vmf, PGK_alfa, PGK_Ka, PGK_Kb, PGK_Vmr, PGK_beta, PGK_Kp, PGK_Kq);
    PGK_Kq = 0.27; PGK_Kp = 0.13; PGK_beta = 1; PGK_Vmr = 2.5; PGK_Kb = 0.04; PGK_Ka = 0.079; PGK_alfa = 1; PGK_Vmf = 8.7;
  PPP: G6P => $_6PG; compartment*Constant_flux__irreversible(PPP_v);
    PPP_v = 9.5e-5;
  PYK: ADP + PEP -> ATP + Pyr; compartment*PYK_kinetics(PEP, ADP, Pyr, ATP, Vmax, Kpep, PYK_Kadp, PYK_Keq, Kpyr, PYK_Katp);
    PYK_Katp = 0.86; Kpyr = 10; PYK_Keq = 195172.4; PYK_Kadp = 0.4; Kpep = 0.05; Vmax = 0.087;
  TK: $Ery4P + $Xy5P => F6P + G3P; compartment*Constant_flux__irreversible(TK_v);
    TK_v = 9.5e-5;
  TPI: DHAP -> G3P; compartment*Reversible_Michaelis_Menten(DHAP, G3P, TPI_Kms, TPI_Kmp, TPI_Vf, TPI_Vr);
    TPI_Vr = 28; TPI_Vf = 3.4; TPI_Kmp = 0.51; TPI_Kms = 1.6;

  // Unit definitions:
  unit substance = 1e-3 mole;
  unit time = 60 second;
  unit volume = 1e-3 litre;
end
