// SBML level 3 version 1

model martins()

  // Compartments:
  compartment default_compartment = 1;

  // Species:
  species GSH in default_compartment = 8;
  species HTA in default_compartment = 0;
  species $Lac in default_compartment = 0;
  species $MG in default_compartment = 0.01;
  species SLG in default_compartment = 0;

  // Parameters:
  KeqGlxII = 440000;
  KiGlxIIHTA = 0.3;
  KmGlxIGSH = 5;
  KmGlxIHTA = 0.53;
  KmGlxIIGSH = 0.0228;
  KmGlxIILac = 10000;
  KmGlxIISLG = 0.32;
  KmGlxISLG = 1.9;
  VGlxII = 0.00103;
  VfGlxI = 0.0318;
  VrGlxI = 3.26e-5;
  k1neHTA = 0.34;
  k2neHTA = 1.01;

  // Reactions:
  v_1: $MG + GSH -> HTA; k1neHTA*MG*GSH - k2neHTA*HTA;
  v_2: HTA -> SLG; (VfGlxI*HTA/KmGlxIHTA - VrGlxI*SLG/KmGlxISLG)/(1 + HTA/KmGlxIHTA + SLG/KmGlxISLG + GSH/KmGlxIGSH);  // modifiers: GSH
  v_3: SLG -> $Lac + GSH; VGlxII/KmGlxIISLG*(SLG - Lac*GSH/KeqGlxII)/(1 + SLG/KmGlxIISLG + Lac/KmGlxIILac + GSH/KmGlxIIGSH + HTA/KiGlxIIHTA);  // modifiers: HTA
end
