// SBML level 2 version 4

model miao2()

  // Compartments:
  compartment default = 1 volume;  // isVersionOf FMA:7195

  // Species:
  // Initial no. of uninfected and infectible epithelial cells per lung
  substanceOnly species Ep in default = 5.8e5;
  // This entity is refered as Ep* in the paper. Infected epithelial cells per lung.
  substanceOnly species Eps in default = 0;
  // Infective viral titer (EID50/ml)
  substanceOnly species V in default = 1.473e3;
  species s4 in default = 0;
  species s5 in default = 0;
  species s6 in default = 0;
  species s7 in default = 0;

  // Parameters:
  // alpha x the infection rate of uninfected epithelial cells ml*per(EID50*day)
  beta_a = 2.4e-6 substance;
  // Virus clearance rate (reduction of infectious viral titer) (per day)
  c_V = 4.2 substance;
  // Death rate of infected epithelial cells (per day)
  delta_Es = 0.6 substance;
  pi_a = 100 substance;
  // Net growth rate of uninfected epithelial cells (per day)
  rho_E = 6.2e-8 substance;

  // Reactions:
  re1: Ep => Eps; beta_a*Ep*V;  // modifiers: V
  re3: s4 => Ep; rho_E*Ep;
  re5: Eps => s5; delta_Es*Eps;
  re6: V => s6; c_V*V;
  re7: s7 => V; pi_a*Eps;  // modifiers: Eps

  // Unit definitions:
  unit time = second;
  unit length = metre;
  unit area = metre^2;
  unit volume = litre;
  unit substance = mole;
end
