// SBML level 3 version 1

model moghadas1()

  // Compartments:
  compartment default = 1;

  // Species:
  species A in default = 80000; A is "AIDS";
  species $EXT in default = 1;
  species X in default = 120000; X is "Susceptible";
  species Y1 in default = 10; Y1 is "Infected with the pathogen";
  species Y2 in default = 70100; Y2 is "HIV infected";
  species Z in default = 30; Z is "Non-infectious";

  // Parameters:
  Pi = 2000;
  beta1 = 0.05;
  beta2 = 0.005;
  c = 4;
  d = 0.06;
  mu = 0.031;
  nu = 0.02;
  tau = 0;

  // Assignment rules:
  N := X + Y1 + Y2 + A + Z;

  // Reactions:
  v_1: $EXT -> X; Pi;
  v_10: A -> $EXT; d*A;
  v_11: X -> Z; tau*c*beta1*Y1*X/N;  // modifiers: Y1
  v_12: Z -> $EXT; mu*Z;
  v_2: X -> $EXT; mu*X;
  v_3: X -> Y1; (1 - tau)*c*beta1*Y1*X/N;
  v_4: X -> Y2; c*beta2*Y2*X/N;
  v_5: Y1 -> Y2; c*beta2*Y1*Y2/N;
  v_6: Y1 -> $EXT; mu*Y1;
  v_7: Y2 -> $EXT; mu*Y2;
  v_8: Y2 -> A; nu*Y2;
  v_9: A -> $EXT; mu*A;
end
