// SBML level 2 version 4

model mol1()

  // Compartments:
  compartment cytoplasm = 1;
  compartment nucleus = 1;

  // Species:
  substanceOnly species PIP2 in cytoplasm = 1.45;  // isVersionOf CHEBI:18348
  substanceOnly species EGF in cytoplasm = 1.6;  // isVersionOf uniprot:P01133
  substanceOnly species STAT1_3_cytoplasm in cytoplasm = 1.1; STAT1_3_cytoplasm is "STAT1/3";  // isVersionOf uniprot:P42224
  substanceOnly species NIK in cytoplasm = 1.5;  // hasProperty GO:0004704
  substanceOnly species Ras in cytoplasm = 1.2;  // isVersionOf interpro:IPR020849
  substanceOnly species STAT1_3_nucleus in nucleus = 0; STAT1_3_nucleus is "STAT1/3";  // isVersionOf uniprot:P42224
  substanceOnly species ERK1_2_nucleus in nucleus = 0; ERK1_2_nucleus is "ERK1/2";  // isVersionOf ec-code:2.7.11.24 uniprot:P27361
  substanceOnly species IRAK1_4 in cytoplasm = 1; IRAK1_4 is "IRAK1/4";  // isVersionOf uniprot:P51617
  substanceOnly species EGFR in cytoplasm = 1.3;  // isVersionOf uniprot:P00533
  substanceOnly species IkB in cytoplasm = 0.8;  // isVersionOf GO:0008385
  substanceOnly species TAB2_TAK1_TAB1 in cytoplasm = 1.3;  // hasPart uniprot:Q8N5C8 uniprot:O43318
  substanceOnly species Shc_Grb2_Sos1 in cytoplasm = 0.3; Shc_Grb2_Sos1 is "Shc/Grb2/Sos1";  // hasPart interpro:IPR000980 uniprot:Q07890 uniprot:P62993
  substanceOnly species Raf in cytoplasm = 1.2;  // isVersionOf uniprot:P04049
  substanceOnly species JAK in cytoplasm = 1.6;  // isVersionOf uniprot:P23458
  substanceOnly species CD14_TLR in cytoplasm = 1.5; CD14_TLR is "CD14-TLR";  // isPartOf uniprot:O60603 uniprot:P08571 reactome:REACT_6966.5
  substanceOnly species MKK3_6 in cytoplasm = 1.5; MKK3_6 is "MKK3/6";  // isVersionOf ec-code:2.7.12.2 uniprot:P46734
  substanceOnly species TNF_cytoplasm in cytoplasm = 1.5;  // isVersionOf uniprot:P01375
  substanceOnly species cfos in nucleus = 0.5;  // isVersionOf uniprot:P01100
  substanceOnly species Akt_cytoplasm in cytoplasm = 1.2;  // isVersionOf uniprot:Q06187
  substanceOnly species ERK1_2_cytoplasm in cytoplasm = 0.8; ERK1_2_cytoplasm is "ERK1/2";  // isVersionOf ec-code:2.7.11.24 uniprot:P27361
  substanceOnly species NFkB_cytoplasm in cytoplasm = 1.2;  // isVersionOf uniprot:P19838
  substanceOnly species TRADD_TRAF2_RIP in cytoplasm = 1.3;  // isVersionOf uniprot:Q12933 uniprot:Q15628 uniprot:Q13546 GO:0002947
  substanceOnly species MKK4_7 in cytoplasm = 1.2; MKK4_7 is "MKK4/7";  // isVersionOf uniprot:O43318
  substanceOnly species IkK_NFkB in cytoplasm = 1.4;  // hasProperty GO:0007252
  substanceOnly species MKK1_2 in cytoplasm = 1.1; MKK1_2 is "MKK1/2";  // isVersionOf ec-code:2.7.12.2 uniprot:P36507
  substanceOnly species ASK in cytoplasm = 1.5;  // isVersionOf uniprot:Q99683
  substanceOnly species NFkB_nucleus in nucleus = 0.2;  // isVersionOf uniprot:P19838
  substanceOnly species TRAF6 in cytoplasm = 1.1;  // isVersionOf uniprot:Q9Y4K3
  substanceOnly species TNFR1 in cytoplasm = 1.3;  // isVersionOf uniprot:P19438
  substanceOnly species p38_nucleus in nucleus = 0.8;  // hasProperty GO:0048273
  substanceOnly species PLC_gamma in cytoplasm = 1.6;  // isVersionOf GO:0019221 uniprot:P19174
  substanceOnly species PI3K in cytoplasm = 1.6;  // isVersionOf uniprot:O00443
  substanceOnly species LPG in cytoplasm = 1.5;  // isVersionOf CHEBI:59681
  substanceOnly species PKC in cytoplasm = 1.5;  // isVersionOf ec-code:2.7.11.1 uniprot:P17252
  substanceOnly species p38_cytoplasm in cytoplasm = 0.9;  // hasProperty GO:0048273
  substanceOnly species JNK_cytoplasm in cytoplasm = 1.2;  // isVersionOf uniprot:P45983
  substanceOnly species TNF_nucleus in nucleus = 0;  // isVersionOf uniprot:P01375
  substanceOnly species JNK_nucleus in nucleus = 0.6;  // isVersionOf uniprot:P45983
  substanceOnly species Akt_nucleus in nucleus = 0;  // isVersionOf uniprot:Q06187
  substanceOnly species MyD88 in cytoplasm = 0.85;  // isVersionOf uniprot:Q99836
  substanceOnly species DAG in cytoplasm = 0.9;  // isVersionOf CHEBI:18035
  substanceOnly species MEKK1 in cytoplasm = 1.4;  // isVersionOf uniprot:Q13233
  substanceOnly species cjun in nucleus = 0.91;  // isVersionOf uniprot:P05412

  // Reactions:
  _14: ASK => MKK3_6; v14*ASK/(k14 + ASK);
    k14 = 0.02; v14 = 1.2;
  _32: PIP2 => DAG; v32*PIP2/(k32 + PIP2);
    k32 = 0.3; v32 = 0.9;
  _36: PI3K => Akt_cytoplasm; v36*PI3K/(k36 + PI3K);
    k36 = 1.5; v36 = 0.8;
  _27: TAB2_TAK1_TAB1 => MKK3_6; v27*TAB2_TAK1_TAB1/(k27 + TAB2_TAK1_TAB1);
    k27 = 0.01; v27 = 0.1;
  _8: IkB => IkK_NFkB; v8*IkB/(k8 + IkB);
    v8 = 1.3; k8 = 0.56;
  _44: JAK => STAT1_3_cytoplasm; v44*JAK/(k44 + JAK);
    k44 = 1.5; v44 = 1;
  _20: IRAK1_4 => TRAF6; k20*IRAK1_4;
    k20 = 0.55;
  _35: EGFR => PI3K; v35*EGFR/(k35 + EGFR);
    k35 = 0.8; v35 = 0.2;
  _28: MKK3_6 => p38_cytoplasm; v28*MKK3_6/(k28 + MKK3_6);
    k28 = 0.03; v28 = 1.5;
  _34: PKC => IkK_NFkB; v34*PKC/(k34 + PKC);
    k34 = 0.2; v34 = 1.2;
  _2: TNFR1 => TRADD_TRAF2_RIP; k2*TNFR1;
    k2 = 1.18;
  _19: MyD88 => IRAK1_4; k19*MyD88;
    k19 = 0.72;
  _48: PKC => Ras; v48*PKC/(k48 + PKC);
    k48 = 1; v48 = 1;
  _42: Ras => MKK4_7; v42*Ras/(k42 + Ras);
    k42 = 1.5; v42 = 0.4;
  _24: MKK1_2 => ERK1_2_cytoplasm; v24*MKK1_2/(k24 + MKK1_2);
    k24 = 0.2; v24 = 0.9;
  _10: MKK4_7 => JNK_cytoplasm; v10*MKK4_7/(k10 + MKK4_7);
    k10 = 0.15; v10 = 0.98;
  _30: EGFR => PLC_gamma; v30*EGFR/(k30 + EGFR);
    k30 = 0.5; v30 = 0.0002;
  _31: PLC_gamma => PIP2; v31*PLC_gamma/(k31 + PLC_gamma);
    k31 = 1; v31 = 0.6;
  _1: TNF_cytoplasm => TNFR1; k1*TNF_cytoplasm;
    k1 = 1.2;
  _26: TAB2_TAK1_TAB1 => MKK4_7; v26*TAB2_TAK1_TAB1/(k26 + TAB2_TAK1_TAB1);
    k26 = 0.01; v26 = 0.3;
  _6: IkK_NFkB => NFkB_cytoplasm; v6*IkK_NFkB/(k6 + IkK_NFkB);
    v6 = 2.2; k6 = 0.1;
  _43: EGFR => JAK; v43*EGFR/(k43 + EGFR);
    k43 = 1.8; v43 = 0.01;
  _29: EGF => EGFR; k29*EGF;
    k29 = 0.6;
  _15: p38_cytoplasm => p38_nucleus; k15*p38_cytoplasm;
    k15 = 1;
  _37: Akt_cytoplasm => Akt_nucleus; k37*Akt_cytoplasm;
    k37 = 0.2;
  _16: p38_nucleus => cfos; v16*p38_nucleus/(k16 + p38_nucleus);
    k16 = 0.2; v16 = 1.5;
  _3: TRADD_TRAF2_RIP => NIK; v3*TRADD_TRAF2_RIP/(k3 + TRADD_TRAF2_RIP);
    v3 = 0.6; k3 = 0.6;
  _23: TAB2_TAK1_TAB1 => MKK1_2; v23*TAB2_TAK1_TAB1/(k23 + TAB2_TAK1_TAB1);
    k23 = 0.01; v23 = 0.2;
  _21: TRAF6 => TAB2_TAK1_TAB1; k21*TRAF6;
    k21 = 0.48;
  _13: TRADD_TRAF2_RIP => ASK; v13*TRADD_TRAF2_RIP/(k13 + TRADD_TRAF2_RIP);
    v13 = 0.99; k13 = 0.08;
  _41: Raf => MKK1_2; v41*Raf/(k41 + Raf);
    k41 = 1.5; v41 = 0.7;
  _22: TAB2_TAK1_TAB1 => NIK; v22*TAB2_TAK1_TAB1/(k22 + TAB2_TAK1_TAB1);
    k22 = 0.2; v22 = 0.5;
  _33: DAG => PKC; k33*DAG;
    k33 = 0.35;
  _38: EGFR => Shc_Grb2_Sos1; k38*EGFR;
    k38 = 0.299;
  _4: TRADD_TRAF2_RIP => MEKK1; v4*TRADD_TRAF2_RIP/(k4 + TRADD_TRAF2_RIP);
    k4 = 1.5; v4 = 0.28;
  _5: NIK => IkB; v5*NIK/(k5 + NIK);
    v5 = 1.3; k5 = 0.15;
  _9: MEKK1 => MKK4_7; v9*MEKK1/(k9 + MEKK1);
    k9 = 0.2; v9 = 0.6;
  _12: JNK_nucleus => cjun; v12*JNK_nucleus/(k12 + JNK_nucleus);
    k12 = 0.62; v12 = 1.14;
  _40: Ras => Raf; v40*Ras/(k40 + Ras);
    k40 = 1.5; v40 = 0.2;
  _17: LPG => CD14_TLR; k17*LPG;
    k17 = 0.6;
  _7: NFkB_cytoplasm => NFkB_nucleus; k7*NFkB_cytoplasm;
    k7 = 1.4;
  _47: TNF_nucleus => TNF_cytoplasm; k47*TNF_nucleus;
    k47 = 1.1;
  _45: STAT1_3_cytoplasm => STAT1_3_nucleus; k45*STAT1_3_cytoplasm;
    k45 = 0.19;
  _25: ERK1_2_cytoplasm => ERK1_2_nucleus; k25*ERK1_2_cytoplasm;
    k25 = 0.42;
  _18: CD14_TLR => MyD88; k18*CD14_TLR;
    k18 = 2;
  _49: PKC => Raf; v49*PKC/(k49 + PKC);
    k49 = 1; v49 = 1;
  _46: NFkB_nucleus => TNF_nucleus; v46*NFkB_nucleus^n46/(kp47 + NFkB_nucleus^n46);
    kp47 = 0.43; n46 = 1; v46 = 2.35;
  _11: JNK_cytoplasm => JNK_nucleus; k11*JNK_cytoplasm;
    k11 = 0.61;
  _39: Shc_Grb2_Sos1 => Ras; v39*Shc_Grb2_Sos1/(k39 + Shc_Grb2_Sos1);
    k39 = 1.2; v39 = 0.24;

  // Unit definitions:
  unit nanomole_per_second = 1e-9 dimensionless * mole / second; nanomole_per_second is "nanomole/second";
  unit _1_per_second = dimensionless / second; _1_per_second is "1/second";
  unit nanomole = 1e-9 mole;
end
