// SBML level 2 version 4

model mulquiney()

  // Compartments:
  compartment compartment = 1;

  // Species:
  species ADP in compartment = 0.00031;
  species AMP in compartment = 3e-5;
  species ATP in compartment = 0.0021;
  species B13PG in compartment = 7e-7;
  species B23PG in compartment = 0.0067;
  species BPGSP in compartment = 3.8e-6;
  species BPGSPB13PG in compartment = 0;
  species BPGSPB23PG in compartment = 0;
  species BPGSPP in compartment = 0;
  species BPGSPPP2GA in compartment = 0;
  species BPGSPPP3GA in compartment = 0;
  species BPGSPPPhos in compartment = 0;
  species $CO2 in compartment = 0.0012;
  species Ery4P in compartment = 1e-5;
  species Fru16P2 in compartment = 2.7e-6;
  species Fru6P in compartment = 1.3e-5;
  species GSH in compartment = 0.0032;
  species GSSG in compartment = 9e-8;
  species $Glc in compartment = 0.005;
  species Glc16P2 in compartment = 0.000122;
  species Glc6P in compartment = 4e-5;
  species GraP in compartment = 5.7e-6;
  species GrnP in compartment = 1.9e-5;
  species Hb in compartment = 0.007;
  species HbADP in compartment = 0;
  species HbATP in compartment = 0;
  species HbB13PG in compartment = 0;
  species HbB23PG in compartment = 0;
  species HbMgATP in compartment = 0;
  species Lac in compartment = 0.0014;
  species $Lace in compartment = 0.00182;
  species Mg in compartment = 0.003;
  species MgADP in compartment = 0;
  species MgATP in compartment = 0;
  species MgB13PG in compartment = 0;
  species MgB23PG in compartment = 0;
  species MgFru16P2 in compartment = 0;
  species MgGlc16P2 in compartment = 0;
  species MgPhos in compartment = 0;
  species NAD in compartment = 6e-5;
  species NADH in compartment = 1.4e-7;
  species NADP in compartment = 1.25e-7;
  species NADPH in compartment = 6.4e-5;
  species P2GA in compartment = 1e-5;
  species P3GA in compartment = 6.4e-5;
  species P6G in compartment = 1.4e-7;
  species P6GL in compartment = 1.4e-10;
  species PEP in compartment = 2.3e-5;
  species Phos in compartment = 0.001;
  species $Phose in compartment = 0.00192;
  species Pyr in compartment = 6e-5;
  species $Pyre in compartment = 8.5e-5;
  species Rib5P in compartment = 1e-5;
  species Ru5P in compartment = 1e-5;
  species Sed7P in compartment = 1e-5;
  species TK in compartment = 3.3e-7;
  species TKG in compartment = 0;
  species TKGEry4P in compartment = 0;
  species TKGRib5P in compartment = 0;
  species TKXu5P in compartment = 0;
  species Xu5P in compartment = 1e-6;

  // Parameters:
  Hct = 0.5;
  KRf16p2 = 5e-6;
  KRg16p2 = 0.0001;
  KRpfkamp = 0.0003;
  KRpfkglc16p2 = 0.01;
  KRpfkphos = 0.03;
  KRpkmgadp = 0.000474;
  KRpkmgatp = 0.003;
  KRpkpep = 0.000225;
  KRpkpyr = 0.002;
  KTpfkatp = 0.0001;
  KTpfkb23pg = 0.005;
  KTpfkmg = 0.004;
  KTpkatp = 0.00339;
  Kahb = 2.511886e-7;
  Kapfk = 8.912509e-8;
  Kdihkbpg = 0.004;
  Kdihkglc16p2 = 3e-5;
  Kdihkglc6p = 1e-5;
  Kdihkgsh = 0.003;
  Kh2bpg = 4270000;
  Kh2f = 1120000;
  Khadp = 5420000;
  Khamp = 3090000;
  Khatp = 9070000;
  Khbpg = 162000000;
  Khf = 7560000;
  Khphos = 5680000;
  Kialdb23pg = 0.0015;
  Kialdfru16p2 = 1.98e-5;
  Kialdgrnp = 1.1e-5;
  Kidgapdhb13pg = 1e-6;
  Kidgapdhgrap = 3.1e-5;
  Kidldhpyr = 0.000101;
  Kienomg = 4.6e-5;
  Kienop2ga = 0.00014;
  Kienopep = 0.0001105;
  Kigapdhnad = 4.5e-5;
  Kigapdhphos = 0.00316;
  Kihkglc = 4.7e-5;
  Kihkglc6p = 4.7e-5;
  Kihkmgadp = 0.001;
  Kihkmgatp = 0.001;
  Kildhnad = 0.000503;
  Kildhnadh = 2.45e-6;
  Kipgkb13pg = 1.6e-6;
  Kipgkmgadp = 8e-5;
  Kipgkmgatp = 0.000186;
  Kipgkp3ga = 0.000205;
  Kkadp = 4.8;
  Kkamp = 1.8;
  Kkatp = 14;
  Kkbpg = 85.1;
  Kkf = 10.7;
  Kkhbpg = 8.9;
  Kkhf = 3.3;
  Kkphos = 3;
  Kmaldfru16p2 = 7.1e-6;
  Kmaldgrap = 0.000189;
  Kmaldgrnp = 3.5e-5;
  Kmenomg = 4.6e-5;
  Kmenop2ga = 0.00014;
  Kmenopep = 0.0001105;
  Kmgadp = 3290;
  Kmgapdhb13pg = 6.71e-7;
  Kmgapdhgrap = 9.5e-5;
  Kmgapdhnad = 4.5e-5;
  Kmgapdhphos = 0.00316;
  Kmgatp = 43200;
  Kmgbpg = 7410;
  Kmgfru16p2 = 363;
  Kmghadp = 107;
  Kmghatp = 748;
  Kmghbpg = 513;
  Kmghf = 89;
  Kmgpifru6p = 7.1e-5;
  Kmgpiglc6p = 0.000181;
  Kmhkmgadp = 0.001;
  Kmhkmgatp = 0.001;
  Kmldhnad = 0.000107;
  Kmldhnadh = 8.44e-6;
  Kmldhplac = 0.000414;
  Kmldhppyr = 0.000414;
  Kmpfkfru16p2 = 0.0005;
  Kmpfkfru6p = 7.5e-5;
  Kmpfkmgadp = 0.00054;
  Kmpfkmgatp = 6.8e-5;
  Kmpgkb13pg = 2e-6;
  Kmpgkmgadp = 0.0001;
  Kmpgkmgatp = 0.001;
  Kmpgkp3ga = 0.0011;
  Kmpgmp2ga = 2.56e-5;
  Kmpgmp3ga = 0.000168;
  Kmtpigrap = 0.000446;
  Kmtpigrnp = 0.0001624;
  VALD = 3.7e-7;
  VENO = 2.2e-7;
  VG6PDH = 9.3e-8;
  VGDH = 7.66e-6;
  VGPI = 2.18e-7;
  VGSSGR = 1.25e-7;
  VHK = 2.5e-8;
  VLDH = 3.43e-6;
  VLactonase = 1.4e-5;
  VP6GDH = 2.1e-6;
  VPFK = 1.1e-7;
  VPGK = 2.74e-6;
  VPGM = 4.1e-7;
  VPK = 8.7e-8;
  VR5PI = 1.42e-5;
  VRu5PE = 4.22e-6;
  VTA = 6.9e-7;
  VTPI = 1.14e-6;
  Ve = 0.5;
  Vi = 0.35;
  alpha = 0.7;
  k1 = 0.15;
  katpase = 0.000585;
  kbpgsp10 = 1979;
  kbpgsp11 = 0.01;
  kbpgsp12 = 1000;
  kbpgsp14 = 1000000000;
  kbpgsp15 = 610000;
  kbpgsp16 = 0.19;
  kbpgsp2 = 400;
  kbpgsp5 = 100000000;
  kbpgsp7 = 1000;
  kbpgsp8 = 10000;
  kbpgsp9 = 0.55;
  kcatfald = 68;
  kcatfeno = 190;
  kcatfgpi = 1470;
  kcatfldh = 458;
  kcatfpfk = 822;
  kcatfpgk = 2290;
  kcatfpgm = 795;
  kcatfpk = 1386;
  kcatftpi = 14560;
  kcatrald = 234;
  kcatreno = 50;
  kcatrgpi = 1760;
  kcatrldh = 115;
  kcatrpfk = 36;
  kcatrpgk = 917;
  kcatrpgm = 714;
  kcatrpk = 3.26;
  kcatrtpi = 1280;
  kfldhp = 0.00346;
  kg6pdh1 = 110000000;
  kg6pdh10 = 1400000000;
  kg6pdh2 = 870;
  kg6pdh3 = 26000000;
  kg6pdh4 = 300;
  kg6pdh5 = 750;
  kg6pdh6 = 2000;
  kg6pdh7 = 220000;
  kg6pdh8 = 1100000000;
  kg6pdh9 = 10000;
  kgssgr1 = 85000000;
  kgssgr10 = 50000000;
  kgssgr11 = 7000;
  kgssgr12 = 100000000;
  kgssgr2 = 510;
  kgssgr3 = 1000000000;
  kgssgr4 = 72000;
  kgssgr5 = 810;
  kgssgr6 = 1000;
  kgssgr7 = 1000000;
  kgssgr8 = 50000000;
  kgssgr9 = 1000000;
  khbadpd = 1200;
  khbatpd = 1200;
  khbb13pgd = 1200;
  khbbpgd = 1200;
  khbmgatpd = 1200;
  klactonase1 = 13000000;
  klactonase2 = 1000;
  klactonase3 = 29;
  klactransporti = 0.0036;
  kmgadpd = 1200;
  kmgatpd = 1200;
  kmgb13pgd = 1200;
  kmgbpgd = 1200;
  kmgf16p2d = 1200;
  kmgphosd = 1200;
  kox = 3.4e-5;
  koxNADH = 0.0163;
  kp6gdh1 = 2400000;
  kp6gdh10 = 225000;
  kp6gdh11 = 300;
  kp6gdh12 = 4950000;
  kp6gdh2 = 410;
  kp6gdh3 = 2000000000;
  kp6gdh4 = 26000;
  kp6gdh5 = 48;
  kp6gdh6 = 30;
  kp6gdh7 = 630;
  kp6gdh8 = 36000;
  kp6gdh9 = 800;
  kphostransporti = 0.00056;
  kpyrtransporti = 0.018;
  kr5pi1 = 60900;
  kr5pi2 = 33.3;
  kr5pi3 = 14.2;
  kr5pi4 = 21600;
  krldhp = 5.43e-7;
  kru5pe1 = 3910000;
  kru5pe2 = 438;
  kru5pe3 = 305;
  kru5pe4 = 1490000;
  kspontaneouspglhydrolysis = 0.00071;
  kta1 = 580000;
  kta2 = 45.3;
  kta3 = 16.3;
  kta4 = 1010000;
  kta5 = 490000;
  kta6 = 60;
  kta7 = 17;
  kta8 = 79000;
  ktk1 = 216000;
  ktk10 = 175;
  ktk11 = 40;
  ktk12 = 21300;
  ktk2 = 38;
  ktk3 = 34;
  ktk4 = 156000;
  ktk5 = 329000;
  ktk6 = 175;
  ktk7 = 40;
  ktk8 = 44800;
  ktk9 = 2240000;
  npfk = 5;
  pH1 = 7.2;
  rtv = 0.69;

  // Reactions:
  vak: MgADP + ADP -> MgATP + AMP; 4300*(1 + Khadp/10^pH1 + Kkadp*k1)*ADP*MgADP - 1400*(1 + Khamp/10^pH1 + Kkamp*k1)*AMP*MgATP;
  vald: Fru16P2 -> GrnP + GraP; VALD*(Fru16P2*kcatfald/Kmaldfru16p2 - GraP*GrnP*kcatrald/(Kialdgrnp*Kmaldgrap))/(1 + GrnP/Kialdgrnp + Fru16P2/Kmaldfru16p2 + GraP*GrnP/(Kialdgrnp*Kmaldgrap) + Fru16P2*GraP*Kmaldgrnp/(Kialdfru16p2*Kialdgrnp*Kmaldgrap) + (B23PG + MgB23PG)/Kialdb23pg + GraP*Kmaldgrnp*(1 + (B23PG + MgB23PG)/Kialdb23pg)/(Kialdgrnp*Kmaldgrap));  // modifiers: B23PG, MgB23PG
  vatpase: MgATP -> MgADP + Phos; katpase*MgATP;
  vbpgsp1: B13PG + BPGSP -> BPGSPB13PG; 2.809509*10^8*B13PG*BPGSP/(1 + 1.584893*10^(-7)*10^pH1) - kbpgsp2*BPGSPB13PG;
  vbpgsp2: BPGSPB13PG -> BPGSPP + P3GA; 17.40992*BPGSPB13PG/(1 + 4.786301*10^28/10^(4*pH1));
  vbpgsp3: BPGSPP + P3GA -> BPGSPPP3GA; -kbpgsp5*BPGSPPP3GA + 3.253369*10^8*BPGSPP*P3GA/(1 + 4.786301*10^28/10^(4*pH1));
  vbpgsp4: BPGSPP + P2GA -> BPGSPPP2GA; -kbpgsp7*BPGSPPP2GA + 1758.578*BPGSPP*P2GA/(1 + 4.786301*10^28/10^(4*pH1));
  vbpgsp5: BPGSPPP3GA -> BPGSPB23PG; kbpgsp8*BPGSPPP3GA - kbpgsp9*BPGSPB23PG;
  vbpgsp6: BPGSPPP2GA -> BPGSPB23PG; kbpgsp10*BPGSPPP2GA - kbpgsp11*BPGSPB23PG;
  vbpgsp7: BPGSPB23PG -> BPGSP + B23PG; -(6.321396*10^6*B23PG*BPGSP/(1 + 1.584893*10^(-7)*10^pH1)) + kbpgsp12*BPGSPB23PG;
  vbpgsp8: BPGSPP + Phos -> BPGSPPPhos; kbpgsp14*BPGSPP*Phos - kbpgsp15*BPGSPPPhos;
  vbpgsp9: BPGSPPPhos -> BPGSP + 2 Phos; kbpgsp16*BPGSPPPhos;
  veno: P2GA -> PEP; VENO*(kcatfeno*Mg*P2GA/(Kienomg*Kmenop2ga) - kcatreno*Mg*PEP/(Kienopep*Kmenomg))/(1 + Mg/Kienomg + P2GA/Kienop2ga + Mg*P2GA/(Kienomg*Kmenop2ga) + PEP/Kienopep + Mg*PEP/(Kienopep*Kmenomg));  // modifiers: Mg
  vg6pdh: Glc6P + NADP -> P6GL + NADPH; VG6PDH*(Glc6P*kg6pdh1*kg6pdh3*kg6pdh5*kg6pdh7*kg6pdh9*NADP - kg6pdh2*kg6pdh4*kg6pdh6*kg6pdh8*kg6pdh10*NADPH*P6GL)/(Glc6P*kg6pdh3*kg6pdh5*kg6pdh7*kg6pdh9 + kg6pdh2*(kg6pdh4*kg6pdh6 + kg6pdh4*kg6pdh7 + kg6pdh5*kg6pdh7)*kg6pdh9 + kg6pdh1*(kg6pdh4*kg6pdh6 + kg6pdh4*kg6pdh7 + kg6pdh5*kg6pdh7)*kg6pdh9*NADP + Glc6P*kg6pdh1*kg6pdh3*(kg6pdh5*kg6pdh7 + kg6pdh5*kg6pdh9 + kg6pdh6*kg6pdh9 + kg6pdh7*kg6pdh9)*NADP + Glc6P*kg6pdh3*kg6pdh5*kg6pdh7*kg6pdh10*NADPH + kg6pdh2*(kg6pdh4*kg6pdh6 + kg6pdh5*kg6pdh6 + kg6pdh5*kg6pdh7)*kg6pdh10*NADPH + kg6pdh2*kg6pdh4*kg6pdh6*kg6pdh8*P6GL + kg6pdh1*kg6pdh4*kg6pdh6*kg6pdh8*NADP*P6GL + Glc6P*kg6pdh1*kg6pdh3*(kg6pdh5 + kg6pdh6)*kg6pdh8*NADP*P6GL + Glc6P*kg6pdh3*(kg6pdh5 + kg6pdh6)*kg6pdh8*kg6pdh10*NADPH*P6GL + (kg6pdh2*kg6pdh4 + kg6pdh2*kg6pdh5 + kg6pdh2*kg6pdh6 + kg6pdh4*kg6pdh6)*kg6pdh8*kg6pdh10*NADPH*P6GL);
  vgapdh: GraP + Phos + NAD -> B13PG + NADH; VGDH*(-5.403045*10^35*B13PG*NADH/10^pH1 + 1.459119*10^21*GraP*NAD*Phos/(Kigapdhphos*Kmgapdhnad))/(2.195178*10^20*(1 + 3.162278*10^7/10^pH1 + 1*10^(-10)*10^pH1)*B13PG*(1 + GraP/Kidgapdhgrap) + 2.098535*10^18*(1 + 3.162278*10^7/10^pH1 + 1*10^(-10)*10^pH1)*GraP*(1 + GraP/Kidgapdhgrap) + 1/Kigapdhnad*2.195178*10^20*(1 + 3.162278*10^7/10^pH1 + 1*10^(-10)*10^pH1)*B13PG*NAD + 1/Kigapdhnad*2.098535*10^18*(1 + 3.162278*10^7/10^pH1 + 1*10^(-10)*10^pH1)*GraP*NAD + 1.054279*10^33*(1 + 3.162278*10^7/10^pH1 + 1*10^(-10)*10^pH1)*Kmgapdhb13pg*NADH/10^pH1 + 1.054279*10^33*(1 + 3.162278*10^7/10^pH1 + 1*10^(-10)*10^pH1)*B13PG*NADH/10^pH1 + 3.325953*10^30*(1 + 3.162278*10^7/10^pH1 + 1*10^(-10)*10^pH1)*GraP*NADH/10^pH1 + 1/Kigapdhphos*2.098535*10^18*(1 + 3.162278*10^7/10^pH1 + 1*10^(-10)*10^pH1)*GraP*(1 + GraP/Kidgapdhgrap)*Phos + 2.098535*10^18*(1 + 3.162278*10^7/10^pH1 + 1*10^(-10)*10^pH1)*Kmgapdhgrap*NAD*Phos/(Kigapdhphos*Kmgapdhnad) + 2.098535*10^18*(1 + 3.162278*10^7/10^pH1 + 1*10^(-10)*10^pH1)*Kmgapdhgrap*B13PG*NAD*Phos/(Kidgapdhb13pg*Kigapdhphos*Kmgapdhnad) + 2.098535*10^18*(1 + 3.162278*10^7/10^pH1 + 1*10^(-10)*10^pH1)*GraP*NAD*Phos/(Kigapdhphos*Kmgapdhnad) + 1/Kigapdhphos*(1.054279*10^33*(1 + 3.162278*10^7/10^pH1 + 1*10^(-10)*10^pH1)*Kmgapdhb13pg*NADH*Phos/10^pH1) + 1.054279*10^33*(1 + 3.162278*10^7/10^pH1 + 1*10^(-10)*10^pH1)*Kmgapdhb13pg*B13PG*NADH*Phos/10^pH1/(Kidgapdhb13pg*Kigapdhphos) + 1/Kigapdhphos*(3.325953*10^30*(1 + 3.162278*10^7/10^pH1 + 1*10^(-10)*10^pH1)*GraP*NADH*Phos/10^pH1));
  vgpi: Glc6P -> Fru6P; VGPI*(-(Fru6P*kcatrgpi/Kmgpifru6p) + Glc6P*kcatfgpi/Kmgpiglc6p)/(1 + Fru6P/Kmgpifru6p + Glc6P/Kmgpiglc6p);
  vgssgr: GSSG + NADPH -> 2 GSH + NADP; VGSSGR*(-GSH^2*kgssgr2*kgssgr4*kgssgr6*kgssgr8*kgssgr10*kgssgr12*NADP + GSSG*kgssgr1*kgssgr3*kgssgr5*kgssgr7*kgssgr9*kgssgr11*NADPH)/(GSH^2*kgssgr2*kgssgr4*kgssgr6*kgssgr8*kgssgr10 + GSH*kgssgr2*kgssgr4*kgssgr6*kgssgr8*kgssgr11 + GSSG*kgssgr3*kgssgr5*kgssgr7*kgssgr9*kgssgr11 + kgssgr2*(kgssgr4*kgssgr6 + kgssgr4*kgssgr7 + kgssgr5*kgssgr7)*kgssgr9*kgssgr11 + GSH*kgssgr2*kgssgr4*kgssgr6*kgssgr8*kgssgr12*NADP + GSSG*kgssgr3*kgssgr5*kgssgr7*kgssgr9*kgssgr12*NADP + kgssgr2*(kgssgr4*kgssgr6 + kgssgr4*kgssgr7 + kgssgr5*kgssgr7)*kgssgr9*kgssgr12*NADP + GSH*GSSG*kgssgr3*kgssgr5*kgssgr7*kgssgr10*kgssgr12*NADP + GSH*kgssgr2*(kgssgr4*kgssgr6 + kgssgr4*kgssgr7 + kgssgr5*kgssgr7)*kgssgr10*kgssgr12*NADP + GSH^2*GSSG*kgssgr3*(kgssgr5 + kgssgr6)*kgssgr8*kgssgr10*kgssgr12*NADP + GSH^2*(kgssgr2*kgssgr4 + kgssgr2*kgssgr5 + kgssgr2*kgssgr6 + kgssgr4*kgssgr6)*kgssgr8*kgssgr10*kgssgr12*NADP + GSH*GSSG*kgssgr1*kgssgr3*kgssgr5*kgssgr7*kgssgr10*NADPH + GSH^2*kgssgr1*kgssgr4*kgssgr6*kgssgr8*kgssgr10*NADPH + GSH^2*GSSG*kgssgr1*kgssgr3*(kgssgr5 + kgssgr6)*kgssgr8*kgssgr10*NADPH + GSH*kgssgr1*kgssgr4*kgssgr6*kgssgr8*kgssgr11*NADPH + GSH*GSSG*kgssgr1*kgssgr3*(kgssgr5 + kgssgr6)*kgssgr8*kgssgr11*NADPH + kgssgr1*(kgssgr4*kgssgr6 + kgssgr4*kgssgr7 + kgssgr5*kgssgr7)*kgssgr9*kgssgr11*NADPH + GSSG*kgssgr1*kgssgr3*(kgssgr5*kgssgr7*kgssgr9 + kgssgr5*kgssgr7*kgssgr11 + kgssgr5*kgssgr9*kgssgr11 + kgssgr6*kgssgr9*kgssgr11 + kgssgr7*kgssgr9*kgssgr11)*NADPH);
  vhbadp: Hb + ADP -> HbADP; -HbADP*khbadpd + 300000*ADP*Hb*(1 + 3.169786*10^7*Kahb + 2.511886*10^14*Kahb^2)/(1 + 2^(1 + pH1)*5^pH1*Kahb + 10^(2*pH1)*Kahb^2);
  vhbatp: Hb + ATP -> HbATP; -HbATP*khbatpd + 432000*ATP*Hb*(1 + 3.169786*10^7*Kahb + 2.511886*10^14*Kahb^2)/(1 + 2^(1 + pH1)*5^pH1*Kahb + 10^(2*pH1)*Kahb^2);
  vhbb13pg: Hb + B13PG -> HbB13PG; -HbB13PG*khbb13pgd + 380000*B13PG*Hb*(1 + 3.169786*10^7*Kahb + 2.511886*10^14*Kahb^2)/(1 + 2^(1 + pH1)*5^pH1*Kahb + 10^(2*pH1)*Kahb^2);
  vhbbpg: Hb + B23PG -> HbB23PG; -HbB23PG*khbbpgd + 300000*B23PG*Hb*(1 + 3.169786*10^7*Kahb + 2.511886*10^14*Kahb^2)/(1 + 2^(1 + pH1)*5^pH1*Kahb + 10^(2*pH1)*Kahb^2);
  vhbmgatp: Hb + MgATP -> HbMgATP; -HbMgATP*khbmgatpd + 46800*Hb*(1 + 3.169786*10^7*Kahb + 2.511886*10^14*Kahb^2)*MgATP/(1 + 2^(1 + pH1)*5^pH1*Kahb + 10^(2*pH1)*Kahb^2);
  vhk: $Glc + MgATP -> MgADP + Glc6P; 2.85714*VHK*Vi*(-(1.92792*Glc6P*MgADP/((1 + 1.047129*10^7/10^pH1 + 2.818383*10^(-10)*10^pH1)*Kihkglc6p*Kmhkmgadp)) + 299.16*Glc*MgATP/((1 + 1.047129*10^7/10^pH1 + 2.818383*10^(-10)*10^pH1)*Kihkglc*Kmhkmgatp))/(1 + Glc/Kihkglc + Glc*B23PG/(Kdihkbpg*Kihkglc) + Glc*Glc16P2/(Kdihkglc16p2*Kihkglc) + Glc*Glc6P/(Kdihkglc6p*Kihkglc) + Glc6P/Kihkglc6p + Glc*GSH/(Kdihkgsh*Kihkglc) + MgADP/Kihkmgadp + Glc6P*MgADP/(Kihkglc6p*Kmhkmgadp) + MgATP/Kihkmgatp + Glc*MgATP/(Kihkglc*Kmhkmgatp));  // modifiers: B23PG, Glc16P2, GSH
  vlactransport: Lac -> $Lace; 2.85714*(-klactransporti*Lace*Ve + klactransporti*Ve*Lac/(1 + 10^(-3.73 + pH1))*(1 + 10^(-3.73 + pH1)/rtv));
  vldh: Pyr + NADH -> Lac + NAD; VLDH*(-(1306.642*kcatrldh*Lac*NAD/((1 + 6.309573*10^6/10^pH1)*Kildhnad)) + 25634.21*kcatfldh*NADH*Pyr/((1 + 1.584893*10^(-7)*10^pH1)*Kildhnadh))/(NAD/Kildhnad + 1306.642*Lac*NAD/((1 + 6.309573*10^6/10^pH1)*Kildhnad) + NADH/Kildhnadh + 1306.642*Kmldhnad*Lac*NADH/((1 + 6.309573*10^6/10^pH1)*Kildhnad*Kildhnadh) + 25634.21*Kmldhnadh*NAD*Pyr/((1 + 1.584893*10^(-7)*10^pH1)*Kildhnad*Kildhnadh) + 2.012622*10^7*Lac*NAD*Pyr/((1 + 6.309573*10^6/10^pH1)*(1 + 1.584893*10^(-7)*10^pH1)*Kildhnad) + 25634.21*NADH*Pyr/((1 + 1.584893*10^(-7)*10^pH1)*Kildhnadh) + 4.889409*10^6*Lac*NADH*Pyr/((1 + 6.309573*10^6/10^pH1)*(1 + 1.584893*10^(-7)*10^pH1)*Kildhnadh) + (1 + Pyr/Kidldhpyr)*(1 + 1306.642*Kmldhnad*Lac/((1 + 6.309573*10^6/10^pH1)*Kildhnad) + 25634.21*Kmldhnadh*Pyr/((1 + 1.584893*10^(-7)*10^pH1)*Kildhnadh)));
  vldhp: Pyr + NADPH -> Lac + NADP; (-(krldhp*Lac*NADP/Kmldhplac) + kfldhp*NADPH*Pyr/Kmldhppyr)/(1 + Lac/Kmldhplac + Pyr/Kmldhppyr);
  vmgadp: Mg + ADP -> MgADP; 1711.2*ADP*(Kmgadp + Khadp*Kmghadp/10^pH1)*Mg/(1 + Khadp/10^pH1 + k1*Kkadp) - kmgadpd*MgADP;
  vmgatp: ATP + Mg -> MgATP; 2620.8*ATP*(Kmgatp + Khatp*Kmghatp/10^pH1)*Mg/(1 + Khatp/10^pH1 + k1*Kkatp) - kmgatpd*MgATP;
  vmgb13pg: Mg + B13PG -> MgB13PG; 729.6*B13PG*(Kmgbpg + Khbpg*Kmghbpg/10^pH1)*Mg/(1 + Khbpg/10^pH1 + Kh2bpg*Khbpg/10^(2*pH1) + k1*Kkbpg + k1*Khbpg*Kkhbpg/10^pH1) - kmgb13pgd*MgB13PG;
  vmgb23pg: Mg + B23PG -> MgB23PG; 2572.8*B23PG*(Kmgbpg + Khbpg*Kmghbpg/10^pH1)*Mg/(1 + Khbpg/10^pH1 + Kh2bpg*Khbpg/10^(2*pH1) + k1*Kkbpg + k1*Khbpg*Kkhbpg/10^pH1) - kmgbpgd*MgB23PG;
  vmgfru16p2: Mg + Fru16P2 -> MgFru16P2; 3984*Fru16P2*(Kmgfru16p2 + Khf*Kmghf/10^pH1)*Mg/(1 + Khf/10^pH1 + Kh2f*Khf/10^(2*pH1) + k1*Kkf + k1*Khf*Kkhf/10^pH1) - kmgf16p2d*MgFru16P2;
  vmgglc16p2: Mg + Glc16P2 -> MgGlc16P2; 3984*Glc16P2*(Kmgfru16p2 + Khf*Kmghf/10^pH1)*Mg/(1 + Khf/10^pH1 + Kh2f*Khf/10^(2*pH1) + k1*Kkf + k1*Khf*Kkhf/10^pH1) - kmgf16p2d*MgGlc16P2;
  vmgphos: Mg + Phos -> MgPhos; -kmgphosd*MgPhos + 40800*(1 + 6.309573*10^(-8)*Khphos + 0.15*Kkphos)*Mg*Phos/(1 + Khphos/10^pH1 + k1*Kkphos);
  vox: 2 GSH -> GSSG; kox*GSH;
  voxnadh: NADH -> NAD; koxNADH*NADH;
  vp6gdh: P6G + NADP -> $CO2 + Ru5P + NADPH; VP6GDH*(kp6gdh1*kp6gdh3*kp6gdh5*kp6gdh7*kp6gdh9*kp6gdh11*NADP*P6G - CO2*kp6gdh2*kp6gdh4*kp6gdh6*kp6gdh8*kp6gdh10*kp6gdh12*NADPH*Ru5P)/(CO2*kp6gdh2*kp6gdh4*kp6gdh6*kp6gdh8*kp6gdh11 + kp6gdh2*(kp6gdh4*kp6gdh6 + kp6gdh4*kp6gdh7 + kp6gdh5*kp6gdh7)*kp6gdh9*kp6gdh11 + CO2*kp6gdh1*kp6gdh4*kp6gdh6*kp6gdh8*kp6gdh11*NADP + kp6gdh1*(kp6gdh4*kp6gdh6 + kp6gdh4*kp6gdh7 + kp6gdh5*kp6gdh7)*kp6gdh9*kp6gdh11*NADP + CO2*kp6gdh2*kp6gdh4*kp6gdh6*kp6gdh8*kp6gdh12*NADPH + kp6gdh2*(kp6gdh4*kp6gdh6 + kp6gdh4*kp6gdh7 + kp6gdh5*kp6gdh7)*kp6gdh9*kp6gdh12*NADPH + kp6gdh3*kp6gdh5*kp6gdh7*kp6gdh9*kp6gdh11*P6G + CO2*kp6gdh1*kp6gdh3*(kp6gdh5 + kp6gdh6)*kp6gdh8*kp6gdh11*NADP*P6G + kp6gdh1*kp6gdh3*(kp6gdh5*kp6gdh7*kp6gdh9 + kp6gdh5*kp6gdh7*kp6gdh11 + kp6gdh5*kp6gdh9*kp6gdh11 + kp6gdh6*kp6gdh9*kp6gdh11 + kp6gdh7*kp6gdh9*kp6gdh11)*NADP*P6G + kp6gdh3*kp6gdh5*kp6gdh7*kp6gdh9*kp6gdh12*NADPH*P6G + CO2*kp6gdh2*kp6gdh4*kp6gdh6*kp6gdh8*kp6gdh10*Ru5P + CO2*kp6gdh1*kp6gdh4*kp6gdh6*kp6gdh8*kp6gdh10*NADP*Ru5P + kp6gdh2*(kp6gdh4*kp6gdh6 + kp6gdh4*kp6gdh7 + kp6gdh5*kp6gdh7)*kp6gdh10*kp6gdh12*NADPH*Ru5P + CO2*(kp6gdh2*kp6gdh4 + kp6gdh2*kp6gdh5 + kp6gdh2*kp6gdh6 + kp6gdh4*kp6gdh6)*kp6gdh8*kp6gdh10*kp6gdh12*NADPH*Ru5P + kp6gdh1*kp6gdh3*kp6gdh5*kp6gdh7*kp6gdh10*NADP*P6G*Ru5P + CO2*kp6gdh1*kp6gdh3*(kp6gdh5 + kp6gdh6)*kp6gdh8*kp6gdh10*NADP*P6G*Ru5P + kp6gdh3*kp6gdh5*kp6gdh7*kp6gdh10*kp6gdh12*NADPH*P6G*Ru5P + CO2*kp6gdh3*(kp6gdh5 + kp6gdh6)*kp6gdh8*kp6gdh10*kp6gdh12*NADPH*P6G*Ru5P);
  vpfk: Fru6P + MgATP -> Fru16P2 + MgADP; VPFK*(-(Fru16P2*kcatfpfk*MgADP/(Kmpfkfru16p2*Kmpfkmgadp)) + Fru6P*kcatfpfk*MgATP/(Kmpfkfru6p*Kmpfkmgatp))/((1 + Fru16P2/Kmpfkfru16p2 + Fru6P/Kmpfkfru6p + MgADP/Kmpfkmgadp + Fru16P2*MgADP/(Kmpfkfru16p2*Kmpfkmgadp) + MgATP/Kmpfkmgatp + Fru6P*MgATP/(Kmpfkfru6p*Kmpfkmgatp))*(1 + (1/(10^pH1*Kapfk))^npfk*(1 + ATP/KTpfkatp)^4*(1 + B23PG/KTpfkb23pg)^4*(1 + Mg/KTpfkmg)^4/((1 + Fru16P2/Kmpfkfru16p2 + Fru6P/Kmpfkfru6p)^4*(1 + AMP/KRpfkamp)^4*(1 + Glc16P2/KRpfkglc16p2)^4*(1 + Phos/KRpfkphos)^4)));  // modifiers: ATP, B23PG, Mg, AMP, Glc16P2, Phos
  vpgk: B13PG + MgADP -> P3GA + MgATP; VPGK*(B13PG*kcatfpgk*MgADP/(Kipgkmgadp*Kmpgkb13pg) - kcatrpgk*MgATP*P3GA/(Kipgkmgatp*Kmpgkp3ga))/(1 + B13PG/Kipgkb13pg + MgADP/Kipgkmgadp + B13PG*MgADP/(Kipgkmgadp*Kmpgkb13pg) + MgATP/Kipgkmgatp + P3GA/Kipgkp3ga + MgATP*P3GA/(Kipgkmgatp*Kmpgkp3ga));
  vpglhydrolysis: P6GL -> P6G; kspontaneouspglhydrolysis*P6GL + VLactonase*klactonase3*P6GL/((klactonase2 + klactonase3)/klactonase1 + P6GL);
  vpgm: P3GA -> P2GA; VPGM*(-(kcatrpgm*P2GA/Kmpgmp2ga) + kcatfpgm*P3GA/Kmpgmp3ga)/(1 + P2GA/Kmpgmp2ga + P3GA/Kmpgmp3ga);
  vphostransport: Phos -> $Phose; 2.85714*(-kphostransporti*Phose*Ve + kphostransporti*(10^(-6.75 + pH1)/rtv^2 + 1/rtv)*Ve*Phos/(1 + 10^(-6.75 + pH1)));
  vpk: PEP + MgADP -> Pyr + MgATP; VPK*(kcatfpk*MgADP*PEP/(KRpkmgadp*KRpkpep) - kcatrpk*MgATP*Pyr/(KRpkmgatp*KRpkpyr))/((1 + MgADP/KRpkmgadp + MgATP/KRpkmgatp + PEP/KRpkpep + MgADP*PEP/(KRpkmgadp*KRpkpep) + Pyr/KRpkpyr + MgATP*Pyr/(KRpkmgatp*KRpkpyr))*(1 + 1.584893*10^(-7)*10^pH1*(1 + ATP/KTpkatp)^4/((1 + Fru16P2/KRf16p2 + Glc16P2/KRg16p2)^4*(1 + PEP/KRpkpep + Pyr/KRpkpyr)^4)));  // modifiers: ATP, Fru16P2, Glc16P2
  vpyrtransport: Pyr -> $Pyre; 2.85714*(-kpyrtransporti*Pyre*Ve + kpyrtransporti*Ve*Pyr/rtv);
  vr5pi: Ru5P -> Rib5P; VR5PI*(-(kr5pi2*kr5pi4*Rib5P/(kr5pi2 + kr5pi3)) + kr5pi1*kr5pi3*Ru5P/(kr5pi2 + kr5pi3))/(1 + kr5pi1*Ru5P/(kr5pi2 + kr5pi3) + kr5pi4*Xu5P/(kr5pi2 + kr5pi3));  // modifiers: Xu5P
  vru5pe: Ru5P -> Xu5P; VRu5PE*(kru5pe1*kru5pe3*Ru5P/(kru5pe2 + kru5pe3) - kru5pe2*kru5pe4*Xu5P/(kru5pe2 + kru5pe3))/(1 + kru5pe1*Ru5P/(kru5pe2 + kru5pe3) + kru5pe4*Xu5P/(kru5pe2 + kru5pe3));
  vta: Sed7P + GraP -> Ery4P + Fru6P; VTA*(-Ery4P*Fru6P*kta2*kta4*kta6*kta8 + GraP*kta1*kta3*kta5*kta7*Sed7P)/(GraP*(kta2 + kta3)*kta5*kta7 + Ery4P*kta2*kta4*(kta6 + kta7) + Fru6P*GraP*(kta2 + kta3)*kta5*kta8 + Fru6P*(kta2 + kta3)*kta6*kta8 + Ery4P*Fru6P*kta4*(kta2 + kta6)*kta8 + GraP*kta1*kta5*(kta3 + kta7)*Sed7P + kta1*kta3*(kta6 + kta7)*Sed7P + Ery4P*kta1*kta4*(kta6 + kta7)*Sed7P);
  vtk1: TK + Xu5P -> TKXu5P; ktk1*TK*Xu5P - ktk2*TKXu5P;
  vtk2: TKXu5P -> TKG + GraP; ktk3*TKXu5P - ktk4*TKG*GraP;
  vtk3: TKG + Rib5P -> TKGRib5P; ktk5*TKG*Rib5P - ktk6*TKGRib5P;
  vtk4: TKGRib5P -> TK + Sed7P; ktk7*TKGRib5P - ktk8*TK*Sed7P;
  vtk5: TKG + Ery4P -> TKGEry4P; ktk9*TKG*Ery4P - ktk10*TKGEry4P;
  vtk6: TKGEry4P -> TK + Fru6P; ktk11*TKGEry4P - ktk12*TK*Fru6P;
  vtpi: GraP -> GrnP; VTPI*(GraP*kcatftpi/Kmtpigrap - GrnP*kcatrtpi/Kmtpigrnp)/(1 + GraP/Kmtpigrap + GrnP/Kmtpigrnp);

  // Unit definitions:
  unit M = mole / litre;
  unit s = second;
  unit L = litre;
end
