// SBML level 3 version 1

model murray1()

  // Compartments:
  compartment default = 1;  // 0-D

  // Species:
  species II in default = 316;
  species L in default = 1000;
  species M in default = 10000;
  species V in default = 32000;

  // Parameters:
  NN = 300;
  Nm = 0;
  c = 3;
  delta = 0.69;
  eff = 0.985;
  effi = 0.82;
  k2 = 0.016;
  k2L = 0.00016;
  kL = 0.011;
  kM = 0.022;
  muL = 0.0035;
  muM = 0.05;

  // Assignment rules:
  HIV_DNA := M + L;

  // Reactions:
  v1: -> V; NN*II;  // modifiers: II
  v10: L -> ; muL*L;
  v2: -> V; Nm*M;  // modifiers: M
  v3: V -> ; c*V;
  v4: -> II; (1 - eff)*(1 - effi)*kM*M;  // modifiers: M
  v5: -> II; (1 - eff)*(1 - effi)*kL*L;  // modifiers: L
  v6: II -> ; delta*II;
  v7: -> M; (1 - eff)*(1 - effi)*k2*V;  // modifiers: V
  v8: M -> ; muM*M;
  v9: -> L; (1 - eff)*(1 - effi)*k2L*V;  // modifiers: V
end
