// SBML level 2 version 4

model nazaret1()

  // Compartments:
  compartment cytoplasm = 1;  // isVersionOf GO:0005737
  compartment mitochondrion = 1; mitochondrion is "mitochondrial matrix";  // isVersionOf GO:0005759

  // Species:
  species $ADP in mitochondrion;  // isVersionOf kegg.compound:C00008 CHEBI:16761
  species ATP in mitochondrion = 3.536;  // isVersionOf kegg.compound:C00002 CHEBI:15422
  species AcCoA in mitochondrion = 0.063; AcCoA is "acetyl-CoA";  // isVersionOf kegg.compound:C00024 CHEBI:15351
  species Cit in mitochondrion = 0.44; Cit is "citrate";  // isVersionOf kegg.compound:C00158 CHEBI:16947
  species $H in mitochondrion = 1; H is "H+";  // isVersionOf kegg.compound:C00080 CHEBI:24636
  species $H2O in mitochondrion = 1; H2O is "water";  // isVersionOf kegg.compound:C00001 CHEBI:15377
  species $He in cytoplasm = 1; He is "H+";  // isVersionOf kegg.compound:C00080 CHEBI:24636
  species KG in mitochondrion = 0.225; KG is "alpha-ketoglutarate";  // isVersionOf kegg.compound:C00026 CHEBI:16810
  species NAD in mitochondrion = 0.856; NAD is "NAD(+)";  // isVersionOf kegg.compound:C00003 CHEBI:15846
  species $NADH in mitochondrion;  // isVersionOf kegg.compound:C00004 CHEBI:16908
  species $O2 in mitochondrion = 1; O2 is "oxygen";  // isVersionOf kegg.compound:C00007 CHEBI:15379
  species OAA in mitochondrion = 0.005; OAA is "oxaloacetate";  // isVersionOf kegg.compound:C00036 CHEBI:16452
  species Pyr in mitochondrion = 0.154; Pyr is "pyruvate";  // isVersionOf kegg.compound:C00022 CHEBI:15361
  species $iP in mitochondrion = 2.44; iP is "phosphate";  // isVersionOf kegg.compound:C00009 CHEBI:18367

  // Parameters:
  At = 4.16;
  C = 6.75e-6;
  DeltaPsi = 150;
  DeltaPsim = 150;
  F = 96485; F is "Faraday constant";
  K = 2;
  Kapp = 4.4e-9 per_mM;
  Nt = 1.07;
  R = 8314; R is "gas constant";
  T = 298 kelvin; T is "absolute temperature";
  a = 0.1;
  b = 0.004 per_mM;
  kANT = 0.05387;
  kATP = 131.9;
  kleak = 0.000426;
  kresp = 2.5;

  // Assignment rules:
  NADH := Nt - NAD;
  ADP := At - ATP;
  DeltaGtransport := 1.2*F*DeltaPsi;
  ATPcrit := At/(1 + exp(-3*DeltaGtransport/(R*T))/(Kapp*iP));
  JATP := kATP*(2/(1 + exp(b*(ATP - ATPcrit))) - 1);
  Jresp := kresp*((Nt - NAD)/(K + Nt - NAD))/(1 + exp(a*(DeltaPsi - DeltaPsim)));
  Jleak := kleak*DeltaPsi;
  JANT := kANT*ATP;

  // Rate rules:
  DeltaPsi' = (10*Jresp - 3*JATP - Jleak - JANT)/C;

  // Reactions:
  v1: => Pyr; mitochondrion*k1;  // isVersionOf GO:0006848
    k1 = 0.038;
  v2: NAD + Pyr => $NADH + AcCoA; mitochondrion*k2*Pyr*NAD;  // isVersionOf kegg.reaction:R00209
    k2 = 0.152;
  v3: AcCoA + OAA => Cit; mitochondrion*k3*OAA*AcCoA;  // isVersionOf kegg.reaction:R00351
    k3 = 57.142;
  v4: NAD + Cit => $NADH + KG; mitochondrion*k4*Cit*NAD;  // isVersionOf kegg.reaction:R00709
    k4 = 0.053;
  v5: 2 NAD + $ADP + KG => 2 $NADH + ATP + OAA; mitochondrion*k5*KG*NAD*(At - ATP);  // isVersionOf kegg.reaction:R00355
    k5 = 0.082361;
  v6: OAA -> KG; mitochondrion*k6*(OAA - KG/Keq);  // isVersionOf kegg.reaction:R00355
    Keq = 0.3975 dimensionless; k6 = 0.0032;
  v7: ATP + Pyr => $ADP + OAA; mitochondrion*k7*Pyr*ATP;  // isVersionOf kegg.reaction:R00344
    k7 = 0.04;
  v8: OAA => ; mitochondrion*k8*OAA;  // isVersionOf GO:0015729
    k8 = 3.6;
  vANT: ATP => $ADP; mitochondrion*JANT;  // isVersionOf kegg.reaction:R00086
  vATP: 3 $He + $iP + $ADP -> 3 $H + $H2O + ATP; mitochondrion*JATP;  // isVersionOf kegg.reaction:R05227
  vleak: $He => $H; mitochondrion*Jleak;
  vresp: 11 $H + 0.5 $O2 + $NADH => 10 $He + $H2O + NAD; mitochondrion*Jresp;  // isVersionOf kegg.reaction:R07171

  // Unit definitions:
  unit per_second = 1 / (10 second);
  unit per_millivolt = 1 / (1e-3 volt);
  unit per_millimolar_squared_per_second = (10 litre)^2 / (10 second * (1e-3 mole)^2);
  unit per_millimolar_per_second = 10 litre / (10 second * 1e-3 mole);
  unit per_mM = 10 litre / (1e-3 mole);
  unit millivolt = 1e-3 volt;
  unit millimolar_per_second_per_millivolt = 1e-3 mole / (1e-3 volt * 10 second * 10 litre);
  unit millimolar_per_second = 1e-3 mole / (10 second * 10 litre);
  unit millimolar_per_millivolt = 1e-3 mole / (1e-3 volt * 10 litre);
  unit millimolar = 1e-3 mole / (10 litre);
  unit milliJoules_per_mole = 1e-3 joule / (10 mole);
  unit milliJoule_per_mole_per_Kelvin = 1e-3 joule / (10 kelvin * 10 mole);
  unit coulomb_per_mole = 10 coulomb / (10 mole);
  unit substance = 1e-3 mole;
end
