// SBML level 3 version 1

model nguyen()
  // P450 androstenedione synthesis
  // model units - substance: umol, time: s, volume: L

  // Compartments:
  compartment default = 1;

  // Species:
  species A4 in default = 0;
  species DHEA in default = 0;
  species $Ext in default = 0;
  species OH17P4 in default = 0;
  species OH17P5 in default = 0;
  species P4 in default = 0;
  species P5 in default = 0;

  // Parameters:
  KmBA4 = 1;
  KmBDHEA = 3.7;
  KmBOH17P4 = 3;
  KmBOH17P5 = 3.5;
  KmBP4 = 3;
  KmBP5 = 2.8;
  KmCOH17P5 = 0.83;
  KmCP4 = 0.73;
  KmCP5 = 0.79;
  Vm3BHSD = 1;
  VmHyd = 3;
  VmLya = 1;
  kSec = 0.1;
  kSup = 0.1;

  // Reactions:
  v0: $Ext -> P5; kSup;
  v1: P5 -> P4; Vm3BHSD*P5/KmBP5/(1 + OH17P5/KmBOH17P5 + DHEA/KmBDHEA + P4/KmBP4 + OH17P4/KmBOH17P4 + A4/KmBA4 + P5/KmBP5);  // modifiers: DHEA, OH17P5, A4, OH17P4
  v10: P4 -> $Ext; kSec*P4;
  v11: OH17P4 -> $Ext; kSec*OH17P4;
  v12: A4 -> $Ext; kSec*A4;
  v2: OH17P5 -> OH17P4; Vm3BHSD*OH17P5/KmBOH17P5/(1 + OH17P5/KmBOH17P5 + DHEA/KmBDHEA + P4/KmBP4 + OH17P4/KmBOH17P4 + A4/KmBA4 + P5/KmBP5);  // modifiers: DHEA, P5, A4, P4
  v3: DHEA -> A4; Vm3BHSD*DHEA/KmBDHEA/(1 + OH17P5/KmBOH17P5 + DHEA/KmBDHEA + P4/KmBP4 + OH17P4/KmBOH17P4 + A4/KmBA4 + P5/KmBP5);  // modifiers: P5, OH17P5, OH17P4, P4
  v4: P5 -> OH17P5; VmHyd*P5/KmCP5/(1 + P4/KmCP4 + OH17P5/KmCOH17P5 + P5/KmCP5);  // modifiers: P4
  v5: OH17P5 -> DHEA; VmLya*OH17P5/KmCOH17P5/(1 + P4/KmCP4 + OH17P5/KmCOH17P5 + P5/KmCP5);  // modifiers: P5, P4
  v6: P4 -> OH17P4; VmHyd*P4/KmCP4/(1 + P4/KmCP4 + OH17P5/KmCOH17P5 + P5/KmCP5);  // modifiers: OH17P5, P5
  v7: P5 -> $Ext; kSec*P5;
  v8: OH17P5 -> $Ext; kSec*OH17P5;
  v9: DHEA -> $Ext; kSec*DHEA;

  // Unit definitions:
  unit umol = 1e-6 mole;
  unit s = second;
  unit L = litre;
end
