// SBML level 3 version 1

model niger1()

  // Compartments:
  compartment default = 1;  // 0-D

  // Species:
  species A in default = 0; A is "antibodies";
  species B in default = 0; B is "immune cells";
  species M in default = 10; M is "Merozoites";
  species X in default = 500; X is "RBC";
  species Y1 in default = 0; Y1 is "iRBC1";
  species Y2 in default = 0; Y2 is "iRBC2";
  species Y3 in default = 0; Y3 is "iRBC3";
  species Y4 in default = 0; Y4 is "iRBC4";
  species Y5 in default = 0; Y5 is "iRBC5";
  species Yt in default;

  // Parameters:
  beta = 0.0008;
  eta = 0.6;
  gamma1 = 1.5;
  gamma2 = 1.5;
  gamma3 = 1.5;
  gamma4 = 1.5;
  gamma5 = 1.5;
  k1 = 0.01;
  k2 = 0.01;
  k3 = 0.01;
  k4 = 0.01;
  k5 = 0.01;
  kM = 0.3;
  lambdaB = 30;
  lambdaX = 41664;
  mu = 1;
  mu1 = 0.5;
  mu2 = 0.5;
  mu3 = 0.5;
  mu4 = 0.5;
  mu5 = 1;
  muA = 0.4;
  muB = 1.53;
  muM = 3;
  muX = 0.8;
  r = 16;
  rho1 = 0.001;
  rho2 = 1e-5;
  rho3 = 1e-5;
  rho4 = 1e-5;
  rho5 = 1e-5;
  rho6 = 1e-5;

  // Assignment rules:
  Yt := Y1 + Y2 + Y3 + Y4 + Y5;

  // Reactions:
  v1: -> X; lambdaX;
  v10: Y3 -> ; mu3*Y3;
  v11: Y3 -> Y4; gamma3*Y3;
  v12: Y3 -> ; k3*B*Y3;  // modifiers: B
  v13: Y4 -> ; mu4*Y4;
  v14: Y4 -> Y5; gamma4*Y4;
  v15: Y4 -> ; k4*B*Y4;  // modifiers: B
  v16: Y5 -> ; mu5*Y5;
  v17: Y5 -> ; gamma5*Y5;
  v18: Y5 -> ; k5*B*Y5;  // modifiers: B
  v19: -> M; r*(mu5 + gamma5)*Y5;  // modifiers: Y5
  v2: X -> Y1; beta*X*M;  // modifiers: M
  v20: M -> ; muM*M;
  v21: M -> ; kM*B*M;  // modifiers: B
  v22: M -> ; mu*beta*X*M;  // modifiers: X
  v23: -> B; lambdaB;
  v24: -> B; B*(rho1*Y1 + rho2*Y2 + rho3*Y3 + rho4*Y4 + rho5*Y5);  // modifiers: Y5, Y4, Y3, Y2, Y1
  v25: -> B; B*rho6*M;  // modifiers: M
  v26: B -> ; muB*B;
  v27: -> A; eta*B*M;  // modifiers: M, B
  v28: A -> ; muA*A;
  v3: X -> ; muX*X;
  v4: Y1 -> ; mu1*Y1;
  v5: Y1 -> Y2; gamma1*Y1;
  v6: Y1 -> ; k1*B*Y1;  // modifiers: B
  v7: Y2 -> ; mu2*Y2;
  v8: Y2 -> Y3; gamma2*Y2;
  v9: Y2 -> ; k2*B*Y2;  // modifiers: B
end
