// SBML level 3 version 1

model nyabadza3()

  // Compartments:
  compartment default = 1;  // 0-D

  // Species:
  species An in default = 20000; An is "Unscreened AIDS";
  species As in default = 0; As is "Screened AIDS";
  species $EXT in default = 1;
  species Ins in default = 145000; Ins is "Unscreened HIV infected";
  species Is in default = 0; Is is "Screened HIV infected";
  species It in default = 0; It is "Treated HIV infected";
  species Sn in default = 18373000; Sn is "Unscreened susceptible";
  species Ss in default = 0; Ss is "Screened susceptible";

  // Parameters:
  Beta = 0.4584;
  Delta_1 = 0.293;
  Delta_2 = 0.3379;
  Eta_1 = 0.7203;
  Eta_2 = 1.3785;
  Mu = 0.032;
  Phi_1 = 0.1;
  Phi_2 = 7.3471e-5;
  Pi_n = 920540;
  Pi_s = 750000;
  Psi = 0.2915;
  Rho_1 = 0.2372;
  Rho_2 = 0.1828;
  Rho_3 = 0.13;
  Sigma = 0.0655;
  Theta = 0.1605;
  c = 1.5892;
  k = 0.0388;
  m = 45.1202;
  p = 0.1;
  q = 0.9;

  // Assignment rules:
  Lambda := c*(1 - Theta)*Beta*exp(-m*(Delta_1*An + Delta_2*As)/(Sn + Ss + Ins + Is + It + An + As))*((Ins + Eta_1*(Is + Phi_1*It) + Eta_2*(An + Phi_2*As))/(Sn + Ss + Ins + Is + It + An + As));
  people_with_HIV := Ins + Is + It;

  // Reactions:
  v_1: $EXT -> Sn; Pi_n;
  v_10: Ins -> An; Rho_1*Ins;
  v_11: Ss -> Is; p*(1 - Psi)*Lambda*Ss;
  v_12: Is -> $EXT; Mu*Is;
  v_13: Is -> It; Sigma*Is;
  v_14: Is -> As; Rho_2*Is;
  v_15: It -> $EXT; Mu*It;
  v_16: It -> As; Rho_3*It;
  v_17: An -> $EXT; Mu*An;
  v_18: An -> $EXT; Delta_1*An;
  v_19: As -> $EXT; Mu*As;
  v_2: Sn -> Ins; Lambda*Sn;
  v_20: As -> $EXT; Delta_2*As;
  v_3: Sn -> $EXT; Mu*Sn;
  v_4: Sn -> Ss; k*Sn;
  v_5: $EXT -> Ss; Pi_s;
  v_6: Ss -> Ins; q*(1 - Psi)*Lambda*Ss;
  v_7: Ss -> $EXT; Mu*Ss;
  v_8: Ins -> $EXT; Mu*Ins;
  v_9: Ins -> Is; k*Ins;
end
