// SBML level 3 version 1

model nyman1()

  // Compartments:
  compartment default = 1;  // 0-D

  // Species:
  species bact in default = 6.362989;
  species beta in default = 47.56283;
  species betaphos in default = 46.07418;
  species cAMP in default = 0.1196638;

  // Parameters:
  var FoC; FoC is "Force of Contraction over basal";
  cAMP0 = 18.307;
  h = 0;
  k1 = 0.11566;
  k2 = 0.83749;
  k3 = 1.2313;
  k4 = 218.46;
  kH = 0.00077465;
  kbasal = 0.11204;
  kratio = 5.5528;
  scale = 8.36;

  // Assignment rules:
  FoC := scale*cAMP;

  // Reactions:
  v_1: beta -> bact; kbasal*beta;
  v_2: beta -> bact; kH*kratio*h*beta;
  v_3: betaphos -> beta; k1*betaphos;
  v_4: bact -> betaphos; bact*k2;
  v_5: -> cAMP; bact*k3;  // modifiers: bact
  v_6: -> cAMP; cAMP0;
  v_7: cAMP -> ; k4*cAMP;

  // Events:
  event2: at (time > 15), t0=false, persistent=false, fromTrigger=false: h = 0;
  event1: at (time > 5), t0=false, persistent=false, fromTrigger=false: h = 100;
  at (time > 20), t0=false, persistent=false, fromTrigger=false: h = 100;
end
