// SBML level 3 version 1

model okrinya1()

  // Compartments:
  compartment default = 1;  // 0-D

  // Species:
  species A in default = 0; A is "Antibodies";
  species G in default = 0; G is "Gametocytes";
  species M in default = 0.105; M is "Merozoites";
  species P in default = 0.127; P is "Innate immune cells";
  species X in default = 5000000; X is "RBC";
  species Y in default = 0; Y is "iRBC";

  // Parameters:
  A0 = 0;
  bM = 0.038;
  betaX = 4.9e-6;
  c0 = 0.6;
  c1 = 1.12;
  eta1 = 1.3e-7;
  eta1phi = 2.6e-7;
  eta2 = 3e-7;
  eta3 = 4.5e-8;
  eta4 = 3.4e-8;
  g2 = 0.85;
  kA = 1.38;
  kB = 12;
  kC = 1.26;
  kD = 2.8e-9;
  kG = 1.4;
  kM = 118;
  kN = 3.1e-9;
  kY = 0.9;
  lambdaX = 41500;
  muA = 0.3;
  muG = 0.02;
  muM = 48;
  muN = 0.055;
  muP = 0.3;
  muX = 0.0083;
  muY = 0.5;
  phi = 2;
  r = 16;
  theta = 0.0064;

  // Reactions:
  v1: -> X; lambdaX;
  v10: G -> ; muG*G;  // modifiers: A, P
  v11: G -> ; kG*P*G*(1 + kC*A);  // modifiers: A, P
  v12: -> P; bM;  // modifiers: M, Y
  v13: -> P; eta1*Y + eta1phi*M;  // modifiers: M, Y
  v14: P -> ; muP*P;  // modifiers: Y, M
  v15: P -> ; P*(kD*Y + kN*M);  // modifiers: M, Y
  v16: -> A; eta2*(Y + g2*M);  // modifiers: M, Y
  v17: -> A; muA*(A0 - A);
  v18: A -> ; A*(eta3*Y + eta4*M);  // modifiers: M, Y
  v2: X + M -> Y; betaX*X*M/(1 + c0*A);  // modifiers: A
  v3: X -> ; muX*X;
  v4: Y -> ; (muY + muN)*Y;  // modifiers: A, P
  v5: Y -> ; kY*P*Y*(1 + kA*A);  // modifiers: A, P
  v6: -> M; r*muY*(1 - theta)*Y/(1 + c1*A);  // modifiers: A, Y
  v7: M -> ; muM*M;  // modifiers: A, P
  v8: M -> ; kM*P*M*(1 + kB*A);  // modifiers: A, P
  v9: -> G; r*muY*theta*Y/(1 + c1*A);  // modifiers: A, Y
end
