// SBML level 3 version 1

model olivier()

  // Compartments:
  compartment default_compartment = 1;

  // Species:
  species a in default_compartment = 10;
  species b in default_compartment = 10;
  species $p in default_compartment = 1;
  species $s in default_compartment = 1;

  // Parameters:
  Cp = 0.026;
  K2a = 1;
  K2b = 1;
  K3b = 1;
  K3p = 1;
  Ka = 1000;
  Keq1 = 400;
  Keq2 = 10;
  Keq3 = 10;
  Kp = 0.1;
  Ks = 0.01;
  L0 = 10000;
  V1 = 200;
  V2 = 100;
  V3 = 100;
  a05 = 10000;
  alfa = 0.01;
  eq = 1;
  h = 4;
  n = 4;
  p05 = 1;
  s05 = 1;

  // Reactions:
  v_1: $s -> a; piecewise(V1*s/Ks*(1 - a/(s*Keq1))*(1 + s/Ks + a/Ka)^(n - 1)/((1 + s/Ks + a/Ka)^n + L0*((1 + p/Kp)/(1 + Cp*p/Kp))^n), eq > 0, V1*s/s05*(1 - a/(s*Keq1))*(s/s05 + a/a05)^(h - 1)/((s/s05 + a/a05)^h + (1 + (p/p05)^h)/(1 + alfa*(p/p05)^h)));  // modifiers: p
  v_2: a -> b; V2*(a - b/Keq2)/(a + K2a*(1 + b/K2b));
  v_3: b -> $p; V3*(b - p/Keq3)/(b + K3b*(1 + p/K3p));
end
