// SBML level 3 version 1

model ortega()

  // Compartments:
  compartment default_compartment = 1;

  // Species:
  species alpha in default_compartment = 0.462;
  species beta in default_compartment = 0.2;
  species gamma in default_compartment = 0.338;

  // Parameters:
  Chi14 = 1.1;
  Ks1 = 0.01;
  Ks2 = 0.01;
  Ks3 = 0.01;
  Ks4 = 0.01;
  Vm1 = 1;
  r24 = 6;
  r31 = 6;

  // Reactions:
  v_1: alpha -> beta; Vm1*(alpha/Ks1)/(1 + alpha/Ks1 + beta/Ks3);
  v_2: beta -> alpha; r24*Vm1/Chi14*(beta/Ks2)/(1 + gamma/Ks4 + beta/Ks2);  // modifiers: gamma
  v_3: beta -> gamma; r31*Vm1*(beta/Ks3)/(1 + alpha/Ks1 + beta/Ks3);  // modifiers: alpha
  v_4: gamma -> beta; Vm1/Chi14*(gamma/Ks4)/(1 + gamma/Ks4 + beta/Ks2);
end
