// SBML level 2 version 4

model ouzounoglou1()

  // Compartments:
  compartment Cytosol = 1;  // GO:0005829
  compartment M_autophagy_OtherLysDegrPath = 1; M_autophagy_OtherLysDegrPath is "M/autophagy&OtherLysDegrPath";  // GO:0005776
  compartment Lysosome = 1;  // GO:0005764

  // Species:
  substanceOnly species DopModWTasyn5_Cytosol in Cytosol = 8;  // hasPart CHEBI:18243 uniprot:P37840
  substanceOnly species WTasyn2merM_Adegr in M_autophagy_OtherLysDegrPath = 0; WTasyn2merM_Adegr is "WTasyn2merM/Adegr";  // isVersionOf uniprot:P37840
  substanceOnly species WTasyn3merM_Adegr in M_autophagy_OtherLysDegrPath = 0; WTasyn3merM_Adegr is "WTasyn3merM/Adegr";  // isVersionOf uniprot:P37840
  substanceOnly species WTasyn4merM_Adegrr in M_autophagy_OtherLysDegrPath = 0; WTasyn4merM_Adegrr is "WTasyn4merM/Adegrr";  // isVersionOf uniprot:P37840
  substanceOnly species WTasyn5merM_Adegr in M_autophagy_OtherLysDegrPath = 0; WTasyn5merM_Adegr is "WTasyn5merM/Adegr";  // isVersionOf uniprot:P37840
  substanceOnly species WTasyn6merM_Adegr in M_autophagy_OtherLysDegrPath = 0; WTasyn6merM_Adegr is "WTasyn6merM/Adegr";  // isVersionOf uniprot:P37840
  substanceOnly species WTasyn7merM_Adegr in M_autophagy_OtherLysDegrPath = 0; WTasyn7merM_Adegr is "WTasyn7merM/Adegr";  // isVersionOf uniprot:P37840
  substanceOnly species WTasyn8merM_Adegr in M_autophagy_OtherLysDegrPath = 0; WTasyn8merM_Adegr is "WTasyn8merM/Adegr";  // isVersionOf uniprot:P37840
  substanceOnly species WTasyn_Cytosol in Cytosol = 1650;  // uniprot:P37840
  substanceOnly species WTasyn2_Cytosol in Cytosol = 22;  // hasPart uniprot:P37840
  substanceOnly species DopModWTasyn4_Cytosol in Cytosol = 8;  // hasPart uniprot:P37840 CHEBI:18243
  substanceOnly species WTasyn3_Cytosol in Cytosol = 8;  // hasPart uniprot:P37840
  substanceOnly species Dopamine_degraded in Cytosol = 0;  // isVersionOf CHEBI:18243
  substanceOnly species DopModWTasyn6_Cytosol in Cytosol = 8;  // hasPart CHEBI:18243 uniprot:P37840
  substanceOnly species WTasyn2merCMADegr_Lysosome in Lysosome = 0;  // hasPart uniprot:P37840 uniprot:P13473
  substanceOnly species WTasynCMADegr in Lysosome = 0;  // hasPart uniprot:P37840 uniprot:P13473
  substanceOnly species Dopamine in Cytosol = 750;  // CHEBI:18243
  substanceOnly species WTasyn5_Cytosol in Cytosol = 8;  // hasPart uniprot:P37840
  substanceOnly species WTasyn4_Cytosol in Cytosol = 8;  // hasPart uniprot:P37840
  substanceOnly species DopModWTasyn7_Cytosol in Cytosol = 8;  // hasPart CHEBI:18243 uniprot:P37840
  substanceOnly species DopModWTasyn8_Cytosol in Cytosol = 8;  // hasPart CHEBI:18243 uniprot:P37840
  substanceOnly species DopModWTasyn9 in Cytosol = 8;  // hasPart uniprot:P37840 CHEBI:18243
  substanceOnly species WTasyn9 in Cytosol = 8;  // hasPart uniprot:P37840
  substanceOnly species $SOURCE in Cytosol = 1;  // isVersionOf GO:0006412 GO:0006351
  substanceOnly species WTasyn8_Cytosol in Cytosol = 8;  // hasPart uniprot:P37840
  substanceOnly species WTasyn7_Cytosol in Cytosol = 8;  // hasPart uniprot:P37840
  substanceOnly species WTasyn6_Cytosol in Cytosol = 8;  // hasPart uniprot:P37840
  substanceOnly species HigherWTasynSPC in Cytosol = 0;  // hasPart uniprot:P37840
  substanceOnly species Proteasome in Cytosol = 1500;  // isVersionOf GO:0000502
  substanceOnly species ProtWTasyn3 in Cytosol = 0;  // hasPart uniprot:P37840 GO:0000502
  substanceOnly species ProtWTasyn4 in Cytosol = 0;  // hasPart GO:0000502 uniprot:P37840
  substanceOnly species ProtWTasyn5 in Cytosol = 0;  // hasPart GO:0000502 uniprot:P37840
  substanceOnly species ProtWTasyn6 in Cytosol = 0;  // hasPart GO:0000502 uniprot:P37840
  substanceOnly species ProtWTasyn7 in Cytosol = 0;  // hasPart GO:0000502 uniprot:P37840
  substanceOnly species ProtWTasyn8 in Cytosol = 0;  // hasPart GO:0000502 uniprot:P37840
  substanceOnly species ProtWTasyn9 in Cytosol = 0;  // hasPart uniprot:P37840 GO:0000502
  substanceOnly species DopModWTasyn2merM_Adegr in M_autophagy_OtherLysDegrPath = 0; DopModWTasyn2merM_Adegr is "DopModWTasyn2merM/Adegr";  // hasVersion CHEBI:18243 uniprot:P37840
  substanceOnly species DopModWTasyn3merM_Adegr in M_autophagy_OtherLysDegrPath = 0; DopModWTasyn3merM_Adegr is "DopModWTasyn3merM/Adegr";  // hasVersion uniprot:P37840 CHEBI:18243
  substanceOnly species DopModWTasyn4merM_Adegr in M_autophagy_OtherLysDegrPath = 0; DopModWTasyn4merM_Adegr is "DopModWTasyn4merM/Adegr";  // hasVersion uniprot:P37840 CHEBI:18243
  substanceOnly species DopModWTasyn6merM_Adegr in M_autophagy_OtherLysDegrPath = 0; DopModWTasyn6merM_Adegr is "DopModWTasyn6merM/Adegr";  // hasVersion uniprot:P37840 CHEBI:18243
  substanceOnly species DopModWTasyn8merM_Adegr in M_autophagy_OtherLysDegrPath = 0; DopModWTasyn8merM_Adegr is "DopModWTasyn8merM/Adegr";  // hasVersion CHEBI:18243 uniprot:P37840
  substanceOnly species ProtDopModWTasyn3 in Cytosol = 0;  // hasPart GO:0000502 uniprot:P37840 CHEBI:18243
  substanceOnly species ProtDopModWTasyn4 in Cytosol = 0;  // hasPart CHEBI:18243 GO:0000502 uniprot:P37840
  substanceOnly species ProtDopModWTasyn5 in Cytosol = 0;  // hasPart GO:0000502 CHEBI:18243 uniprot:P37840
  substanceOnly species ProtDopModWTasyn6 in Cytosol = 0;  // hasPart uniprot:P37840 GO:0000502 CHEBI:18243
  substanceOnly species ProtDopModWTasyn7 in Cytosol = 0;  // hasPart GO:0000502 CHEBI:18243 uniprot:P37840
  substanceOnly species ProtDopModWTasyn8 in Cytosol = 0;  // hasPart CHEBI:18243 GO:0000502 uniprot:P37840
  substanceOnly species ProtDopModWTasyn9 in Cytosol = 0;  // hasPart GO:0000502 uniprot:P37840 CHEBI:18243
  substanceOnly species DopModWTasyn2merOnLamp in Lysosome = 0;  // hasPart uniprot:P37840 CHEBI:18243 uniprot:P13473
  substanceOnly species DopModWTasyn3merOnLamp in Lysosome = 0;  // hasPart uniprot:P37840 uniprot:P13473 CHEBI:18243
  substanceOnly species DopModWTasyn4merOnLamp in Lysosome = 0;  // hasPart uniprot:P13473 uniprot:P37840 CHEBI:18243
  substanceOnly species DopModWTasyn7merOnLamp in Lysosome = 0;  // hasPart uniprot:P37840 CHEBI:18243 uniprot:P13473
  substanceOnly species DopModWTasyn6merOnLamp in Lysosome = 0;  // hasPart uniprot:P13473 CHEBI:18243 uniprot:P37840
  substanceOnly species DopModWTasyn5merOnLamp in Lysosome = 0;  // hasPart uniprot:P37840 CHEBI:18243 uniprot:P13473
  substanceOnly species DopModWTasyn8merOnLamp in Lysosome = 0;  // hasPart uniprot:P13473 CHEBI:18243 uniprot:P37840
  substanceOnly species DopModWTasyn9merOnLamp in Lysosome = 0;  // hasPart CHEBI:18243 uniprot:P37840 uniprot:P13473
  substanceOnly species WTasyn3merOnLamp in Lysosome = 0;  // hasPart uniprot:P37840 uniprot:P13473
  substanceOnly species WTasyn4merOnLamp in Lysosome = 0;  // hasPart uniprot:P13473 uniprot:P37840
  substanceOnly species WTasyn5merOnLamp in Lysosome = 0;  // hasPart uniprot:P13473 uniprot:P37840
  substanceOnly species WTasyn6merOnLamp in Lysosome = 0;  // hasPart uniprot:P37840 uniprot:P13473
  substanceOnly species WTasyn7merOnLamp in Lysosome = 0;  // hasPart uniprot:P37840 uniprot:P13473
  substanceOnly species DopModWTasyn3_Cytosol in Cytosol = 8;  // hasPart uniprot:P37840 CHEBI:18243
  substanceOnly species WTasyn8merOnLamp in Lysosome = 0;  // hasPart uniprot:P13473 uniprot:P37840
  substanceOnly species WTasyn9merOnLamp in Lysosome = 0;  // hasPart uniprot:P13473 uniprot:P37840
  substanceOnly species ProtWTasynHigherSPC in Cytosol = 0;  // hasPart GO:0000502 uniprot:P37840
  substanceOnly species Lamp2a in Lysosome = 200;  // uniprot:P13473
  substanceOnly species WTasyn4_M_autophagy_OtherLysDegrPath in M_autophagy_OtherLysDegrPath = 0;  // uniprot:P37840
  substanceOnly species WTasyn5_M_autophagy_OtherLysDegrPath in M_autophagy_OtherLysDegrPath = 0;  // uniprot:P37840
  substanceOnly species WTasyn6_M_autophagy_OtherLysDegrPath in M_autophagy_OtherLysDegrPath = 0;  // uniprot:P37840
  substanceOnly species WTasyn_Lysosome in Lysosome = 0;  // isVersionOf uniprot:P37840
  substanceOnly species WTasyn3_M_autophagy_OtherLysDegrPath in M_autophagy_OtherLysDegrPath = 0;  // uniprot:P37840
  substanceOnly species WTasyn2_M_autophagy_OtherLysDegrPath in M_autophagy_OtherLysDegrPath = 0;  // uniprot:P37840
  substanceOnly species WTasyn7_M_autophagy_OtherLysDegrPath in M_autophagy_OtherLysDegrPath = 0;  // uniprot:P37840
  substanceOnly species WTasyn8_M_autophagy_OtherLysDegrPath in M_autophagy_OtherLysDegrPath = 0;  // uniprot:P37840
  substanceOnly species DopModWTasyn7merM_Adegr in M_autophagy_OtherLysDegrPath = 0; DopModWTasyn7merM_Adegr is "DopModWTasyn7merM/Adegr";  // hasVersion uniprot:P37840 CHEBI:18243
  substanceOnly species DopModWTasyn8_M_autophagy_OtherLysDegrPath in M_autophagy_OtherLysDegrPath = 0;  // hasPart uniprot:P37840 CHEBI:18243
  substanceOnly species DopModWTasyn7_M_autophagy_OtherLysDegrPath in M_autophagy_OtherLysDegrPath = 0;  // hasPart uniprot:P37840 CHEBI:18243
  substanceOnly species DopModWTasyn2_M_autophagy_OtherLysDegrPath in M_autophagy_OtherLysDegrPath = 0;  // hasVersion uniprot:P37840 CHEBI:18243
  substanceOnly species DopModWTasyn6_M_autophagy_OtherLysDegrPath in M_autophagy_OtherLysDegrPath = 0;  // hasPart uniprot:P37840 CHEBI:18243
  substanceOnly species DopModWTasyn5_M_autophagy_OtherLysDegrPath in M_autophagy_OtherLysDegrPath = 0;  // hasPart CHEBI:18243 uniprot:P37840
  substanceOnly species WTasyn2_Lysosome in Lysosome = 0;  // isVersionOf uniprot:P37840
  substanceOnly species DopModWTasyn4_M_autophagy_OtherLysDegrPath in M_autophagy_OtherLysDegrPath = 0;  // hasPart uniprot:P37840 CHEBI:18243
  substanceOnly species DopModWTasyn3_M_autophagy_OtherLysDegrPath in M_autophagy_OtherLysDegrPath = 0;  // hasPart uniprot:P37840 CHEBI:18243
  substanceOnly species WTasyn_M_autophagy_OtherLysDegrPath in M_autophagy_OtherLysDegrPath = 0;  // uniprot:P37840
  substanceOnly species DopModWTasyn_M_autophagy_OtherLysDegrPath in M_autophagy_OtherLysDegrPath = 0;  // hasPart CHEBI:18243 uniprot:P37840
  substanceOnly species DopModWTasynOnLamp in Lysosome = 0;  // hasPart CHEBI:18243 uniprot:P37840 uniprot:P13473
  substanceOnly species DopModWTasyn2_Cytosol in Cytosol = 0;  // hasPart CHEBI:18243 uniprot:P37840
  substanceOnly species DopModWTasyn_Cytosol in Cytosol = 953;  // hasPart uniprot:P37840
  substanceOnly species WTasyndegr in Lysosome = 0;  // isVersionOf uniprot:P37840
  substanceOnly species WTasyn2degr in Lysosome = 0;  // isVersionOf uniprot:P37840

  // Parameters:
  k_2merForm = 1.462941e-9;
  k_DisRate = 4.999534e-7;
  k_DopModWTasynLampBind = 7.6715997e-9;
  k_LampFreeWTasyn = 0.0003044572;
  k_M_autophagyDegr = 0.1;
  k_OligAutophagUptake = 2.39034347e-8;
  k_OligomerForm = 3.350497e-8;
  k_ProtOligDegr = 0.000370096;
  k_ProteasomeBind = 3.424694e-9;
  k_WTOligBindOnLamp = 4e-6;
  k_WTasyn1_2merBindOnLamp = 6.865455e-7;

  // Assignment rules:
  Total_Cytosolic_WTASYN_Oligomers := DopModWTasyn3_Cytosol*Cytosol + DopModWTasyn4_Cytosol*Cytosol + DopModWTasyn5_Cytosol*Cytosol + DopModWTasyn6_Cytosol*Cytosol + DopModWTasyn7_Cytosol*Cytosol + DopModWTasyn8_Cytosol*Cytosol + DopModWTasyn9*Cytosol + WTasyn3_Cytosol*Cytosol + WTasyn4_Cytosol*Cytosol + WTasyn5_Cytosol*Cytosol + WTasyn6_Cytosol*Cytosol + WTasyn7_Cytosol*Cytosol + WTasyn8_Cytosol*Cytosol + WTasyn9*Cytosol;
  Total_Cytosolic_WTASYN_Monomer := WTasyn_Cytosol*Cytosol + DopModWTasyn_Cytosol*Cytosol;
  Total_Cytosolic_WTASYN_Dimer := DopModWTasyn2_Cytosol*Cytosol + WTasyn2_Cytosol*Cytosol;

  // Reactions:
  WTasynSynthesis: $SOURCE => WTasyn_Cytosol; Cytosol*WTasynSynthesis_k1*SOURCE;  // isVersionOf GO:0006351 GO:0006412
    WTasynSynthesis_k1 = 0.0294219;
  _4merForm: WTasyn_Cytosol + WTasyn3_Cytosol => WTasyn4_Cytosol; Cytosol*k_OligomerForm*WTasyn3_Cytosol*WTasyn_Cytosol;  // isVersionOf GO:0051529
  WTasyn8merFormOnLamp: WTasyn7merOnLamp + WTasyn_Cytosol => WTasyn8merOnLamp; k_OligomerForm*WTasyn_Cytosol*WTasyn7merOnLamp;  // isVersionOf GO:0016236
  WTasyn9merFormOnLamp: WTasyn8merOnLamp + WTasyn_Cytosol => WTasyn9merOnLamp; k_OligomerForm*WTasyn_Cytosol*WTasyn8merOnLamp;  // isVersionOf GO:0016236
  ProtFree3merWT: ProtWTasyn3 => Proteasome; Cytosol*k_ProtOligDegr*ProtWTasyn3;  // isVersionOf GO:0010498
  ProtFree4merWT: ProtWTasyn4 => Proteasome; Cytosol*k_ProtOligDegr*ProtWTasyn4;  // isVersionOf GO:0010498
  ProtFree5merWT: ProtWTasyn5 => Proteasome; Cytosol*k_ProtOligDegr*ProtWTasyn5;  // isVersionOf GO:0010498
  ProtFree6merWT: ProtWTasyn6 => Proteasome; Cytosol*k_ProtOligDegr*ProtWTasyn6;  // isVersionOf GO:0010498
  ProtFree7merWT: ProtWTasyn7 => Proteasome; Cytosol*k_ProtOligDegr*ProtWTasyn7;  // isVersionOf GO:0010498
  ProtFree8merWT: ProtWTasyn8 => Proteasome; Cytosol*k_ProtOligDegr*ProtWTasyn8;  // isVersionOf GO:0010498
  ProtFree9merWT: ProtWTasyn9 => Proteasome; Cytosol*k_ProtOligDegr*ProtWTasyn9;  // isVersionOf GO:0010498
  ProtFree3merDopWT: ProtDopModWTasyn3 => Proteasome; Cytosol*k_ProtOligDegr*ProtDopModWTasyn3;  // isVersionOf GO:0010498
  _3merProtBind: Proteasome + WTasyn3_Cytosol => ProtWTasyn3; Cytosol*k_ProteasomeBind*WTasyn3_Cytosol*Proteasome;  // isVersionOf GO:0010498 GO:0070628 GO:1901799
  ProtFree4merDopWT: ProtDopModWTasyn4 => Proteasome; Cytosol*k_ProtOligDegr*ProtDopModWTasyn4;  // isVersionOf GO:0010498
  ProtFree5merDopWT: ProtDopModWTasyn5 => Proteasome; Cytosol*k_ProtOligDegr*ProtDopModWTasyn5;  // isVersionOf GO:0010498
  ProtFree6merDopWT: ProtDopModWTasyn6 => Proteasome; Cytosol*k_ProtOligDegr*ProtDopModWTasyn6;  // isVersionOf GO:0010498
  ProtFree7merDopWT: ProtDopModWTasyn7 => Proteasome; Cytosol*k_ProtOligDegr*ProtDopModWTasyn7;  // isVersionOf GO:0010498
  ProtFree8merDopWT: ProtDopModWTasyn8 => Proteasome; Cytosol*k_ProtOligDegr*ProtDopModWTasyn8;  // isVersionOf GO:0010498
  ProtFree9merDopWT: ProtDopModWTasyn9 => Proteasome; Cytosol*k_ProtOligDegr*ProtDopModWTasyn9;  // isVersionOf GO:0010498
  WTasynHigherPSCprotInh: Proteasome + HigherWTasynSPC => ProtWTasynHigherSPC; Cytosol*k_ProteasomeBind*HigherWTasynSPC*Proteasome;  // isVersionOf GO:1901799 GO:0070628
  DopMod9merDis: DopModWTasyn9 => DopModWTasyn_Cytosol + DopModWTasyn8_Cytosol; Cytosol*k_DisRate*DopModWTasyn9;  // isVersionOf GO:0043241
  DopMod8merDis: DopModWTasyn8_Cytosol => DopModWTasyn_Cytosol + DopModWTasyn7_Cytosol; Cytosol*k_DisRate*DopModWTasyn8_Cytosol;  // isVersionOf GO:0043241
  DopMod7merDis: DopModWTasyn7_Cytosol => DopModWTasyn_Cytosol + DopModWTasyn6_Cytosol; Cytosol*k_DisRate*DopModWTasyn7_Cytosol;  // isVersionOf GO:0043241
  AutophagosomeUptakeWTasyn4mer: WTasyn4_Cytosol => WTasyn4_M_autophagy_OtherLysDegrPath; k_OligAutophagUptake*WTasyn4_Cytosol;  // isVersionOf GO:0016236
  DopMod6merDis: DopModWTasyn6_Cytosol => DopModWTasyn_Cytosol + DopModWTasyn5_Cytosol; Cytosol*k_DisRate*DopModWTasyn6_Cytosol;  // isVersionOf GO:0043241
  DopMod4merDis: DopModWTasyn4_Cytosol => DopModWTasyn_Cytosol + DopModWTasyn3_Cytosol; Cytosol*k_DisRate*DopModWTasyn4_Cytosol;  // isVersionOf GO:0043241
  DopMod5merDis: DopModWTasyn5_Cytosol => DopModWTasyn_Cytosol + DopModWTasyn4_Cytosol; Cytosol*k_DisRate*DopModWTasyn5_Cytosol;  // isVersionOf GO:0043241
  DopMod3merDis: DopModWTasyn3_Cytosol => DopModWTasyn_Cytosol + DopModWTasyn2_Cytosol; Cytosol*k_DisRate*DopModWTasyn3_Cytosol;  // isVersionOf GO:0043241
  DopMod2merDis: DopModWTasyn2_Cytosol => 2 DopModWTasyn_Cytosol; Cytosol*k_DisRate*DopModWTasyn2_Cytosol;  // isVersionOf GO:0043241
  _9merDis: WTasyn9 => WTasyn8_Cytosol + WTasyn_Cytosol; Cytosol*k_DisRate*WTasyn9;  // isVersionOf GO:0043241
  _8merDis: WTasyn8_Cytosol => WTasyn_Cytosol + WTasyn7_Cytosol; Cytosol*k_DisRate*WTasyn8_Cytosol;  // isVersionOf GO:0043241
  _7merDis: WTasyn7_Cytosol => WTasyn_Cytosol + WTasyn6_Cytosol; Cytosol*k_DisRate*WTasyn7_Cytosol;  // isVersionOf GO:0043241
  _6merDis: WTasyn6_Cytosol => WTasyn5_Cytosol + WTasyn_Cytosol; Cytosol*k_DisRate*WTasyn6_Cytosol;  // isVersionOf GO:0043241
  _5merDis: WTasyn5_Cytosol => WTasyn_Cytosol + WTasyn4_Cytosol; Cytosol*k_DisRate*WTasyn5_Cytosol;  // isVersionOf GO:0043241
  _5merForm: WTasyn_Cytosol + WTasyn4_Cytosol => WTasyn5_Cytosol; Cytosol*k_OligomerForm*WTasyn4_Cytosol*WTasyn_Cytosol;  // isVersionOf GO:0051259
  _4merDis: WTasyn4_Cytosol => WTasyn_Cytosol + WTasyn3_Cytosol; Cytosol*k_DisRate*WTasyn4_Cytosol;  // isVersionOf GO:0043241
  _3merDis: WTasyn3_Cytosol => WTasyn_Cytosol + WTasyn2_Cytosol; Cytosol*k_DisRate*WTasyn3_Cytosol;  // isVersionOf GO:0043241
  _2merDis: WTasyn2_Cytosol => 2 WTasyn_Cytosol; Cytosol*k_DisRate*WTasyn2_Cytosol;  // isVersionOf GO:0043241
  AggregGrowth: WTasyn_Cytosol + HigherWTasynSPC => HigherWTasynSPC; Cytosol*AggregGrowth_k1*HigherWTasynSPC*WTasyn_Cytosol;  // isVersionOf GO:0070841
    AggregGrowth_k1 = 4.90556e-7;
  AutophagosomeUptakeWTasyn: WTasyn_Cytosol => WTasyn_M_autophagy_OtherLysDegrPath; k_OligAutophagUptake*WTasyn_Cytosol;  // isVersionOf GO:0016236
  M_autophagyWTasyn1Degr: WTasyn_M_autophagy_OtherLysDegrPath => WTasyn2merM_Adegr; M_autophagy_OtherLysDegrPath*k_M_autophagyDegr*WTasyn_M_autophagy_OtherLysDegrPath; M_autophagyWTasyn1Degr is "M/autophagyWTasyn1Degr";  // isVersionOf GO:0016236
  DopModAutophagosomeUptake: DopModWTasyn_Cytosol => DopModWTasyn_M_autophagy_OtherLysDegrPath; k_OligAutophagUptake*DopModWTasyn_Cytosol;  // isVersionOf GO:0016236
  M_autophagyDopModWTasyn1Degr: DopModWTasyn_M_autophagy_OtherLysDegrPath => DopModWTasyn2merM_Adegr; M_autophagy_OtherLysDegrPath*k_M_autophagyDegr*DopModWTasyn_M_autophagy_OtherLysDegrPath; M_autophagyDopModWTasyn1Degr is "M/autophagyDopModWTasyn1Degr";  // isVersionOf GO:0016236
  _4merProtBind: Proteasome + WTasyn4_Cytosol => ProtWTasyn4; Cytosol*k_ProteasomeBind*WTasyn4_Cytosol*Proteasome;  // isVersionOf GO:0010498 GO:1901799 GO:0070628
  AutophagosomeUptakeWTasyn5mer: WTasyn5_Cytosol => WTasyn5_M_autophagy_OtherLysDegrPath; k_OligAutophagUptake*WTasyn5_Cytosol;  // isVersionOf GO:0016236
  _6merForm: WTasyn_Cytosol + WTasyn5_Cytosol => WTasyn6_Cytosol; Cytosol*k_OligomerForm*WTasyn5_Cytosol*WTasyn_Cytosol;  // hasVersion GO:0051259
  _5merProtBind: Proteasome + WTasyn5_Cytosol => ProtWTasyn5; Cytosol*k_ProteasomeBind*WTasyn5_Cytosol*Proteasome;  // isVersionOf GO:1901799 GO:0070628 GO:0010498
  WTasyn5merBindOnLamp: Lamp2a + WTasyn5_Cytosol => WTasyn5merOnLamp; k_WTOligBindOnLamp*WTasyn5_Cytosol*Lamp2a;  // isVersionOf GO:0005102
  AutophagosomeUptakeWTasyn6mer: WTasyn6_Cytosol => WTasyn6_M_autophagy_OtherLysDegrPath; k_OligAutophagUptake*WTasyn6_Cytosol;  // isVersionOf GO:0016236
  DopProduction: $SOURCE => Dopamine; Cytosol*DopProduction_k1*SOURCE;  // isVersionOf GO:0042416
    DopProduction_k1 = 0.0791823;
  _7merForm: WTasyn_Cytosol + WTasyn6_Cytosol => WTasyn7_Cytosol; Cytosol*k_OligomerForm*WTasyn6_Cytosol*WTasyn_Cytosol;  // isVersionOf GO:0051259
  _6merProtBind: Proteasome + WTasyn6_Cytosol => ProtWTasyn6; Cytosol*k_ProteasomeBind*WTasyn6_Cytosol*Proteasome;  // isVersionOf GO:1901799 GO:0010498 GO:0070628
  AutophagosomeUptakeWTasyn7mer: WTasyn7_Cytosol => WTasyn7_M_autophagy_OtherLysDegrPath; k_OligAutophagUptake*WTasyn7_Cytosol;  // isVersionOf GO:0016236
  _8merForm: WTasyn_Cytosol + WTasyn7_Cytosol => WTasyn8_Cytosol; Cytosol*k_OligomerForm*WTasyn7_Cytosol*WTasyn_Cytosol;  // isVersionOf GO:0051259
  _7merProtBind: Proteasome + WTasyn7_Cytosol => ProtWTasyn7; Cytosol*k_ProteasomeBind*WTasyn7_Cytosol*Proteasome;  // isVersionOf GO:1901799 GO:0010498 GO:0070628
  WTasyn7merBindOnLamp: Lamp2a + WTasyn7_Cytosol => WTasyn7merOnLamp; k_WTOligBindOnLamp*WTasyn7_Cytosol*Lamp2a;  // isVersionOf GO:0005102
  AutophagosomeUptakeWTasyn8mer: WTasyn8_Cytosol => WTasyn8_M_autophagy_OtherLysDegrPath; k_OligAutophagUptake*WTasyn8_Cytosol;  // isVersionOf GO:0016236
  _9merForm: WTasyn_Cytosol + WTasyn8_Cytosol => WTasyn9; Cytosol*k_OligomerForm*WTasyn8_Cytosol*WTasyn_Cytosol;  // isVersionOf GO:0051259
  _8merProtBind: Proteasome + WTasyn8_Cytosol => ProtWTasyn8; Cytosol*k_ProteasomeBind*WTasyn8_Cytosol*Proteasome;  // isVersionOf GO:1901799 GO:0070628 GO:0010498
  _9merProtBind: Proteasome + WTasyn9 => ProtWTasyn9; Cytosol*k_ProteasomeBind*WTasyn9*Proteasome;  // isVersionOf GO:1901799 GO:0070628 GO:0010498
  _2merForm: 2 WTasyn_Cytosol => WTasyn2_Cytosol; Cytosol*k_2merForm*WTasyn_Cytosol^2;  // isVersionOf GO:0051259
  WTasyn9merBindOnLamp: Lamp2a + WTasyn9 => WTasyn9merOnLamp; k_WTOligBindOnLamp*WTasyn9*Lamp2a;  // isVersionOf GO:0005102
  DopamineDegr: Dopamine => Dopamine_degraded; Cytosol*DopamineDegr_k1*Dopamine;  // isVersionOf GO:0042240
    DopamineDegr_k1 = 0.00679501;
  DopMod2merForm: 2 DopModWTasyn_Cytosol => DopModWTasyn2_Cytosol; Cytosol*k_2merForm*DopModWTasyn_Cytosol^2;  // isVersionOf GO:0035786
  DopWTasyn2merFormOnLamp: DopModWTasynOnLamp + DopModWTasyn_Cytosol => DopModWTasyn2merOnLamp; k_2merForm*DopModWTasyn_Cytosol*DopModWTasynOnLamp;  // isVersionOf GO:0035786
  DopWTasyn7merFormOnLamp: DopModWTasyn6merOnLamp + DopModWTasyn_Cytosol => DopModWTasyn7merOnLamp; k_OligomerForm*DopModWTasyn_Cytosol*DopModWTasyn6merOnLamp;  // isVersionOf GO:0035786
  DopWTasyn8merFormOnLamp: DopModWTasyn7merOnLamp + DopModWTasyn_Cytosol => DopModWTasyn8merOnLamp; k_OligomerForm*DopModWTasyn_Cytosol*DopModWTasyn7merOnLamp;  // isVersionOf GO:0035786
  DopWTasyn9merFormOnLamp: DopModWTasyn8merOnLamp + DopModWTasyn_Cytosol => DopModWTasyn9merOnLamp; k_OligomerForm*DopModWTasyn_Cytosol*DopModWTasyn8merOnLamp;  // isVersionOf GO:0035786
  WTasynLysosUptake: WTasyndegr => WTasyn_Lysosome + Lamp2a; Lysosome*WTasynLysosUptake_k1*WTasyndegr;  // isVersionOf GO:0006914
    WTasynLysosUptake_k1 = 0.00999558;
  WTasyn2LysosUptake: WTasyn2degr => WTasyn2_Lysosome + Lamp2a; Lysosome*WTasyn2LysosUptake_k1*WTasyn2degr;  // isVersionOf GO:0006914
    WTasyn2LysosUptake_k1 = 0.00995312;
  WTasynDopModification: Dopamine + WTasyn_Cytosol => DopModWTasyn_Cytosol; Cytosol*WTasynDopModification_k1*WTasyn_Cytosol*Dopamine;  // isVersionOf GO:0032460 GO:0006461
    WTasynDopModification_k1 = 6.74768e-7;
  M_autophagyWTasyn4Degr: WTasyn4_M_autophagy_OtherLysDegrPath => WTasyn4merM_Adegrr; M_autophagy_OtherLysDegrPath*k_M_autophagyDegr*WTasyn4_M_autophagy_OtherLysDegrPath; M_autophagyWTasyn4Degr is "M/autophagyWTasyn4Degr";  // isVersionOf GO:0016236
  M_autophagyWTasyn8Degr: WTasyn8_M_autophagy_OtherLysDegrPath => WTasyn8merM_Adegr; M_autophagy_OtherLysDegrPath*k_M_autophagyDegr*WTasyn8_M_autophagy_OtherLysDegrPath; M_autophagyWTasyn8Degr is "M/autophagyWTasyn8Degr";  // isVersionOf GO:0016236
  M_autophagyWTasyn3Degr: WTasyn3_M_autophagy_OtherLysDegrPath => WTasyn3merM_Adegr; M_autophagy_OtherLysDegrPath*k_M_autophagyDegr*WTasyn3_M_autophagy_OtherLysDegrPath; M_autophagyWTasyn3Degr is "M/autophagyWTasyn3Degr";  // isVersionOf GO:0016236
  M_autophagyWTasyn2Degr: WTasyn2_M_autophagy_OtherLysDegrPath => WTasyn2merM_Adegr; M_autophagy_OtherLysDegrPath*k_M_autophagyDegr*WTasyn2_M_autophagy_OtherLysDegrPath; M_autophagyWTasyn2Degr is "M/autophagyWTasyn2Degr";  // isVersionOf GO:0016236
  M_autophagyWTasyn7Degr: WTasyn7_M_autophagy_OtherLysDegrPath => WTasyn7merM_Adegr; M_autophagy_OtherLysDegrPath*k_M_autophagyDegr*WTasyn7_M_autophagy_OtherLysDegrPath; M_autophagyWTasyn7Degr is "M/autophagyWTasyn7Degr";  // isVersionOf GO:0016236
  M_autophagyWTasyn5Degr: WTasyn5_M_autophagy_OtherLysDegrPath => WTasyn5merM_Adegr; M_autophagy_OtherLysDegrPath*k_M_autophagyDegr*WTasyn5_M_autophagy_OtherLysDegrPath; M_autophagyWTasyn5Degr is "M/autophagyWTasyn5Degr";  // isVersionOf GO:0016236
  M_autophagyWTasyn6Degr: WTasyn6_M_autophagy_OtherLysDegrPath => WTasyn6merM_Adegr; M_autophagy_OtherLysDegrPath*k_M_autophagyDegr*WTasyn6_M_autophagy_OtherLysDegrPath; M_autophagyWTasyn6Degr is "M/autophagyWTasyn6Degr";  // isVersionOf GO:0016236
  AggregForm: WTasyn_Cytosol + WTasyn9 => HigherWTasynSPC; Cytosol*k_OligomerForm*WTasyn9*WTasyn_Cytosol;  // isVersionOf GO:0070841
  DopModAutophagosomeUptake2mer: DopModWTasyn2_Cytosol => DopModWTasyn2_M_autophagy_OtherLysDegrPath; k_OligAutophagUptake*DopModWTasyn2_Cytosol;  // isVersionOf GO:0016236
  DopMod3merForm: DopModWTasyn_Cytosol + DopModWTasyn2_Cytosol => DopModWTasyn3_Cytosol; Cytosol*k_OligomerForm*DopModWTasyn2_Cytosol*DopModWTasyn_Cytosol;  // isVersionOf GO:0035786
  WTasynLampBind: Lamp2a + WTasyn_Cytosol => WTasyndegr; k_WTasyn1_2merBindOnLamp*WTasyn_Cytosol*Lamp2a;  // isVersionOf GO:0005102 GO:0006622
  DopModAutophagosomeUptake3mer: DopModWTasyn3_Cytosol => DopModWTasyn3_M_autophagy_OtherLysDegrPath; k_OligAutophagUptake*DopModWTasyn3_Cytosol;  // isVersionOf GO:0016236
  DopMod4merForm: DopModWTasyn_Cytosol + DopModWTasyn3_Cytosol => DopModWTasyn4_Cytosol; Cytosol*k_OligomerForm*DopModWTasyn3_Cytosol*DopModWTasyn_Cytosol;  // isVersionOf GO:0035786
  DopMod3merProtBind: Proteasome + DopModWTasyn3_Cytosol => ProtDopModWTasyn3; Cytosol*k_ProteasomeBind*DopModWTasyn3_Cytosol*Proteasome;  // isVersionOf GO:0070628 GO:0010498 GO:1901799
  DopModAutophagosomeUptake4mer: DopModWTasyn4_Cytosol => DopModWTasyn4_M_autophagy_OtherLysDegrPath; k_OligAutophagUptake*DopModWTasyn4_Cytosol;  // isVersionOf GO:0016236
  DopMod5merForm: DopModWTasyn_Cytosol + DopModWTasyn4_Cytosol => DopModWTasyn5_Cytosol; Cytosol*k_OligomerForm*DopModWTasyn4_Cytosol*DopModWTasyn_Cytosol;  // isVersionOf GO:0035786
  DopMod4merProtBind: Proteasome + DopModWTasyn4_Cytosol => ProtDopModWTasyn4; Cytosol*k_ProteasomeBind*DopModWTasyn4_Cytosol*Proteasome;  // isVersionOf GO:0070628 GO:0010498 GO:1901799
  DopModAutophagosomeUptake5mer: DopModWTasyn5_Cytosol => DopModWTasyn5_M_autophagy_OtherLysDegrPath; k_OligAutophagUptake*DopModWTasyn5_Cytosol;  // isVersionOf GO:0016236
  DopMod6merForm: DopModWTasyn_Cytosol + DopModWTasyn5_Cytosol => DopModWTasyn6_Cytosol; Cytosol*k_OligomerForm*DopModWTasyn5_Cytosol*DopModWTasyn_Cytosol;  // isVersionOf GO:0035786
  DopMod5merProtBind: Proteasome + DopModWTasyn5_Cytosol => ProtDopModWTasyn5; Cytosol*k_ProteasomeBind*DopModWTasyn5_Cytosol*Proteasome;  // isVersionOf GO:1901799 GO:0070628 GO:0010498
  DopModAutophagosomeUptake6mer: DopModWTasyn6_Cytosol => DopModWTasyn6_M_autophagy_OtherLysDegrPath; k_OligAutophagUptake*DopModWTasyn6_Cytosol;  // isVersionOf GO:0016236
  AutophagosomeUptakeWTasyn2mer: WTasyn2_Cytosol => WTasyn2_M_autophagy_OtherLysDegrPath; k_OligAutophagUptake*WTasyn2_Cytosol;  // isVersionOf GO:0016236
  DopMod7merForm: DopModWTasyn_Cytosol + DopModWTasyn6_Cytosol => DopModWTasyn7_Cytosol; Cytosol*k_OligomerForm*DopModWTasyn6_Cytosol*DopModWTasyn_Cytosol;  // isVersionOf GO:0035786
  DopMod6merProtBind: Proteasome + DopModWTasyn6_Cytosol => ProtDopModWTasyn6; Cytosol*k_ProteasomeBind*DopModWTasyn6_Cytosol*Proteasome;  // isVersionOf GO:0010498 GO:1901799 GO:0070628
  DopModAutophagosomeUptake7mer: DopModWTasyn7_Cytosol => DopModWTasyn7_M_autophagy_OtherLysDegrPath; k_OligAutophagUptake*DopModWTasyn7_Cytosol;  // isVersionOf GO:0016236
  DopMod8merForm: DopModWTasyn_Cytosol + DopModWTasyn7_Cytosol => DopModWTasyn8_Cytosol; Cytosol*k_OligomerForm*DopModWTasyn7_Cytosol*DopModWTasyn_Cytosol;  // isVersionOf GO:0035786
  DopMod7merProtBind: Proteasome + DopModWTasyn7_Cytosol => ProtDopModWTasyn7; Cytosol*k_ProteasomeBind*DopModWTasyn7_Cytosol*Proteasome;  // isVersionOf GO:0070628 GO:1901799 GO:0010498
  DopModAutophagosomeUptake8mer: DopModWTasyn8_Cytosol => DopModWTasyn8_M_autophagy_OtherLysDegrPath; k_OligAutophagUptake*DopModWTasyn8_Cytosol;  // isVersionOf GO:0016236
  DopMod9merForm: DopModWTasyn_Cytosol + DopModWTasyn8_Cytosol => DopModWTasyn9; Cytosol*k_OligomerForm*DopModWTasyn8_Cytosol*DopModWTasyn_Cytosol;  // isVersionOf GO:0035786
  DopMod8merProtBind: Proteasome + DopModWTasyn8_Cytosol => ProtDopModWTasyn8; Cytosol*k_ProteasomeBind*DopModWTasyn8_Cytosol*Proteasome;  // isVersionOf GO:0070628 GO:0010498 GO:1901799
  DopMod9merProtBind: Proteasome + DopModWTasyn9 => ProtDopModWTasyn9; Cytosol*k_ProteasomeBind*DopModWTasyn9*Proteasome;  // isVersionOf GO:0010498 GO:0070628 GO:1901799
  WTasyn2merCMADegr: WTasyn2_Lysosome => WTasyn2merCMADegr_Lysosome; Lysosome*WTasyn2merCMADegr_k1*WTasyn2_Lysosome;  // isVersionOf GO:0006914
    WTasyn2merCMADegr_k1 = 0.1;
  _3merForm: WTasyn_Cytosol + WTasyn2_Cytosol => WTasyn3_Cytosol; Cytosol*k_OligomerForm*WTasyn2_Cytosol*WTasyn_Cytosol;  // isVersionOf GO:0051259
  WTasyn1merCMADegr: WTasyn_Lysosome => WTasynCMADegr; Lysosome*WTasyn1merCMADegr_k1*WTasyn_Lysosome;  // isVersionOf GO:0006914
    WTasyn1merCMADegr_k1 = 0.1;
  LampFree9merWT: WTasyn9merOnLamp => Lamp2a + WTasyn9; k_LampFreeWTasyn*WTasyn9merOnLamp;  // isVersionOf GO:0032984
  DopWTasyn3merFormOnLamp: DopModWTasyn_Cytosol + DopModWTasyn2merOnLamp => DopModWTasyn3merOnLamp; k_OligomerForm*DopModWTasyn2merOnLamp*DopModWTasyn_Cytosol;  // isVersionOf GO:0035786
  DopWTasyn4merFormOnLamp: DopModWTasyn_Cytosol + DopModWTasyn3merOnLamp => DopModWTasyn4merOnLamp; k_OligomerForm*DopModWTasyn3merOnLamp*DopModWTasyn_Cytosol;  // isVersionOf GO:0035786
  DopWTasyn5merFormOnLamp: DopModWTasyn_Cytosol + DopModWTasyn4merOnLamp => DopModWTasyn5merOnLamp; k_OligomerForm*DopModWTasyn4merOnLamp*DopModWTasyn_Cytosol;  // isVersionOf GO:0035786
  DopWTasyn6merFormOnLamp: DopModWTasyn_Cytosol + DopModWTasyn5merOnLamp => DopModWTasyn6merOnLamp; k_OligomerForm*DopModWTasyn5merOnLamp*DopModWTasyn_Cytosol;  // isVersionOf GO:0035786
  LampFree3merWT: WTasyn3merOnLamp => Lamp2a + WTasyn3_Cytosol; k_LampFreeWTasyn*WTasyn3merOnLamp;  // isVersionOf GO:0032984
  LampFree4merWT: WTasyn4merOnLamp => Lamp2a + WTasyn4_Cytosol; k_LampFreeWTasyn*WTasyn4merOnLamp;  // isVersionOf GO:0032984
  LampFree5merWT: WTasyn5merOnLamp => Lamp2a + WTasyn5_Cytosol; k_LampFreeWTasyn*WTasyn5merOnLamp;  // isVersionOf GO:0032984
  LampFree6merWT: WTasyn6merOnLamp => Lamp2a + WTasyn6_Cytosol; k_LampFreeWTasyn*WTasyn6merOnLamp;  // isVersionOf GO:0032984
  WTasyn2LampBind: Lamp2a + WTasyn2_Cytosol => WTasyn2degr; k_WTasyn1_2merBindOnLamp*WTasyn2_Cytosol*Lamp2a;  // isVersionOf GO:0005102 GO:0006622
  LampFree7merWT: WTasyn7merOnLamp => Lamp2a + WTasyn7_Cytosol; k_LampFreeWTasyn*WTasyn7merOnLamp;  // isVersionOf GO:0032984
  LampFree8merWT: WTasyn8merOnLamp => Lamp2a + WTasyn8_Cytosol; k_LampFreeWTasyn*WTasyn8merOnLamp;  // isVersionOf GO:0032984
  WTasyn8merBindOnLamp: WTasyn8_Cytosol + WTasyn8merOnLamp => Lamp2a; k_WTOligBindOnLamp*WTasyn8merOnLamp*WTasyn8_Cytosol;  // isVersionOf GO:0005102
  WTasyn3merBindOnLamp: WTasyn3_Cytosol + Lamp2a => WTasyn3merOnLamp; k_WTOligBindOnLamp*Lamp2a*WTasyn3_Cytosol;  // isVersionOf GO:0005102
  WTasyn4merBindOnLamp: WTasyn4_Cytosol + Lamp2a => WTasyn4merOnLamp; k_WTOligBindOnLamp*Lamp2a*WTasyn4_Cytosol;  // isVersionOf GO:0005102
  WTasyn6merBindOnLamp: WTasyn6_Cytosol + Lamp2a => WTasyn6merOnLamp; k_WTOligBindOnLamp*Lamp2a*WTasyn6_Cytosol;  // isVersionOf GO:0005102
  DopModWTasynCMAInhibition: DopModWTasyn_Cytosol + Lamp2a => DopModWTasynOnLamp; k_DopModWTasynLampBind*Lamp2a*DopModWTasyn_Cytosol;  // isVersionOf GO:0005102
  M_autophagyDopModWTasyn4Degr: DopModWTasyn4_M_autophagy_OtherLysDegrPath => DopModWTasyn4merM_Adegr; M_autophagy_OtherLysDegrPath*k_M_autophagyDegr*DopModWTasyn4_M_autophagy_OtherLysDegrPath; M_autophagyDopModWTasyn4Degr is "M/autophagyDopModWTasyn4Degr";  // isVersionOf GO:0016236
  M_autophagyDopModWTasyn3Degr: DopModWTasyn3_M_autophagy_OtherLysDegrPath => DopModWTasyn3merM_Adegr; M_autophagy_OtherLysDegrPath*k_M_autophagyDegr*DopModWTasyn3_M_autophagy_OtherLysDegrPath; M_autophagyDopModWTasyn3Degr is "M/autophagyDopModWTasyn3Degr";  // isVersionOf GO:0016236
  M_autophagyDopModWTasyn2Degr: DopModWTasyn2_M_autophagy_OtherLysDegrPath => DopModWTasyn2merM_Adegr; M_autophagy_OtherLysDegrPath*k_M_autophagyDegr*DopModWTasyn2_M_autophagy_OtherLysDegrPath; M_autophagyDopModWTasyn2Degr is "M/autophagyDopModWTasyn2Degr";  // isVersionOf GO:0016236
  AutophagosomeUptakeWTasyn3mer: WTasyn3_Cytosol => WTasyn3_M_autophagy_OtherLysDegrPath; k_OligAutophagUptake*WTasyn3_Cytosol;  // isVersionOf GO:0016236
  M_autophagyDopModWTasyn5Degr: DopModWTasyn5_M_autophagy_OtherLysDegrPath => DopModWTasyn6merM_Adegr; M_autophagy_OtherLysDegrPath*k_M_autophagyDegr*DopModWTasyn5_M_autophagy_OtherLysDegrPath; M_autophagyDopModWTasyn5Degr is "M/autophagyDopModWTasyn5Degr";  // isVersionOf GO:0016236
  M_autophagyDopModWTasyn6Degr: DopModWTasyn6_M_autophagy_OtherLysDegrPath => DopModWTasyn7merM_Adegr; M_autophagy_OtherLysDegrPath*k_M_autophagyDegr*DopModWTasyn6_M_autophagy_OtherLysDegrPath; M_autophagyDopModWTasyn6Degr is "M/autophagyDopModWTasyn6Degr";  // isVersionOf GO:0016236
  M_autophagyDopModWTasyn7Degr: DopModWTasyn7_M_autophagy_OtherLysDegrPath => DopModWTasyn7merM_Adegr; M_autophagy_OtherLysDegrPath*k_M_autophagyDegr*DopModWTasyn7_M_autophagy_OtherLysDegrPath; M_autophagyDopModWTasyn7Degr is "M/autophagyDopModWTasyn7Degr";  // isVersionOf GO:0016236
  M_autophagyDopModWTasyn8Degr: DopModWTasyn8_M_autophagy_OtherLysDegrPath => DopModWTasyn8merM_Adegr; M_autophagy_OtherLysDegrPath*k_M_autophagyDegr*DopModWTasyn8_M_autophagy_OtherLysDegrPath; M_autophagyDopModWTasyn8Degr is "M/autophagyDopModWTasyn8Degr";  // isVersionOf GO:0016236
  WTasyn2merFormOnLamp: WTasyndegr + WTasyn_Cytosol => WTasyn2degr; k_2merForm*WTasyn_Cytosol*WTasyndegr;  // isVersionOf GO:0016236
  WTasyn3merFormOnLamp: WTasyn2degr + WTasyn_Cytosol => WTasyn3merOnLamp; k_OligomerForm*WTasyn_Cytosol*WTasyn2degr;  // isVersionOf GO:0016236
  WTasyn4merFormOnLamp: WTasyn3merOnLamp + WTasyn_Cytosol => WTasyn4merOnLamp; k_OligomerForm*WTasyn_Cytosol*WTasyn3merOnLamp;  // isVersionOf GO:0016236
  WTasyn5merFormOnLamp: WTasyn4merOnLamp + WTasyn_Cytosol => WTasyn5merOnLamp; k_OligomerForm*WTasyn_Cytosol*WTasyn4merOnLamp;  // isVersionOf GO:0016236
  WTasyn6merFormOnLamp: WTasyn_Cytosol + WTasyn5merOnLamp => WTasyn6merOnLamp; k_OligomerForm*WTasyn5merOnLamp*WTasyn_Cytosol;  // isVersionOf GO:0016236
  WTasyn7merFormOnLamp: WTasyn_Cytosol + WTasyn6merOnLamp => WTasyn7merOnLamp; k_OligomerForm*WTasyn6merOnLamp*WTasyn_Cytosol;  // isVersionOf GO:0016236

  // Unit definitions:
  unit substance = item;
  unit volume = dimensionless;
end
