// SBML level 2 version 1

model oxhamre()

  // Compartments:
  compartment Cytosol = 1;  // isVersionOf GO:0005829
  compartment Endoplasmic_Reticulum = 1;  // isVersionOf GO:0005790

  // Species:
  species CaER in Endoplasmic_Reticulum = 0;  // isVersionOf CHEBI:29108
  species Ca_Cyt in Cytosol = 0;  // isVersionOf CHEBI:29108
  species p3 in Cytosol = 0.95;

  // Parameters:
  K1 = 5;
  K2 = 0.7;
  K3 = 0.7;
  k31 = 0.5;
  kappa = 5;
  kbN = 0.5;
  n0 = 1;
  p11 = 0.2;
  p12 = 0.8;

  // Assignment rules:
  p2 := Ca_Cyt/(K2 + Ca_Cyt);
  p1 := p11 + p12*n/(K1 + n);
  n := n0*(exp(-kbN*time) + kappa*(1 - exp(-kbN*time)));

  // Reactions:
  Jch: CaER => Ca_Cyt; Fch_0*p1*p2*p3;  // modifiers: p3; isVersionOf GO:0006816 GO:0051482
    Fch_0 = 8;
  Jleak: CaER => Ca_Cyt; Fleak;  // isVersionOf GO:0007204 GO:0006816
    Fleak = 0.5;
  Jpump: Ca_Cyt => CaER; Fpump_0*Ca_Cyt/(Kpump + Ca_Cyt);  // isVersionOf GO:0051481 GO:0006816
    Fpump_0 = 2; Kpump = 0.1;
  p3_consumption: p3 -> ; k31*Ca_Cyt*p3;  // modifiers: Ca_Cyt
  p3_production: -> p3; k31*K3*(1 - p3);

  // Unit definitions:
  unit micromole_default = 1e-6 mole; micromole_default is "micromole (default)";
  unit minute_default = 60 second; minute_default is "minute (default)";
end
