// SBML level 2 version 4

model palini1()

  // Compartments:
  compartment cell = 1;  // isVersionOf GO:0005623

  // Species:
  species A in cell = 0;  // hasProperty uniprot:P38889 MOD:00890 GO:0016563
  species C in cell = 0;  // hasProperty CHEBI:60283 uniprot:Q9C5U0 GO:0009885
  species I in cell = 1;  // isVersionOf uniprot:P38889
  species $L in cell = 0.1;  // isVersionOf chembl.compound:CHEMBL1163500 CHEBI:60283 CHEBI:23530
  species R in cell = 1;  // isVersionOf uniprot:Q9C5U0
  species X in cell = 0;  // hasProperty CHEBI:60283 uniprot:Q9C5U0 uniprot:P38889 GO:0009885

  // Parameters:
  BI = 0.005;
  BR = 0.005;
  KD = 200;
  Rs = 3;
  TFs = 3;
  k1 = 1;
  k2 = 5;
  k3 = 45;
  kdegA = 0.005;
  kdegC = 0.01;
  kdegI = 0.005;
  kdegR = 0.005;
  kdegX = 0.005;
  koff = 0.05;
  kon = 0.001;

  // Reactions:
  A_degradation: A => ; cell*kdegA*A;  // isVersionOf GO:0030163
  C_I_binding: I + C -> X; cell*(k1*C*I - k2*X);  // isVersionOf GO:0006461
  C_degradation: C => ; cell*kdegC*C;  // isVersionOf GO:0030163
  I_activation: X => A + C; cell*k3*X;  // isVersionOf GO:0009885 GO:0006468 ec-code:2.7.13.3
  I_degradation: I => ; cell*kdegI*I;  // isVersionOf GO:0030163
  I_expression: => I; cell*(BI + TFs*A/(KD + A));  // modifiers: A; isVersionOf GO:0010467
  R_L_binding: $L + R -> C; cell*(kon*L*R - koff*C);  // isVersionOf GO:0023038
  R_degradation: R => ; cell*kdegR*R;  // isVersionOf GO:0030163
  R_expression: => R; cell*(BR + Rs*A/(KD + A));  // modifiers: A; isVersionOf GO:0010467
  X_degradation: X => ; cell*kdegX*X;  // isVersionOf GO:0030163
end
