// SBML level 2 version 4

model pathak1()

  // Compartments:
  compartment Cytosol = 1 volume;
  compartment Nucleus = 1 volume;
  compartment default = 1 volume;  // isVersionOf GO:0005623

  // Species:
  substanceOnly species Cold in default = 0.5;
  substanceOnly species LecRK2 in Cytosol = 0.8;
  substanceOnly species ETR1 in Cytosol = 0.8;
  substanceOnly species ETR2 in Cytosol = 0.8;
  substanceOnly species s13 in Cytosol = 1; s13 is "MAPKKK";
  substanceOnly species s14 in Cytosol = 1; s14 is "MAPKKK";
  substanceOnly species MAPKKK1 in Cytosol = 1;
  substanceOnly species CTR1 in Cytosol = 1;
  substanceOnly species s17 in Cytosol = 1; s17 is "MAPKK";
  substanceOnly species s18 in Cytosol = 1; s18 is "MAPKK";
  substanceOnly species MAPKK1 in Cytosol = 1;
  substanceOnly species Salt in default = 0.5;
  substanceOnly species MAPKK2 in Cytosol = 1;
  substanceOnly species MAPKK3 in Cytosol = 1;
  substanceOnly species MAPKK4 in Cytosol = 1;
  substanceOnly species MAPKK5 in Cytosol = 1;
  substanceOnly species MAPKK6 in Cytosol = 1;
  substanceOnly species MAPKK7 in Cytosol = 1;
  substanceOnly species MAPKK9 in Cytosol = 1;
  substanceOnly species s27 in Cytosol = 1; s27 is "MAPK";
  substanceOnly species s28 in Cytosol = 1; s28 is "MAPK";
  substanceOnly species MAPK2 in Cytosol = 1;
  substanceOnly species Drought in default = 0.5;
  substanceOnly species MAPK3 in Cytosol = 1;
  substanceOnly species MAPK4 in Cytosol = 1;
  substanceOnly species MAPK6 in Cytosol = 1;
  substanceOnly species s33 in Nucleus = 1.2; s33 is "WRKY1";
  substanceOnly species s34 in Nucleus = 1.2; s34 is "WRKY1";
  substanceOnly species s35 in Nucleus = 1.2; s35 is "WRKY12";
  substanceOnly species s36 in Nucleus = 1.2; s36 is "WRKY12";
  substanceOnly species s37 in Nucleus = 1.2; s37 is "WRKY8";
  substanceOnly species s38 in Nucleus = 1.2; s38 is "WRKY8";
  substanceOnly species s39 in Nucleus = 1.2; s39 is "WRKY25";
  substanceOnly species H2O2 in default = 0.5;
  substanceOnly species s40 in Nucleus = 1.2; s40 is "WRKY25";
  substanceOnly species s41 in Nucleus = 1.2; s41 is "WRKY22";
  substanceOnly species s42 in Nucleus = 1.2; s42 is "WRKY22";
  substanceOnly species s43 in Nucleus = 1.2; s43 is "WRKY29";
  substanceOnly species s44 in Nucleus = 1.2; s44 is "WRKY29";
  substanceOnly species s45 in Nucleus = 1.2; s45 is "WRKY33";
  substanceOnly species s46 in Nucleus = 1.2; s46 is "WRKY33";
  substanceOnly species s47 in Nucleus = 1.2; s47 is "WRKY28";
  substanceOnly species s48 in Nucleus = 1.2; s48 is "WRKY28";
  substanceOnly species s49 in Nucleus = 1.5; s49 is "MYB2";
  substanceOnly species Heavy_Metal in default = 0.5;
  substanceOnly species s50 in Nucleus = 1.5; s50 is "MYB2";
  substanceOnly species s51 in Nucleus = 1.5; s51 is "MYB4";
  substanceOnly species s52 in Nucleus = 1.5; s52 is "MYB4";
  substanceOnly species MYB44 in Nucleus = 1.5;
  substanceOnly species NAC in Nucleus = 1.8;
  substanceOnly species bZIP in Nucleus = 2;
  substanceOnly species AP2 in Nucleus = 2.2;
  substanceOnly species Response in default = 2.5;
  substanceOnly species Ethylene in default = 0.5;
  substanceOnly species RLKs in Cytosol = 0.8;
  substanceOnly species LRR in Cytosol = 0.8;
  substanceOnly species CRKs in Cytosol = 0.8;

  // Parameters:
  kass_re1 = 1 per_second; kass_re1 is "Association constant of reaction re1";
  kass_re10 = 1 per_second; kass_re10 is "Association constant of reaction re10";
  kass_re11 = 1 per_second; kass_re11 is "Association constant of reaction re11";
  kass_re12 = 1 per_second; kass_re12 is "Association constant of reaction re12";
  kass_re13 = 1 per_second; kass_re13 is "Association constant of reaction re13";
  kass_re14 = 1 per_second; kass_re14 is "Association constant of reaction re14";
  kass_re15 = 1 per_second; kass_re15 is "Association constant of reaction re15";
  kass_re16 = 1 per_second; kass_re16 is "Association constant of reaction re16";
  kass_re17 = 1 per_second; kass_re17 is "Association constant of reaction re17";
  kass_re18 = 1 per_second; kass_re18 is "Association constant of reaction re18";
  kass_re19 = 1 per_second; kass_re19 is "Association constant of reaction re19";
  kass_re2 = 1 per_second; kass_re2 is "Association constant of reaction re2";
  kass_re20 = 1 per_second; kass_re20 is "Association constant of reaction re20";
  kass_re21 = 1 per_second; kass_re21 is "Association constant of reaction re21";
  kass_re22 = 1 per_second; kass_re22 is "Association constant of reaction re22";
  kass_re23 = 1 per_second; kass_re23 is "Association constant of reaction re23";
  kass_re24 = 1 per_second; kass_re24 is "Association constant of reaction re24";
  kass_re25 = 1 per_second; kass_re25 is "Association constant of reaction re25";
  kass_re26 = 1 per_second; kass_re26 is "Association constant of reaction re26";
  kass_re27 = 1 per_second; kass_re27 is "Association constant of reaction re27";
  kass_re28 = 1 per_second; kass_re28 is "Association constant of reaction re28";
  kass_re29 = 1 per_second; kass_re29 is "Association constant of reaction re29";
  kass_re3 = 1 per_second; kass_re3 is "Association constant of reaction re3";
  kass_re30 = 1 per_second; kass_re30 is "Association constant of reaction re30";
  kass_re31 = 1 per_second; kass_re31 is "Association constant of reaction re31";
  kass_re32 = 1 per_second; kass_re32 is "Association constant of reaction re32";
  kass_re33 = 1 per_second; kass_re33 is "Association constant of reaction re33";
  kass_re34 = 1 per_second; kass_re34 is "Association constant of reaction re34";
  kass_re35 = 1 per_second; kass_re35 is "Association constant of reaction re35";
  kass_re36 = 1 per_second; kass_re36 is "Association constant of reaction re36";
  kass_re37 = 1 per_second; kass_re37 is "Association constant of reaction re37";
  kass_re38 = 1 per_second; kass_re38 is "Association constant of reaction re38";
  kass_re39 = 1 per_second; kass_re39 is "Association constant of reaction re39";
  kass_re4 = 1 per_second; kass_re4 is "Association constant of reaction re4";
  kass_re40 = 1 per_second; kass_re40 is "Association constant of reaction re40";
  kass_re41 = 1 per_second; kass_re41 is "Association constant of reaction re41";
  kass_re42 = 1 per_second; kass_re42 is "Association constant of reaction re42";
  kass_re43 = 1 per_second; kass_re43 is "Association constant of reaction re43";
  kass_re44 = 1 per_second; kass_re44 is "Association constant of reaction re44";
  kass_re45 = 1 per_second; kass_re45 is "Association constant of reaction re45";
  kass_re46 = 1 per_second; kass_re46 is "Association constant of reaction re46";
  kass_re47 = 1 per_second; kass_re47 is "Association constant of reaction re47";
  kass_re48 = 1 per_second; kass_re48 is "Association constant of reaction re48";
  kass_re49 = 1 per_second; kass_re49 is "Association constant of reaction re49";
  kass_re5 = 1 per_second; kass_re5 is "Association constant of reaction re5";
  kass_re50 = 1 per_second; kass_re50 is "Association constant of reaction re50";
  kass_re51 = 1 per_second; kass_re51 is "Association constant of reaction re51";
  kass_re52 = 1 per_second; kass_re52 is "Association constant of reaction re52";
  kass_re53 = 1 per_second; kass_re53 is "Association constant of reaction re53";
  kass_re54 = 1 per_second; kass_re54 is "Association constant of reaction re54";
  kass_re55 = 1 per_second; kass_re55 is "Association constant of reaction re55";
  kass_re56 = 1 per_second; kass_re56 is "Association constant of reaction re56";
  kass_re57 = 1 per_second; kass_re57 is "Association constant of reaction re57";
  kass_re58 = 1 per_second; kass_re58 is "Association constant of reaction re58";
  kass_re59 = 1 per_second; kass_re59 is "Association constant of reaction re59";
  kass_re6 = 1 per_second; kass_re6 is "Association constant of reaction re6";
  kass_re60 = 1 per_second; kass_re60 is "Association constant of reaction re60";
  kass_re61 = 1 per_second; kass_re61 is "Association constant of reaction re61";
  kass_re62 = 1 per_second; kass_re62 is "Association constant of reaction re62";
  kass_re63 = 1 per_second; kass_re63 is "Association constant of reaction re63";
  kass_re64 = 1 per_second; kass_re64 is "Association constant of reaction re64";
  kass_re65 = 1 per_second; kass_re65 is "Association constant of reaction re65";
  kass_re66 = 1 per_second; kass_re66 is "Association constant of reaction re66";
  kass_re67 = 1 per_second; kass_re67 is "Association constant of reaction re67";
  kass_re68 = 1 per_second; kass_re68 is "Association constant of reaction re68";
  kass_re69 = 1 per_second; kass_re69 is "Association constant of reaction re69";
  kass_re7 = 1 per_second; kass_re7 is "Association constant of reaction re7";
  kass_re70 = 1 per_second; kass_re70 is "Association constant of reaction re70";
  kass_re71 = 1 per_second; kass_re71 is "Association constant of reaction re71";
  kass_re72 = 1 per_second; kass_re72 is "Association constant of reaction re72";
  kass_re73 = 1 per_second; kass_re73 is "Association constant of reaction re73";
  kass_re74 = 1 per_second; kass_re74 is "Association constant of reaction re74";
  kass_re75 = 1 per_second; kass_re75 is "Association constant of reaction re75";
  kass_re76 = 1 per_second; kass_re76 is "Association constant of reaction re76";
  kass_re77 = 1 per_second; kass_re77 is "Association constant of reaction re77";
  kass_re78 = 1 per_second; kass_re78 is "Association constant of reaction re78";
  kass_re79 = 1 per_second; kass_re79 is "Association constant of reaction re79";
  kass_re8 = 1 per_second; kass_re8 is "Association constant of reaction re8";
  kass_re80 = 1 per_second; kass_re80 is "Association constant of reaction re80";
  kass_re81 = 1 per_second; kass_re81 is "Association constant of reaction re81";
  kass_re82 = 1 per_second; kass_re82 is "Association constant of reaction re82";
  kass_re83 = 1 per_second; kass_re83 is "Association constant of reaction re83";
  kass_re84 = 1 per_second; kass_re84 is "Association constant of reaction re84";
  kass_re85 = 1 per_second; kass_re85 is "Association constant of reaction re85";
  kass_re86 = 1 per_second; kass_re86 is "Association constant of reaction re86";
  kass_re9 = 1 per_second; kass_re9 is "Association constant of reaction re9";
  kdiss_re1 = 1 per_second; kdiss_re1 is "Dissociation constant of reaction re1";
  kdiss_re10 = 1 per_second; kdiss_re10 is "Dissociation constant of reaction re10";
  kdiss_re11 = 1 per_second; kdiss_re11 is "Dissociation constant of reaction re11";
  kdiss_re12 = 1 per_second; kdiss_re12 is "Dissociation constant of reaction re12";
  kdiss_re13 = 1 per_second; kdiss_re13 is "Dissociation constant of reaction re13";
  kdiss_re14 = 1 per_second; kdiss_re14 is "Dissociation constant of reaction re14";
  kdiss_re15 = 1 per_second; kdiss_re15 is "Dissociation constant of reaction re15";
  kdiss_re16 = 1 per_second; kdiss_re16 is "Dissociation constant of reaction re16";
  kdiss_re17 = 1 per_second; kdiss_re17 is "Dissociation constant of reaction re17";
  kdiss_re18 = 1 per_second; kdiss_re18 is "Dissociation constant of reaction re18";
  kdiss_re19 = 1 per_second; kdiss_re19 is "Dissociation constant of reaction re19";
  kdiss_re2 = 1 per_second; kdiss_re2 is "Dissociation constant of reaction re2";
  kdiss_re20 = 1 per_second; kdiss_re20 is "Dissociation constant of reaction re20";
  kdiss_re21 = 1 per_second; kdiss_re21 is "Dissociation constant of reaction re21";
  kdiss_re22 = 1 per_second; kdiss_re22 is "Dissociation constant of reaction re22";
  kdiss_re23 = 1 per_second; kdiss_re23 is "Dissociation constant of reaction re23";
  kdiss_re24 = 1 per_second; kdiss_re24 is "Dissociation constant of reaction re24";
  kdiss_re25 = 1 per_second; kdiss_re25 is "Dissociation constant of reaction re25";
  kdiss_re26 = 1 per_second; kdiss_re26 is "Dissociation constant of reaction re26";
  kdiss_re27 = 1 per_second; kdiss_re27 is "Dissociation constant of reaction re27";
  kdiss_re28 = 1 per_second; kdiss_re28 is "Dissociation constant of reaction re28";
  kdiss_re29 = 1 per_second; kdiss_re29 is "Dissociation constant of reaction re29";
  kdiss_re3 = 1 per_second; kdiss_re3 is "Dissociation constant of reaction re3";
  kdiss_re30 = 1 per_second; kdiss_re30 is "Dissociation constant of reaction re30";
  kdiss_re31 = 1 per_second; kdiss_re31 is "Dissociation constant of reaction re31";
  kdiss_re32 = 1 per_second; kdiss_re32 is "Dissociation constant of reaction re32";
  kdiss_re33 = 1 per_second; kdiss_re33 is "Dissociation constant of reaction re33";
  kdiss_re34 = 1 per_second; kdiss_re34 is "Dissociation constant of reaction re34";
  kdiss_re35 = 1 per_second; kdiss_re35 is "Dissociation constant of reaction re35";
  kdiss_re36 = 1 per_second; kdiss_re36 is "Dissociation constant of reaction re36";
  kdiss_re37 = 1 per_second; kdiss_re37 is "Dissociation constant of reaction re37";
  kdiss_re38 = 1 per_second; kdiss_re38 is "Dissociation constant of reaction re38";
  kdiss_re39 = 1 per_second; kdiss_re39 is "Dissociation constant of reaction re39";
  kdiss_re4 = 1 per_second; kdiss_re4 is "Dissociation constant of reaction re4";
  kdiss_re40 = 1 per_second; kdiss_re40 is "Dissociation constant of reaction re40";
  kdiss_re41 = 1 per_second; kdiss_re41 is "Dissociation constant of reaction re41";
  kdiss_re42 = 1 per_second; kdiss_re42 is "Dissociation constant of reaction re42";
  kdiss_re43 = 1 per_second; kdiss_re43 is "Dissociation constant of reaction re43";
  kdiss_re44 = 1 per_second; kdiss_re44 is "Dissociation constant of reaction re44";
  kdiss_re45 = 1 per_second; kdiss_re45 is "Dissociation constant of reaction re45";
  kdiss_re46 = 1 per_second; kdiss_re46 is "Dissociation constant of reaction re46";
  kdiss_re47 = 1 per_second; kdiss_re47 is "Dissociation constant of reaction re47";
  kdiss_re48 = 1 per_second; kdiss_re48 is "Dissociation constant of reaction re48";
  kdiss_re49 = 1 per_second; kdiss_re49 is "Dissociation constant of reaction re49";
  kdiss_re5 = 1 per_second; kdiss_re5 is "Dissociation constant of reaction re5";
  kdiss_re50 = 1 per_second; kdiss_re50 is "Dissociation constant of reaction re50";
  kdiss_re51 = 1 per_second; kdiss_re51 is "Dissociation constant of reaction re51";
  kdiss_re52 = 1 per_second; kdiss_re52 is "Dissociation constant of reaction re52";
  kdiss_re53 = 1 per_second; kdiss_re53 is "Dissociation constant of reaction re53";
  kdiss_re54 = 1 per_second; kdiss_re54 is "Dissociation constant of reaction re54";
  kdiss_re55 = 1 per_second; kdiss_re55 is "Dissociation constant of reaction re55";
  kdiss_re56 = 1 per_second; kdiss_re56 is "Dissociation constant of reaction re56";
  kdiss_re57 = 1 per_second; kdiss_re57 is "Dissociation constant of reaction re57";
  kdiss_re58 = 1 per_second; kdiss_re58 is "Dissociation constant of reaction re58";
  kdiss_re59 = 1 per_second; kdiss_re59 is "Dissociation constant of reaction re59";
  kdiss_re6 = 1 per_second; kdiss_re6 is "Dissociation constant of reaction re6";
  kdiss_re60 = 1 per_second; kdiss_re60 is "Dissociation constant of reaction re60";
  kdiss_re61 = 1 per_second; kdiss_re61 is "Dissociation constant of reaction re61";
  kdiss_re62 = 1 per_second; kdiss_re62 is "Dissociation constant of reaction re62";
  kdiss_re63 = 1 per_second; kdiss_re63 is "Dissociation constant of reaction re63";
  kdiss_re64 = 1 per_second; kdiss_re64 is "Dissociation constant of reaction re64";
  kdiss_re65 = 1 per_second; kdiss_re65 is "Dissociation constant of reaction re65";
  kdiss_re66 = 1 per_second; kdiss_re66 is "Dissociation constant of reaction re66";
  kdiss_re67 = 1 per_second; kdiss_re67 is "Dissociation constant of reaction re67";
  kdiss_re68 = 1 per_second; kdiss_re68 is "Dissociation constant of reaction re68";
  kdiss_re69 = 1 per_second; kdiss_re69 is "Dissociation constant of reaction re69";
  kdiss_re7 = 1 per_second; kdiss_re7 is "Dissociation constant of reaction re7";
  kdiss_re70 = 1 per_second; kdiss_re70 is "Dissociation constant of reaction re70";
  kdiss_re71 = 1 per_second; kdiss_re71 is "Dissociation constant of reaction re71";
  kdiss_re72 = 1 per_second; kdiss_re72 is "Dissociation constant of reaction re72";
  kdiss_re73 = 1 per_second; kdiss_re73 is "Dissociation constant of reaction re73";
  kdiss_re74 = 1 per_second; kdiss_re74 is "Dissociation constant of reaction re74";
  kdiss_re75 = 1 per_second; kdiss_re75 is "Dissociation constant of reaction re75";
  kdiss_re76 = 1 per_second; kdiss_re76 is "Dissociation constant of reaction re76";
  kdiss_re77 = 1 per_second; kdiss_re77 is "Dissociation constant of reaction re77";
  kdiss_re78 = 1 per_second; kdiss_re78 is "Dissociation constant of reaction re78";
  kdiss_re79 = 1 per_second; kdiss_re79 is "Dissociation constant of reaction re79";
  kdiss_re8 = 1 per_second; kdiss_re8 is "Dissociation constant of reaction re8";
  kdiss_re80 = 1 per_second; kdiss_re80 is "Dissociation constant of reaction re80";
  kdiss_re81 = 1 per_second; kdiss_re81 is "Dissociation constant of reaction re81";
  kdiss_re82 = 1 per_second; kdiss_re82 is "Dissociation constant of reaction re82";
  kdiss_re83 = 1 per_second; kdiss_re83 is "Dissociation constant of reaction re83";
  kdiss_re84 = 1 per_second; kdiss_re84 is "Dissociation constant of reaction re84";
  kdiss_re85 = 1 per_second; kdiss_re85 is "Dissociation constant of reaction re85";
  kdiss_re86 = 1 per_second; kdiss_re86 is "Dissociation constant of reaction re86";
  kdiss_re9 = 1 per_second; kdiss_re9 is "Dissociation constant of reaction re9";

  // Reactions:
  re1: Cold -> RLKs; kass_re1*Cold - kdiss_re1*RLKs;
  re10: H2O2 -> RLKs; kass_re10*H2O2 - kdiss_re10*RLKs;
  re11: Heavy_Metal -> RLKs; kass_re11*Heavy_Metal - kdiss_re11*RLKs;
  re12: s13 -> s14; kass_re12*s13 - kdiss_re12*s14;
  re13: RLKs -> s13; kass_re13*RLKs - kdiss_re13*s13;
  re14: LRR -> s13; kass_re14*LRR - kdiss_re14*s13;
  re15: CRKs -> s13; kass_re15*CRKs - kdiss_re15*s13;
  re16: LecRK2 -> s13; kass_re16*LecRK2 - kdiss_re16*s13;
  re17: s14 -> MAPKKK1; kass_re17*s14 - kdiss_re17*MAPKKK1;
  re18: RLKs -> MAPKKK1; kass_re18*RLKs - kdiss_re18*MAPKKK1;
  re19: s14 -> CTR1; kass_re19*s14 - kdiss_re19*CTR1;
  re2: Salt -> RLKs; kass_re2*Salt - kdiss_re2*RLKs;
  re20: ETR1 -> CTR1; kass_re20*ETR1 - kdiss_re20*CTR1;
  re21: ETR2 -> CTR1; kass_re21*ETR2 - kdiss_re21*CTR1;
  re22: s17 -> s18; kass_re22*s17 - kdiss_re22*s18;
  re23: s14 -> s17; kass_re23*s14 - kdiss_re23*s17;
  re24: s18 -> MAPKK1; kass_re24*s18 - kdiss_re24*MAPKK1;
  re25: s18 -> MAPKK2; kass_re25*s18 - kdiss_re25*MAPKK2;
  re26: s18 -> MAPKK3; kass_re26*s18 - kdiss_re26*MAPKK3;
  re27: s18 -> MAPKK4; kass_re27*s18 - kdiss_re27*MAPKK4;
  re28: s18 -> MAPKK5; kass_re28*s18 - kdiss_re28*MAPKK5;
  re29: s18 -> MAPKK6; kass_re29*s18 - kdiss_re29*MAPKK6;
  re3: Salt -> LRR; kass_re3*Salt - kdiss_re3*LRR;
  re30: s18 -> MAPKK7; kass_re30*s18 - kdiss_re30*MAPKK7;
  re31: s18 -> MAPKK9; kass_re31*s18 - kdiss_re31*MAPKK9;
  re32: s27 -> s28; kass_re32*s27 - kdiss_re32*s28;
  re33: s18 -> s27; kass_re33*s18 - kdiss_re33*s27;
  re34: MAPKKK1 -> MAPKK1; kass_re34*MAPKKK1 - kdiss_re34*MAPKK1;
  re35: MAPKKK1 -> MAPKK2; kass_re35*MAPKKK1 - kdiss_re35*MAPKK2;
  re36: CTR1 -> MAPKK9; kass_re36*CTR1 - kdiss_re36*MAPKK9;
  re37: s28 -> MAPK2; kass_re37*s28 - kdiss_re37*MAPK2;
  re38: s28 -> MAPK3; kass_re38*s28 - kdiss_re38*MAPK3;
  re39: s28 -> MAPK4; kass_re39*s28 - kdiss_re39*MAPK4;
  re4: Salt -> CRKs; kass_re4*Salt - kdiss_re4*CRKs;
  re40: s28 -> MAPK6; kass_re40*s28 - kdiss_re40*MAPK6;
  re41: MAPKK2 -> MAPK3; kass_re41*MAPKK2 - kdiss_re41*MAPK3;
  re42: MAPKK2 -> MAPK4; kass_re42*MAPKK2 - kdiss_re42*MAPK4;
  re43: MAPKK2 -> MAPK6; kass_re43*MAPKK2 - kdiss_re43*MAPK6;
  re44: MAPKK9 -> MAPK3; kass_re44*MAPKK9 - kdiss_re44*MAPK3;
  re45: s33 -> s34; kass_re45*s33 - kdiss_re45*s34;
  re46: s35 -> s36; kass_re46*s35 - kdiss_re46*s36;
  re47: s37 -> s38; kass_re47*s37 - kdiss_re47*s38;
  re48: s39 -> s40; kass_re48*s39 - kdiss_re48*s40;
  re49: s41 -> s42; kass_re49*s41 - kdiss_re49*s42;
  re5: Ethylene -> ETR2; kass_re5*Ethylene - kdiss_re5*ETR2;
  re50: s43 -> s44; kass_re50*s43 - kdiss_re50*s44;
  re51: s45 -> s46; kass_re51*s45 - kdiss_re51*s46;
  re52: s47 -> s48; kass_re52*s47 - kdiss_re52*s48;
  re53: s49 -> s50; kass_re53*s49 - kdiss_re53*s50;
  re54: s51 -> s52; kass_re54*s51 - kdiss_re54*s52;
  re55: MAPK2 -> s37; kass_re55*MAPK2 - kdiss_re55*s37;
  re56: MAPK2 -> s33; kass_re56*MAPK2 - kdiss_re56*s33;
  re57: MAPK3 -> s35; kass_re57*MAPK3 - kdiss_re57*s35;
  re58: MAPK3 -> s41; kass_re58*MAPK3 - kdiss_re58*s41;
  re59: MAPK3 -> s47; kass_re59*MAPK3 - kdiss_re59*s47;
  re6: Ethylene -> ETR1; kass_re6*Ethylene - kdiss_re6*ETR1;
  re60: MAPK4 -> s33; kass_re60*MAPK4 - kdiss_re60*s33;
  re61: MAPK4 -> s45; kass_re61*MAPK4 - kdiss_re61*s45;
  re62: MAPK4 -> s39; kass_re62*MAPK4 - kdiss_re62*s39;
  re63: MAPK6 -> s47; kass_re63*MAPK6 - kdiss_re63*s47;
  re64: MAPK6 -> s45; kass_re64*MAPK6 - kdiss_re64*s45;
  re65: MAPK6 -> s35; kass_re65*MAPK6 - kdiss_re65*s35;
  re66: s28 -> AP2; kass_re66*s28 - kdiss_re66*AP2;
  re67: s28 -> s49; kass_re67*s28 - kdiss_re67*s49;
  re68: s28 -> s51; kass_re68*s28 - kdiss_re68*s51;
  re69: s28 -> MYB44; kass_re69*s28 - kdiss_re69*MYB44;
  re7: Ethylene -> LecRK2; kass_re7*Ethylene - kdiss_re7*LecRK2;
  re70: s28 -> NAC; kass_re70*s28 - kdiss_re70*NAC;
  re71: s28 -> bZIP; kass_re71*s28 - kdiss_re71*bZIP;
  re72: s40 -> Response; kass_re72*s40 - kdiss_re72*Response;
  re73: MYB44 -> Response; kass_re73*MYB44 - kdiss_re73*Response;
  re74: NAC -> Response; kass_re74*NAC - kdiss_re74*Response;
  re75: s52 -> Response; kass_re75*s52 - kdiss_re75*Response;
  re76: s50 -> Response; kass_re76*s50 - kdiss_re76*Response;
  re77: AP2 -> Response; kass_re77*AP2 - kdiss_re77*Response;
  re78: s48 -> Response; kass_re78*s48 - kdiss_re78*Response;
  re79: MAPK3 -> s43; kass_re79*MAPK3 - kdiss_re79*s43;
  re8: Drought -> CRKs; kass_re8*Drought - kdiss_re8*CRKs;
  re80: bZIP -> Response; kass_re80*bZIP - kdiss_re80*Response;
  re81: s42 -> Response; kass_re81*s42 - kdiss_re81*Response;
  re82: s44 -> Response; kass_re82*s44 - kdiss_re82*Response;
  re83: s38 -> Response; kass_re83*s38 - kdiss_re83*Response;
  re84: s36 -> Response; kass_re84*s36 - kdiss_re84*Response;
  re85: s34 -> Response; kass_re85*s34 - kdiss_re85*Response;
  re86: s46 -> Response; kass_re86*s46 - kdiss_re86*Response;
  re9: Drought -> RLKs; kass_re9*Drought - kdiss_re9*RLKs;

  // Unit definitions:
  unit per_second = 1 / second;
  unit time = second;
  unit length = metre;
  unit area = metre^2;
  unit volume = 1e-3 litre;
  unit substance = 1e-3 mole;
end
