// SBML level 2 version 4

model pathak2()

  // Compartments:
  compartment Cytosol = 1 volume;
  compartment Nucleus = 1 volume;
  compartment default = 1 volume;  // isVersionOf GO:0005623

  // Species:
  substanceOnly species Fungal_pathogen in default = 0.5;
  substanceOnly species MAPKKK18 in Cytosol = 1;
  substanceOnly species MAPKKK19 in Cytosol = 1;
  substanceOnly species MAPKKK20 in Cytosol = 1;
  substanceOnly species EDR1 in Cytosol = 1;
  substanceOnly species s14 in Cytosol = 1; s14 is "MAPKK";
  substanceOnly species s15 in Cytosol = 1; s15 is "MAPKK";
  substanceOnly species MAPKK2 in Cytosol = 1;
  substanceOnly species MAPKK4 in Cytosol = 1;
  substanceOnly species MAPKK5 in Cytosol = 1;
  substanceOnly species MAPKK9 in Cytosol = 1;
  substanceOnly species Bacterial_pathogen in default = 0.5;
  substanceOnly species s20 in Cytosol = 1; s20 is "MAPK";
  substanceOnly species s21 in Cytosol = 1; s21 is "MAPK";
  substanceOnly species MAPK2 in Cytosol = 1;
  substanceOnly species MAPK3 in Cytosol = 1;
  substanceOnly species MAPK4 in Cytosol = 1;
  substanceOnly species MAPK6 in Cytosol = 1;
  substanceOnly species SIMK in Cytosol = 1;
  substanceOnly species SAMK in Cytosol = 1;
  substanceOnly species s28 in Nucleus = 1.2; s28 is "WRKY1";
  substanceOnly species s29 in Nucleus = 1.2; s29 is "WRKY1";
  substanceOnly species LysM in Cytosol = 0.8;
  substanceOnly species s30 in Nucleus = 1.5; s30 is "MYB2";
  substanceOnly species s31 in Nucleus = 1.5; s31 is "MYB2";
  substanceOnly species s32 in Nucleus = 1.2; s32 is "WRKY33";
  substanceOnly species s33 in Nucleus = 1.2; s33 is "WRKY33";
  substanceOnly species s34 in Nucleus = 1.2; s34 is "WRKY6";
  substanceOnly species s35 in Nucleus = 1.2; s35 is "WRKY6";
  substanceOnly species s36 in Nucleus = 1.5; s36 is "MYB4";
  substanceOnly species s37 in Nucleus = 1.5; s37 is "MYB4";
  substanceOnly species s38 in Nucleus = 1.2; s38 is "WRKY25";
  substanceOnly species s39 in Nucleus = 1.2; s39 is "WRKY25";
  substanceOnly species PRRs in Cytosol = 0.8;
  substanceOnly species s40 in Nucleus = 1.2; s40 is "WRKY12";
  substanceOnly species s41 in Nucleus = 1.2; s41 is "WRKY12";
  substanceOnly species s42 in Nucleus = 1.2; s42 is "WRKY22";
  substanceOnly species s43 in Nucleus = 1.2; s43 is "WRKY22";
  substanceOnly species s44 in Nucleus = 1.2; s44 is "WRKY28";
  substanceOnly species s45 in Nucleus = 1.2; s45 is "WRKY28";
  substanceOnly species s46 in Nucleus = 1.2; s46 is "WRKY29";
  substanceOnly species s47 in Nucleus = 1.2; s47 is "WRKY29";
  substanceOnly species MYB44 in Nucleus = 1.5;
  substanceOnly species NAC in Nucleus = 1.8;
  substanceOnly species FLS2 in Cytosol = 0.8;
  substanceOnly species bZIP in Nucleus = 2;
  substanceOnly species AP2 in Nucleus = 2.2;
  substanceOnly species Response in default = 2.5;
  substanceOnly species LRR in Cytosol = 0.8;
  substanceOnly species s7 in Cytosol = 1; s7 is "MAPKKK";
  substanceOnly species s8 in Cytosol = 1; s8 is "MAPKKK";
  substanceOnly species MAPKKK1 in Cytosol = 1;

  // Parameters:
  kass_re1 = 1 per_second; kass_re1 is "Association constant of reaction re1";
  kass_re10 = 1 per_second; kass_re10 is "Association constant of reaction re10";
  kass_re11 = 1 per_second; kass_re11 is "Association constant of reaction re11";
  kass_re12 = 1 per_second; kass_re12 is "Association constant of reaction re12";
  kass_re13 = 1 per_second; kass_re13 is "Association constant of reaction re13";
  kass_re14 = 1 per_second; kass_re14 is "Association constant of reaction re14";
  kass_re15 = 1 per_second; kass_re15 is "Association constant of reaction re15";
  kass_re16 = 1 per_second; kass_re16 is "Association constant of reaction re16";
  kass_re17 = 1 per_second; kass_re17 is "Association constant of reaction re17";
  kass_re18 = 1 per_second; kass_re18 is "Association constant of reaction re18";
  kass_re19 = 1 per_second; kass_re19 is "Association constant of reaction re19";
  kass_re2 = 1 per_second; kass_re2 is "Association constant of reaction re2";
  kass_re20 = 1 per_second; kass_re20 is "Association constant of reaction re20";
  kass_re21 = 1 per_second; kass_re21 is "Association constant of reaction re21";
  kass_re22 = 1 per_second; kass_re22 is "Association constant of reaction re22";
  kass_re23 = 1 per_second; kass_re23 is "Association constant of reaction re23";
  kass_re24 = 1 per_second; kass_re24 is "Association constant of reaction re24";
  kass_re25 = 1 per_second; kass_re25 is "Association constant of reaction re25";
  kass_re26 = 1 per_second; kass_re26 is "Association constant of reaction re26";
  kass_re27 = 1 per_second; kass_re27 is "Association constant of reaction re27";
  kass_re28 = 1 per_second; kass_re28 is "Association constant of reaction re28";
  kass_re29 = 1 per_second; kass_re29 is "Association constant of reaction re29";
  kass_re3 = 1 per_second; kass_re3 is "Association constant of reaction re3";
  kass_re30 = 1 per_second; kass_re30 is "Association constant of reaction re30";
  kass_re31 = 1 per_second; kass_re31 is "Association constant of reaction re31";
  kass_re32 = 1 per_second; kass_re32 is "Association constant of reaction re32";
  kass_re33 = 1 per_second; kass_re33 is "Association constant of reaction re33";
  kass_re34 = 1 per_second; kass_re34 is "Association constant of reaction re34";
  kass_re35 = 1 per_second; kass_re35 is "Association constant of reaction re35";
  kass_re36 = 1 per_second; kass_re36 is "Association constant of reaction re36";
  kass_re37 = 1 per_second; kass_re37 is "Association constant of reaction re37";
  kass_re38 = 1 per_second; kass_re38 is "Association constant of reaction re38";
  kass_re39 = 1 per_second; kass_re39 is "Association constant of reaction re39";
  kass_re4 = 1 per_second; kass_re4 is "Association constant of reaction re4";
  kass_re40 = 1 per_second; kass_re40 is "Association constant of reaction re40";
  kass_re41 = 1 per_second; kass_re41 is "Association constant of reaction re41";
  kass_re42 = 1 per_second; kass_re42 is "Association constant of reaction re42";
  kass_re43 = 1 per_second; kass_re43 is "Association constant of reaction re43";
  kass_re44 = 1 per_second; kass_re44 is "Association constant of reaction re44";
  kass_re45 = 1 per_second; kass_re45 is "Association constant of reaction re45";
  kass_re46 = 1 per_second; kass_re46 is "Association constant of reaction re46";
  kass_re47 = 1 per_second; kass_re47 is "Association constant of reaction re47";
  kass_re48 = 1 per_second; kass_re48 is "Association constant of reaction re48";
  kass_re49 = 1 per_second; kass_re49 is "Association constant of reaction re49";
  kass_re5 = 1 per_second; kass_re5 is "Association constant of reaction re5";
  kass_re50 = 1 per_second; kass_re50 is "Association constant of reaction re50";
  kass_re51 = 1 per_second; kass_re51 is "Association constant of reaction re51";
  kass_re52 = 1 per_second; kass_re52 is "Association constant of reaction re52";
  kass_re53 = 1 per_second; kass_re53 is "Association constant of reaction re53";
  kass_re54 = 1 per_second; kass_re54 is "Association constant of reaction re54";
  kass_re55 = 1 per_second; kass_re55 is "Association constant of reaction re55";
  kass_re56 = 1 per_second; kass_re56 is "Association constant of reaction re56";
  kass_re57 = 1 per_second; kass_re57 is "Association constant of reaction re57";
  kass_re58 = 1 per_second; kass_re58 is "Association constant of reaction re58";
  kass_re59 = 1 per_second; kass_re59 is "Association constant of reaction re59";
  kass_re6 = 1 per_second; kass_re6 is "Association constant of reaction re6";
  kass_re60 = 1 per_second; kass_re60 is "Association constant of reaction re60";
  kass_re61 = 1 per_second; kass_re61 is "Association constant of reaction re61";
  kass_re62 = 1 per_second; kass_re62 is "Association constant of reaction re62";
  kass_re63 = 1 per_second; kass_re63 is "Association constant of reaction re63";
  kass_re64 = 1 per_second; kass_re64 is "Association constant of reaction re64";
  kass_re65 = 1 per_second; kass_re65 is "Association constant of reaction re65";
  kass_re66 = 1 per_second; kass_re66 is "Association constant of reaction re66";
  kass_re67 = 1 per_second; kass_re67 is "Association constant of reaction re67";
  kass_re68 = 1 per_second; kass_re68 is "Association constant of reaction re68";
  kass_re69 = 1 per_second; kass_re69 is "Association constant of reaction re69";
  kass_re7 = 1 per_second; kass_re7 is "Association constant of reaction re7";
  kass_re70 = 1 per_second; kass_re70 is "Association constant of reaction re70";
  kass_re71 = 1 per_second; kass_re71 is "Association constant of reaction re71";
  kass_re72 = 1 per_second; kass_re72 is "Association constant of reaction re72";
  kass_re73 = 1 per_second; kass_re73 is "Association constant of reaction re73";
  kass_re74 = 1 per_second; kass_re74 is "Association constant of reaction re74";
  kass_re75 = 1 per_second; kass_re75 is "Association constant of reaction re75";
  kass_re76 = 1 per_second; kass_re76 is "Association constant of reaction re76";
  kass_re77 = 1 per_second; kass_re77 is "Association constant of reaction re77";
  kass_re78 = 1 per_second; kass_re78 is "Association constant of reaction re78";
  kass_re79 = 1 per_second; kass_re79 is "Association constant of reaction re79";
  kass_re8 = 1 per_second; kass_re8 is "Association constant of reaction re8";
  kass_re80 = 1 per_second; kass_re80 is "Association constant of reaction re80";
  kass_re81 = 1 per_second; kass_re81 is "Association constant of reaction re81";
  kass_re82 = 1 per_second; kass_re82 is "Association constant of reaction re82";
  kass_re83 = 1 per_second; kass_re83 is "Association constant of reaction re83";
  kass_re84 = 1 per_second; kass_re84 is "Association constant of reaction re84";
  kass_re85 = 1 per_second; kass_re85 is "Association constant of reaction re85";
  kass_re86 = 1 per_second; kass_re86 is "Association constant of reaction re86";
  kass_re87 = 1 per_second; kass_re87 is "Association constant of reaction re87";
  kass_re88 = 1 per_second; kass_re88 is "Association constant of reaction re88";
  kass_re9 = 1 per_second; kass_re9 is "Association constant of reaction re9";
  kdiss_re1 = 1 per_second; kdiss_re1 is "Dissociation constant of reaction re1";
  kdiss_re10 = 1 per_second; kdiss_re10 is "Dissociation constant of reaction re10";
  kdiss_re11 = 1 per_second; kdiss_re11 is "Dissociation constant of reaction re11";
  kdiss_re12 = 1 per_second; kdiss_re12 is "Dissociation constant of reaction re12";
  kdiss_re13 = 1 per_second; kdiss_re13 is "Dissociation constant of reaction re13";
  kdiss_re14 = 1 per_second; kdiss_re14 is "Dissociation constant of reaction re14";
  kdiss_re15 = 1 per_second; kdiss_re15 is "Dissociation constant of reaction re15";
  kdiss_re16 = 1 per_second; kdiss_re16 is "Dissociation constant of reaction re16";
  kdiss_re17 = 1 per_second; kdiss_re17 is "Dissociation constant of reaction re17";
  kdiss_re18 = 1 per_second; kdiss_re18 is "Dissociation constant of reaction re18";
  kdiss_re19 = 1 per_second; kdiss_re19 is "Dissociation constant of reaction re19";
  kdiss_re2 = 1 per_second; kdiss_re2 is "Dissociation constant of reaction re2";
  kdiss_re20 = 1 per_second; kdiss_re20 is "Dissociation constant of reaction re20";
  kdiss_re21 = 1 per_second; kdiss_re21 is "Dissociation constant of reaction re21";
  kdiss_re22 = 1 per_second; kdiss_re22 is "Dissociation constant of reaction re22";
  kdiss_re23 = 1 per_second; kdiss_re23 is "Dissociation constant of reaction re23";
  kdiss_re24 = 1 per_second; kdiss_re24 is "Dissociation constant of reaction re24";
  kdiss_re25 = 1 per_second; kdiss_re25 is "Dissociation constant of reaction re25";
  kdiss_re26 = 1 per_second; kdiss_re26 is "Dissociation constant of reaction re26";
  kdiss_re27 = 1 per_second; kdiss_re27 is "Dissociation constant of reaction re27";
  kdiss_re28 = 1 per_second; kdiss_re28 is "Dissociation constant of reaction re28";
  kdiss_re29 = 1 per_second; kdiss_re29 is "Dissociation constant of reaction re29";
  kdiss_re3 = 1 per_second; kdiss_re3 is "Dissociation constant of reaction re3";
  kdiss_re30 = 1 per_second; kdiss_re30 is "Dissociation constant of reaction re30";
  kdiss_re31 = 1 per_second; kdiss_re31 is "Dissociation constant of reaction re31";
  kdiss_re32 = 1 per_second; kdiss_re32 is "Dissociation constant of reaction re32";
  kdiss_re33 = 1 per_second; kdiss_re33 is "Dissociation constant of reaction re33";
  kdiss_re34 = 1 per_second; kdiss_re34 is "Dissociation constant of reaction re34";
  kdiss_re35 = 1 per_second; kdiss_re35 is "Dissociation constant of reaction re35";
  kdiss_re36 = 1 per_second; kdiss_re36 is "Dissociation constant of reaction re36";
  kdiss_re37 = 1 per_second; kdiss_re37 is "Dissociation constant of reaction re37";
  kdiss_re38 = 1 per_second; kdiss_re38 is "Dissociation constant of reaction re38";
  kdiss_re39 = 1 per_second; kdiss_re39 is "Dissociation constant of reaction re39";
  kdiss_re4 = 1 per_second; kdiss_re4 is "Dissociation constant of reaction re4";
  kdiss_re40 = 1 per_second; kdiss_re40 is "Dissociation constant of reaction re40";
  kdiss_re41 = 1 per_second; kdiss_re41 is "Dissociation constant of reaction re41";
  kdiss_re42 = 1 per_second; kdiss_re42 is "Dissociation constant of reaction re42";
  kdiss_re43 = 1 per_second; kdiss_re43 is "Dissociation constant of reaction re43";
  kdiss_re44 = 1 per_second; kdiss_re44 is "Dissociation constant of reaction re44";
  kdiss_re45 = 1 per_second; kdiss_re45 is "Dissociation constant of reaction re45";
  kdiss_re46 = 1 per_second; kdiss_re46 is "Dissociation constant of reaction re46";
  kdiss_re47 = 1 per_second; kdiss_re47 is "Dissociation constant of reaction re47";
  kdiss_re48 = 1 per_second; kdiss_re48 is "Dissociation constant of reaction re48";
  kdiss_re49 = 1 per_second; kdiss_re49 is "Dissociation constant of reaction re49";
  kdiss_re5 = 1 per_second; kdiss_re5 is "Dissociation constant of reaction re5";
  kdiss_re50 = 1 per_second; kdiss_re50 is "Dissociation constant of reaction re50";
  kdiss_re51 = 1 per_second; kdiss_re51 is "Dissociation constant of reaction re51";
  kdiss_re52 = 1 per_second; kdiss_re52 is "Dissociation constant of reaction re52";
  kdiss_re53 = 1 per_second; kdiss_re53 is "Dissociation constant of reaction re53";
  kdiss_re54 = 1 per_second; kdiss_re54 is "Dissociation constant of reaction re54";
  kdiss_re55 = 1 per_second; kdiss_re55 is "Dissociation constant of reaction re55";
  kdiss_re56 = 1 per_second; kdiss_re56 is "Dissociation constant of reaction re56";
  kdiss_re57 = 1 per_second; kdiss_re57 is "Dissociation constant of reaction re57";
  kdiss_re58 = 1 per_second; kdiss_re58 is "Dissociation constant of reaction re58";
  kdiss_re59 = 1 per_second; kdiss_re59 is "Dissociation constant of reaction re59";
  kdiss_re6 = 1 per_second; kdiss_re6 is "Dissociation constant of reaction re6";
  kdiss_re60 = 1 per_second; kdiss_re60 is "Dissociation constant of reaction re60";
  kdiss_re61 = 1 per_second; kdiss_re61 is "Dissociation constant of reaction re61";
  kdiss_re62 = 1 per_second; kdiss_re62 is "Dissociation constant of reaction re62";
  kdiss_re63 = 1 per_second; kdiss_re63 is "Dissociation constant of reaction re63";
  kdiss_re64 = 1 per_second; kdiss_re64 is "Dissociation constant of reaction re64";
  kdiss_re65 = 1 per_second; kdiss_re65 is "Dissociation constant of reaction re65";
  kdiss_re66 = 1 per_second; kdiss_re66 is "Dissociation constant of reaction re66";
  kdiss_re67 = 1 per_second; kdiss_re67 is "Dissociation constant of reaction re67";
  kdiss_re68 = 1 per_second; kdiss_re68 is "Dissociation constant of reaction re68";
  kdiss_re69 = 1 per_second; kdiss_re69 is "Dissociation constant of reaction re69";
  kdiss_re7 = 1 per_second; kdiss_re7 is "Dissociation constant of reaction re7";
  kdiss_re70 = 1 per_second; kdiss_re70 is "Dissociation constant of reaction re70";
  kdiss_re71 = 1 per_second; kdiss_re71 is "Dissociation constant of reaction re71";
  kdiss_re72 = 1 per_second; kdiss_re72 is "Dissociation constant of reaction re72";
  kdiss_re73 = 1 per_second; kdiss_re73 is "Dissociation constant of reaction re73";
  kdiss_re74 = 1 per_second; kdiss_re74 is "Dissociation constant of reaction re74";
  kdiss_re75 = 1 per_second; kdiss_re75 is "Dissociation constant of reaction re75";
  kdiss_re76 = 1 per_second; kdiss_re76 is "Dissociation constant of reaction re76";
  kdiss_re77 = 1 per_second; kdiss_re77 is "Dissociation constant of reaction re77";
  kdiss_re78 = 1 per_second; kdiss_re78 is "Dissociation constant of reaction re78";
  kdiss_re79 = 1 per_second; kdiss_re79 is "Dissociation constant of reaction re79";
  kdiss_re8 = 1 per_second; kdiss_re8 is "Dissociation constant of reaction re8";
  kdiss_re80 = 1 per_second; kdiss_re80 is "Dissociation constant of reaction re80";
  kdiss_re81 = 1 per_second; kdiss_re81 is "Dissociation constant of reaction re81";
  kdiss_re82 = 1 per_second; kdiss_re82 is "Dissociation constant of reaction re82";
  kdiss_re83 = 1 per_second; kdiss_re83 is "Dissociation constant of reaction re83";
  kdiss_re84 = 1 per_second; kdiss_re84 is "Dissociation constant of reaction re84";
  kdiss_re85 = 1 per_second; kdiss_re85 is "Dissociation constant of reaction re85";
  kdiss_re86 = 1 per_second; kdiss_re86 is "Dissociation constant of reaction re86";
  kdiss_re87 = 1 per_second; kdiss_re87 is "Dissociation constant of reaction re87";
  kdiss_re88 = 1 per_second; kdiss_re88 is "Dissociation constant of reaction re88";
  kdiss_re9 = 1 per_second; kdiss_re9 is "Dissociation constant of reaction re9";

  // Reactions:
  re1: Fungal_pathogen -> LysM; kass_re1*Fungal_pathogen - kdiss_re1*LysM;
  re10: FLS2 -> s7; kass_re10*FLS2 - kdiss_re10*s7;
  re11: LRR -> s7; kass_re11*LRR - kdiss_re11*s7;
  re12: s8 -> MAPKKK1; kass_re12*s8 - kdiss_re12*MAPKKK1;
  re13: s8 -> MAPKKK18; kass_re13*s8 - kdiss_re13*MAPKKK18;
  re14: s8 -> MAPKKK19; kass_re14*s8 - kdiss_re14*MAPKKK19;
  re15: s8 -> MAPKKK20; kass_re15*s8 - kdiss_re15*MAPKKK20;
  re16: LRR -> MAPKKK1; kass_re16*LRR - kdiss_re16*MAPKKK1;
  re17: s8 -> EDR1; kass_re17*s8 - kdiss_re17*EDR1;
  re18: FLS2 -> EDR1; kass_re18*FLS2 - kdiss_re18*EDR1;
  re19: FLS2 -> MAPKKK19; kass_re19*FLS2 - kdiss_re19*MAPKKK19;
  re2: Fungal_pathogen -> PRRs; kass_re2*Fungal_pathogen - kdiss_re2*PRRs;
  re20: s14 -> s15; kass_re20*s14 - kdiss_re20*s15;
  re21: s8 -> s14; kass_re21*s8 - kdiss_re21*s14;
  re22: s15 -> MAPKK2; kass_re22*s15 - kdiss_re22*MAPKK2;
  re23: s15 -> MAPKK4; kass_re23*s15 - kdiss_re23*MAPKK4;
  re24: s15 -> MAPKK5; kass_re24*s15 - kdiss_re24*MAPKK5;
  re25: s15 -> MAPKK9; kass_re25*s15 - kdiss_re25*MAPKK9;
  re26: MAPKKK1 -> MAPKK2; kass_re26*MAPKKK1 - kdiss_re26*MAPKK2;
  re27: MAPKKK1 -> MAPKK4; kass_re27*MAPKKK1 - kdiss_re27*MAPKK4;
  re28: MAPKKK1 -> MAPKK5; kass_re28*MAPKKK1 - kdiss_re28*MAPKK5;
  re29: MAPKKK19 -> MAPKK9; kass_re29*MAPKKK19 - kdiss_re29*MAPKK9;
  re3: Fungal_pathogen -> FLS2; kass_re3*Fungal_pathogen - kdiss_re3*FLS2;
  re30: s20 -> s21; kass_re30*s20 - kdiss_re30*s21;
  re31: s15 -> s20; kass_re31*s15 - kdiss_re31*s20;
  re32: s21 -> MAPK2; kass_re32*s21 - kdiss_re32*MAPK2;
  re33: s21 -> MAPK3; kass_re33*s21 - kdiss_re33*MAPK3;
  re34: s21 -> MAPK4; kass_re34*s21 - kdiss_re34*MAPK4;
  re35: s21 -> MAPK6; kass_re35*s21 - kdiss_re35*MAPK6;
  re36: s21 -> SIMK; kass_re36*s21 - kdiss_re36*SIMK;
  re37: s21 -> SAMK; kass_re37*s21 - kdiss_re37*SAMK;
  re38: MAPKK2 -> MAPK2; kass_re38*MAPKK2 - kdiss_re38*MAPK2;
  re39: MAPKK4 -> MAPK2; kass_re39*MAPKK4 - kdiss_re39*MAPK2;
  re4: Bacterial_pathogen -> PRRs; kass_re4*Bacterial_pathogen - kdiss_re4*PRRs;
  re40: MAPKK4 -> MAPK3; kass_re40*MAPKK4 - kdiss_re40*MAPK3;
  re41: MAPKK5 -> MAPK3; kass_re41*MAPKK5 - kdiss_re41*MAPK3;
  re42: MAPKK4 -> MAPK6; kass_re42*MAPKK4 - kdiss_re42*MAPK6;
  re43: MAPKK2 -> MAPK4; kass_re43*MAPKK2 - kdiss_re43*MAPK4;
  re44: MAPKK5 -> MAPK6; kass_re44*MAPKK5 - kdiss_re44*MAPK6;
  re45: s28 -> s29; kass_re45*s28 - kdiss_re45*s29;
  re46: s30 -> s31; kass_re46*s30 - kdiss_re46*s31;
  re47: s32 -> s33; kass_re47*s32 - kdiss_re47*s33;
  re48: s34 -> s35; kass_re48*s34 - kdiss_re48*s35;
  re49: s36 -> s37; kass_re49*s36 - kdiss_re49*s37;
  re5: Bacterial_pathogen -> FLS2; kass_re5*Bacterial_pathogen - kdiss_re5*FLS2;
  re50: s38 -> s39; kass_re50*s38 - kdiss_re50*s39;
  re51: s40 -> s41; kass_re51*s40 - kdiss_re51*s41;
  re52: s42 -> s43; kass_re52*s42 - kdiss_re52*s43;
  re53: s44 -> s45; kass_re53*s44 - kdiss_re53*s45;
  re54: s46 -> s47; kass_re54*s46 - kdiss_re54*s47;
  re55: MAPK2 -> s28; kass_re55*MAPK2 - kdiss_re55*s28;
  re56: MAPK4 -> s28; kass_re56*MAPK4 - kdiss_re56*s28;
  re57: MAPK3 -> s32; kass_re57*MAPK3 - kdiss_re57*s32;
  re58: MAPK4 -> s32; kass_re58*MAPK4 - kdiss_re58*s32;
  re59: MAPK4 -> s38; kass_re59*MAPK4 - kdiss_re59*s38;
  re6: Bacterial_pathogen -> LRR; kass_re6*Bacterial_pathogen - kdiss_re6*LRR;
  re60: MAPK3 -> s42; kass_re60*MAPK3 - kdiss_re60*s42;
  re61: MAPK6 -> s42; kass_re61*MAPK6 - kdiss_re61*s42;
  re62: MAPK6 -> s46; kass_re62*MAPK6 - kdiss_re62*s46;
  re63: MAPK6 -> s32; kass_re63*MAPK6 - kdiss_re63*s32;
  re64: MAPK3 -> s46; kass_re64*MAPK3 - kdiss_re64*s46;
  re65: MAPK3 -> s44; kass_re65*MAPK3 - kdiss_re65*s44;
  re66: MAPK6 -> s44; kass_re66*MAPK6 - kdiss_re66*s44;
  re67: MAPK3 -> s40; kass_re67*MAPK3 - kdiss_re67*s40;
  re68: MAPK6 -> s36; kass_re68*MAPK6 - kdiss_re68*s36;
  re69: s21 -> s30; kass_re69*s21 - kdiss_re69*s30;
  re7: s7 -> s8; kass_re7*s7 - kdiss_re7*s8;
  re70: s21 -> MYB44; kass_re70*s21 - kdiss_re70*MYB44;
  re71: s21 -> NAC; kass_re71*s21 - kdiss_re71*NAC;
  re72: s21 -> AP2; kass_re72*s21 - kdiss_re72*AP2;
  re73: s21 -> bZIP; kass_re73*s21 - kdiss_re73*bZIP;
  re74: MAPK4 -> s34; kass_re74*MAPK4 - kdiss_re74*s34;
  re75: s45 -> Response; kass_re75*s45 - kdiss_re75*Response;
  re76: s31 -> Response; kass_re76*s31 - kdiss_re76*Response;
  re77: NAC -> Response; kass_re77*NAC - kdiss_re77*Response;
  re78: bZIP -> Response; kass_re78*bZIP - kdiss_re78*Response;
  re79: AP2 -> Response; kass_re79*AP2 - kdiss_re79*Response;
  re8: LysM -> s7; kass_re8*LysM - kdiss_re8*s7;
  re80: MYB44 -> Response; kass_re80*MYB44 - kdiss_re80*Response;
  re81: s37 -> Response; kass_re81*s37 - kdiss_re81*Response;
  re82: s41 -> Response; kass_re82*s41 - kdiss_re82*Response;
  re83: s35 -> Response; kass_re83*s35 - kdiss_re83*Response;
  re84: s29 -> Response; kass_re84*s29 - kdiss_re84*Response;
  re85: s47 -> Response; kass_re85*s47 - kdiss_re85*Response;
  re86: s43 -> Response; kass_re86*s43 - kdiss_re86*Response;
  re87: s39 -> Response; kass_re87*s39 - kdiss_re87*Response;
  re88: s33 -> Response; kass_re88*s33 - kdiss_re88*Response;
  re9: PRRs -> s7; kass_re9*PRRs - kdiss_re9*s7;

  // Unit definitions:
  unit per_second = 1 / second;
  unit time = second;
  unit length = metre;
  unit area = metre^2;
  unit volume = 1e-3 litre;
  unit substance = 1e-3 mole;
end
