// SBML level 3 version 1

model podder1()

  // Compartments:
  compartment default = 1;

  // Species:
  species Af in default = 1005000; Af is "Women with AIDS";
  species Am in default = 1005000; Am is "Men with AIDS";
  species $EXT in default = 1;
  species Imc in default = 1018000; Imc is "Infected circumcised men";
  species Imu in default = 1400000; Imu is "Infected uncircumcised men";
  species Inf in default = 1400000; Inf is "Infected women";
  species Sf in default = 9972000; Sf is "Susceptible women";
  species $Smc in default; Smc is "Susceptible circumcised men";
  species $Smu in default; Smu is "Susceptible uncircumcised men";
  species Tf in default = 0; Tf is "Treated women";
  species Tm in default = 0; Tm is "Treated men";

  // Parameters:
  Pi1 = 1000;
  Pi2 = 1000;
  Pi3 = 1000;
  betaF = 0.45;
  betaM = 0.4;
  c = 0.6;
  delta = 0.102;
  epsilon = 0.6;
  eta = 1.1;
  etaF = 0.02;
  etaM = 0.02;
  mu = 0.037;
  nu = 0.87;
  q = 0.6;
  sigma = 0.1;
  tau1 = 5;
  tau2 = 5;
  thetaT = 0.1;
  xi = 1;

  // Assignment rules:
  lambdaM := betaM*(Imu + Imc + eta*Am + etaM*Tm)/(Smu + Smc + Imu + Imc + Am + Tm);
  Smc := (Pi3*(mu + xi*q*epsilon) + xi*q*epsilon*Pi2)/(mu*(mu + xi*q*epsilon));
  Reff := (k3 + eta*sigma)*sqrt(betaM*betaF*((1 - epsilon)*Smc + Smu)/(Smc + Smu))/(k2*k3);
  Smu := Pi2/(mu + xi*q*epsilon);
  k3 := mu + delta;
  k2 := mu + sigma;
  k1 := mu + xi*q*epsilon;
  lambdaF := betaF*(Inf + eta*Af + etaF*Tf)/(Sf + Inf + Af + Tf);

  // Reactions:
  v_1: $EXT -> Sf; Pi1;
  v_10: Af -> $EXT; mu*Af;
  v_11: Af -> $EXT; delta*Af;
  v_12: $EXT -> $Smu; Pi2;
  v_13: $Smu -> $EXT; mu*Smu;
  v_14: $Smu -> $Smc; xi*epsilon*q*Smu;
  v_15: $Smu -> Imu; lambdaF*(1 - nu*c)*Smu;
  v_16: $Smc -> $EXT; mu*Smc;
  v_17: $Smc -> Imc; lambdaF*(1 - nu*c)*(1 - epsilon)*Smc;
  v_18: $EXT -> $Smc; Pi3;
  v_19: Imu -> $EXT; mu*Imu;
  v_2: Sf -> Inf; lambdaM*(1 - nu*c)*Sf;
  v_20: Imu -> Am; sigma*Imu;
  v_21: Imu -> Tm; tau1*Imu;
  v_22: Imc -> $EXT; mu*Imc;
  v_23: Imc -> Am; sigma*Imc;
  v_24: Imc -> Tm; tau2*Am;  // modifiers: Am
  v_25: Tm -> $EXT; mu*Tm;
  v_26: Tm -> Am; thetaT*sigma*Tm;
  v_27: Am -> Tm; tau2*Am;
  v_28: Am -> $EXT; mu*Am;
  v_29: Am -> $EXT; delta*Am;
  v_3: Sf -> $EXT; mu*Sf;
  v_4: Inf -> $EXT; mu*INF;
  v_5: Inf -> Af; sigma*INF;
  v_6: Inf -> Tf; tau1*INF;
  v_7: Tf -> $EXT; mu*Tf;
  v_8: Tf -> Af; thetaT*sigma*Tf;
  v_9: Af -> Tf; tau2*Af;
end
