// SBML level 2 version 1

model pritchard1()

  // Compartments:
  compartment cell = 1; cell is "cytosol";  // GO:0005829
  compartment ext = 1; ext is "exterior";  // GO:0005576

  // Species:
  species ADP in cell = 1.281988;  // kegg.compound:C00008 CHEBI:16761
  species AMP in cell = 0.2928849;  // kegg.compound:C00020 CHEBI:16027
  species ATP in cell = 2.525127;  // kegg.compound:C00002 CHEBI:15422
  species AcAld in cell = 0.1781406; AcAld is "acetaldehyde";  // kegg.compound:C00084 CHEBI:15343
  species BPG in cell = 0.0007368735; BPG is "Gri2,3P2";  // kegg.compound:C00236 CHEBI:16001
  species $CO2 in cell = 1;  // kegg.compound:C00011 CHEBI:16526
  species DHAP in cell = 1.004153; DHAP is "glycerone phosphate";  // kegg.compound:C00111 CHEBI:16108
  species $EtOH in cell = 50; EtOH is "ethanol";  // kegg.compound:C00469 CHEBI:16236
  species F16bP in cell = 6.221321; F16bP is "Fru1,6-P2";  // kegg.compound:C05378 CHEBI:28013
  species $F26bP in cell = 0.02; F26bP is "Fru2,6-P2";  // kegg.compound:C00665 CHEBI:28602
  species F6P in cell = 0.6249764; F6P is "Fru6-P";  // kegg.compound:C05345 CHEBI:16084
  species G6P in cell = 2.67504; G6P is "Glu6P";  // kegg.compound:C00668 CHEBI:17665
  species GAP in cell = 0.04518092; GAP is "Gra3P";  // kegg.compound:C00118 CHEBI:29052
  species GLCi in cell = 0.09765223; GLCi is "Glc(int)";  // kegg.compound:C00031 CHEBI:4167
  species $GLCo in ext = 2; GLCo is "Glc(ext)";  // kegg.compound:C00031 CHEBI:4167
  species $Glycerol in cell = 0.15; Glycerol is "glycerol";  // kegg.compound:C00116 CHEBI:17754
  species $Glycogen in cell = 0; Glycogen is "glycogen";  // kegg.compound:C00182 CHEBI:28087
  species NAD in cell = 1.50329;  // kegg.compound:C00003 CHEBI:15846
  species NADH in cell = 0.0867097;  // kegg.compound:C00004 CHEBI:16908
  species P2G in cell = 0.1276958; P2G is "Gri2P";  // kegg.compound:C00631 CHEBI:17835
  species P3G in cell = 0.8856885; P3G is "Gri3P";  // kegg.compound:C00197 CHEBI:17794
  species PEP in cell = 0.06323521; PEP is "phosphoenolpyruvate";  // kegg.compound:C00074 CHEBI:18021
  species PYR in cell = 1.815313; PYR is "pyruvate";  // kegg.compound:C00022 CHEBI:15361
  species $Succinate in cell = 0; Succinate is "succinate";  // kegg.compound:C00042 CHEBI:30031
  species $Trehalose in cell = 0; Trehalose is "trehalose";  // kegg.compound:C01083 CHEBI:16551

  // Reactions:
  ADH: $EtOH + NAD -> AcAld + NADH; cell*Vmax_13*(EtOH*NAD/(Ketoh_13*Kinad_13) - AcAld*NADH/(Ketoh_13*Kinad_13*Keq_13))/(1 + NAD/Kinad_13 + EtOH*Knad_13/(Kinad_13*Ketoh_13) + AcAld*Knadh_13/(Kinadh_13*Kacald_13) + NADH/Kinadh_13 + EtOH*NAD/(Kinad_13*Ketoh_13) + NAD*AcAld*Knadh_13/(Kinad_13*Kinadh_13*Kacald_13) + EtOH*NADH*Knad_13/(Kinad_13*Kinadh_13*Ketoh_13) + AcAld*NADH/(Kacald_13*Kinadh_13) + EtOH*NAD*AcAld/(Kinad_13*Kiacald_13*Ketoh_13) + EtOH*AcAld*NADH/(Kietoh_13*Kinadh_13*Kacald_13)); ADH is "alcohol dehydrogenase";  // GO:0004022 ec-code:1.1.1.1 kegg.reaction:R00754
    Kietoh_13 = 90; Kiacald_13 = 1.1; Kacald_13 = 1.11; Kinadh_13 = 0.031; Knadh_13 = 0.11; Knad_13 = 0.17; Keq_13 = 6.9e-5; Kinad_13 = 0.92; Ketoh_13 = 17; Vmax_13 = 209.5;
  AK: 2 ADP -> AMP + ATP; cell*(k1_15*ADP*ADP - k2_15*ATP*AMP);  // isVersionOf kegg.reaction:R00127 GO:0004017 ec-code:2.7.4.3
    k2_15 = 100; k1_15 = 45;
  ALD: F16bP -> GAP + DHAP; cell*Vmax_5*(F16bP/Kf16bp_5 - DHAP*GAP/(Kf16bp_5*Keq_5))/(1 + F16bP/Kf16bp_5 + DHAP/Kdhap_5 + GAP/Kgap_5 + F16bP*GAP/(Kf16bp_5*Kigap_5) + DHAP*GAP/(Kdhap_5*Kgap_5)); ALD is "fructosebisphosphate aldolase";  // GO:0004332 ec-code:4.1.2.13 kegg.reaction:R01068
    Kigap_5 = 10; Kgap_5 = 2.4; Kdhap_5 = 2; Keq_5 = 0.069; Kf16bp_5 = 0.3; Vmax_5 = 94.69;
  ATPase: ATP => ADP; cell*Katpase_14*ATP;  // isVersionOf GO:0016887
    Katpase_14 = 39.5;
  ENO: P2G -> PEP; cell*Vmax_10*(P2G/Kp2g_10 - PEP/(Kp2g_10*Keq_10))/(1 + P2G/Kp2g_10 + PEP/Kpep_10); ENO is "enolase";  // GO:0004634 ec-code:4.2.1.11 kegg.reaction:R00658
    Kpep_10 = 0.5; Keq_10 = 6.7; Kp2g_10 = 0.04; Vmax_10 = 201.6;
  G3PDH: NADH + DHAP => $Glycerol + NAD; cell*Vmax_16*(DHAP/Kdhap_16*(NADH/Knadh_16) - Glycerol/Kdhap_16*(NAD/Knadh_16)*(1/Keq_16))/((1 + DHAP/Kdhap_16 + Glycerol/Kglycerol_16)*(1 + NADH/Knadh_16 + NAD/Knad_16)); G3PDH is "glycerol-3-phosphate dehydrogenase";  // hasPart GO:0006114 ec-code:1.1.1.8 ec-code:3.1.3.21 kegg.reaction:R07298
    Knad_16 = 0.93; Kglycerol_16 = 1; Keq_16 = 4300; Knadh_16 = 0.023; Kdhap_16 = 0.4; Vmax_16 = 47.11;
  GAPDH: NAD + GAP -> NADH + BPG; cell*C_7*(Vmaxf_7*GAP*NAD/(Kgap_7*Knad_7) - Vmaxr_7*BPG*NADH/(Kbpg_7*Knadh_7))/((1 + GAP/Kgap_7 + BPG/Kbpg_7)*(1 + NAD/Knad_7 + NADH/Knadh_7)); GAPDH is "glyceraldehyde phosphate dehydrogenase";  // GO:0004365 ec-code:1.2.1.12 kegg.reaction:R01061
    Knadh_7 = 0.06; Kbpg_7 = 0.0098; Vmaxr_7 = 6719; Knad_7 = 0.09; Kgap_7 = 0.21; Vmaxf_7 = 1152; C_7 = 1;
  Glycogen_Branch: G6P + ATP => $Glycogen + ADP; cell*KGLYCOGEN_17;  // isVersionOf GO:0005978
    KGLYCOGEN_17 = 6;
  HK: ATP + GLCi -> ADP + G6P; cell*Vmax_2*(GLCi*ATP/(Kglc_2*Katp_2) - G6P*ADP/(Kglc_2*Katp_2*Keq_2))/((1 + GLCi/Kglc_2 + G6P/Kg6p_2)*(1 + ATP/Katp_2 + ADP/Kadp_2)); HK is "hexokinase";  // GO:0004396 ec-code:2.7.1.1 kegg.reaction:R02848
    Kadp_2 = 0.23; Kg6p_2 = 30; Keq_2 = 2000; Katp_2 = 0.15; Kglc_2 = 0.08; Vmax_2 = 236.7;
  HXT: $GLCo -> GLCi; Vmax_1*(GLCo - GLCi)/Kglc_1/(1 + (GLCo + GLCi)/Kglc_1 + Ki_1*GLCo*GLCi/Kglc_1^2); HXT is "glucose transport";  // isVersionOf GO:0015758
    Ki_1 = 0.91; Kglc_1 = 1.1918; Vmax_1 = 97.24;
  PDC: PYR => $CO2 + AcAld; cell*Vmax_12*(PYR/Kpyr_12)^nH_12/(1 + (PYR/Kpyr_12)^nH_12); PDC is "pyruvate decarboxylase";  // GO:0004737 ec-code:4.1.1.1 kegg.reaction:R00636
    nH_12 = 1.9; Kpyr_12 = 4.33; Vmax_12 = 857.8;
  PFK: F6P + ATP => F16bP + ADP; cell*Vmax_4*(gR_4*(F6P/Kf6p_4)*(ATP/Katp_4)*(1 + F6P/Kf6p_4 + ATP/Katp_4 + gR_4*F6P/Kf6p_4*ATP/Katp_4)/((1 + F6P/Kf6p_4 + ATP/Katp_4 + gR_4*F6P/Kf6p_4*ATP/Katp_4)^2 + L0_4*((1 + Ciatp_4*ATP/Kiatp_4)/(1 + ATP/Kiatp_4))^2*((1 + Camp_4*AMP/Kamp_4)/(1 + AMP/Kamp_4))^2*((1 + Cf26_4*F26bP/Kf26_4 + Cf16_4*F16bP/Kf16_4)/(1 + F26bP/Kf26_4 + F16bP/Kf16_4))^2*(1 + Catp_4*ATP/Katp_4)^2)); PFK is "phosphofructosekinase";  // modifiers: F26bP, AMP; isVersionOf kegg.reaction:R00756 GO:0003872 ec-code:2.7.1.11
    Catp_4 = 3; Kf16_4 = 0.111; Cf16_4 = 0.397; Kf26_4 = 0.000682; Cf26_4 = 0.0174; Kamp_4 = 0.0995; Camp_4 = 0.0845; Kiatp_4 = 0.65; Ciatp_4 = 100; L0_4 = 0.66; Katp_4 = 0.71; Kf6p_4 = 0.1; gR_4 = 5.12; Vmax_4 = 110;
  PGI: G6P -> F6P; cell*Vmax_3*(G6P/Kg6p_3 - F6P/(Kg6p_3*Keq_3))/(1 + G6P/Kg6p_3 + F6P/Kf6p_3); PGI is "phosphoglucose isomerase";  // GO:0004347 ec-code:5.3.1.9 kegg.reaction:R00771
    Kf6p_3 = 0.3; Keq_3 = 0.29; Kg6p_3 = 1.4; Vmax_3 = 1056;
  PGK: BPG + ADP -> P3G + ATP; cell*Vmax_8*((Keq_8*BPG*ADP - P3G*ATP)/(Kp3g_8*Katp_8))/((1 + BPG/Kbpg_8 + P3G/Kp3g_8)*(1 + ADP/Kadp_8 + ATP/Katp_8)); PGK is "3-phosphoglycerate kinase";  // GO:0004618 ec-code:2.7.2.3 kegg.reaction:R01512
    Kadp_8 = 0.2; Kbpg_8 = 0.003; Katp_8 = 0.3; Kp3g_8 = 0.53; Keq_8 = 3200; Vmax_8 = 1288;
  PGM: P3G -> P2G; cell*Vmax_9*(P3G/Kp3g_9 - P2G/(Kp3g_9*Keq_9))/(1 + P3G/Kp3g_9 + P2G/Kp2g_9); PGM is "phosphoglyceromutase";  // isVersionOf kegg.reaction:R01518 GO:0004619 ec-code:5.4.2.1
    Kp2g_9 = 0.08; Keq_9 = 0.19; Kp3g_9 = 1.2; Vmax_9 = 2585;
  PYK: PEP + ADP -> PYR + ATP; cell*Vmax_11*(PEP*ADP/(Kpep_11*Kadp_11) - PYR*ATP/(Kpep_11*Kadp_11*Keq_11))/((1 + PEP/Kpep_11 + PYR/Kpyr_11)*(1 + ADP/Kadp_11 + ATP/Katp_11)); PYK is "pyruvate kinase";  // GO:0004743 ec-code:2.7.1.40 kegg.reaction:R00200
    Katp_11 = 1.5; Kpyr_11 = 21; Keq_11 = 6500; Kadp_11 = 0.53; Kpep_11 = 0.14; Vmax_11 = 1000;
  Succinate_Branch: 2 AcAld + 3 NAD => $Succinate + 3 NADH; cell*k_19*AcAld;  // isVersionOf GO:0006105
    k_19 = 21.4;
  TPI: DHAP -> GAP; cell*(k1_6*DHAP - k2_6*GAP); TPI is "triosephosphate isomerase";  // GO:0004807 ec-code:5.3.1.1 kegg.reaction:R01015
    k2_6 = 10000000; k1_6 = 450000;
  Trehalose_Branch: 2 G6P + ATP => $Trehalose + ADP; cell*Ktrehalose_18;  // isVersionOf GO:0005992
    Ktrehalose_18 = 2.4;

  // Unit definitions:
  unit minute = 60 second;
  unit mmole = 1e-3 mole;
end
