// SBML level 2 version 4

function Competitive_inhibition__irr(substrate, Inhibitor, Km, V, Ki)
  V*substrate/(Km + substrate + Km*Inhibitor/Ki);
end
Competitive_inhibition__irr is "Competitive inhibition (irr)";

model pritchart1()

  // Compartments:
  // This compartment represents "apoplast": the fluid-filled volume adjacent to the cell. The microbe, and chemical species, occupy this volume.
  compartment Apoplast = 1;
  // This compartment represents the host cell volume.
  compartment Cell = 1;

  // Species:
  // This species is a generic "Callose", abstractly representing a measurable biochemical consequence of PRR activation, at the cell wall.
  // Callose is also a proxy for PTI, in that it enhances the rate of loss of the species Path. This is obviously troublesome at a mechanistic level, but for the purposes of this model we equate callose deposition with ROS/peroxide production and other defences.
  species Callose in Cell = 0;
  // This species is an abstract Effector: a molecular species that is produced by the microbe, translocated across the cell wall to become E_int, where it acts to reduce the effect of PTI by enhancing the rate of loss of Callose. The effector also interacts with the model's R protein, activating it with consequent enhanced loss of local Path, in an abstraction of ETI.
  species E in Apoplast = 0;
  // E_int acts to reduce the effect of PTI by enhancing the rate of loss of Callose. The effector also interacts reversibly with the R protein, activating it with consequent enhanced loss of local Path, in an abstraction of ETI
  species E_int in Cell = 0;
  // PAMP is an abstraction of pathogen-associated molecular patterns, which are produced by Path in the apoplast. These may interact reversibly with the model's PRR species to produce PRR*, in a representation of PAMP detection leading (perhaps) to PTI.
  species PAMP in Cell = 0;
  // PRR* represents the host's Pathogen Recognition Receptor, activated by binding to a PAMP. In the activated form, this species enhances callose production, and the rate at which Path is lost, emulating PTI.
  species PRR in Apoplast = 0; PRR is "PRR*";
  // PRR represents the host's Pathogen Recognition Receptor, in its unbound state. On binding to a PAMP, it becomes activated to form PRR*.
  // There is a constant pool of PRR in this model.
  species PRR_0 in Apoplast = 1;
  // Path is a representation of microbes local to the cell. These derive from the larger (remote) population of microbes in Path_bulk, and disappear to NULL.
  species Path in Apoplast = 0;
  // Path_bulk represents a remote population of microbes, from which the local microbes abstracted in Path derive.
  species Path_bulk in Apoplast = 0;
  // R represents the host's Resistance protein, in its unbound state. On binding to an internalised effector E_int, it becomes activated to form R*.
  // There is a constant pool of R protein in this model.
  species R in Cell = 1;
  // R* represents the host's Resistance protein, activated by binding to E_int. In the activated form, this species enhances rate at which Path is lost, emulating ETI.
  species R_0 in Cell = 0; R_0 is "R*";

  // Reactions:
  // The mechanism by which Callose is produced is not defined. Callose is produced at a constant rate proportional to [PRR*], so the rate of production increases with increasing PAMP detection.
  Callose_production: PRR => Callose + PRR; Callose_production_k1*PRR;
    Callose_production_k1 = 0.1;
  // Callose is removed at a constant rate, so that a steady state can be reached.
  Callose_removal: Callose => ; Cell*Callose_removal_k1*Callose;
    Callose_removal_k1 = 0.1;
  // Callose suppression is represented by greater loss of Callose when there is internalised effector (E_int) present. The mechanism of this is undefined.
  Callose_suppression: E_int + Callose => E_int; Cell*Callose_suppression_k1*Callose*E_int;
    Callose_suppression_k1 = 0.1;
  // The ETI step represents reduction of local microbe concentration due to activation of the host's R protein. No molecular mechanism for this is proposed in the model.
  ETI: R_0 + Path => R_0; ETI_k1*Path*R_0;
    ETI_k1 = 0.1;
  // E_int is removed at a constant rate, so steady state can be reached.
  E_int_removal: E_int => ; Cell*E_int_removal_k1*E_int;
    E_int_removal_k1 = 0.1;
  // Effector E is produced proportional to the amount of local microbe (Path) present. E is produced initially into the apoplast compartment, where it may be removed, or translocated into the cell compartment.
  Effector_production: Path => Path + E; Apoplast*Effector_production_k1*Path;
    Effector_production_k1 = 0.1;
  // Effector recognition abstracts the interaction between internalised effector E_int, and "R protein" R, to produce "activated R protein" R*. As [R*] reflects the local concentration of E_int, it might also be considered to represent the strength of effector triggered responses.
  Effector_recognition: E_int + R -> R_0; Cell*(Effector_recognition_k1*R*E_int - Effector_recognition_k2*R_0);
    Effector_recognition_k2 = 0.1; Effector_recognition_k1 = 0.1;
  // This represents the loss of effector from the apoplast, necessary to obtain steady state.
  Effector_removal: E => ; Apoplast*Effector_removal_k1*E;
    Effector_removal_k1 = 0.1;
  // This step represents the translocation of effector E from the apoplast compartment to the cell compartment, where it is represented as E_int. No mechanism is reflected in the model, except that translocation rate is [E]-dependent, and slowed in response to increased Callose,
  Effector_translocation: E => E_int; Competitive_inhibition__irr(E, Callose, Km, V, Ki);  // modifiers: Callose
    Ki = 0.1; V = 0.1; Km = 0.1;
  // PAMP is produced proportional to the amount of local microbe (Path) present, in the apoplast compartment.
  PAMP_production: Path => Path + PAMP; PAMP_production_k1*Path;
    PAMP_production_k1 = 0.1;
  // PAMP recognition abstracts the interaction between PAMPs(/MAMPs/other molecules), and Pattern Recognition Receptor (PRR), to produce "activated PRR" PRR*. As [PRR*] reflects the local concentration of PAMP, that might be considered to be strength of pattern-triggered signalling.
  PAMP_recognition: PAMP + PRR_0 -> PRR; PAMP_recognition_k1*PRR_0*PAMP - PAMP_recognition_k2*PRR;
    PAMP_recognition_k2 = 0.1; PAMP_recognition_k1 = 0.1;
  // This represents the loss of PAMP from the apoplast, necessary to obtain steady state.
  PAMP_removal: PAMP => ; Cell*PAMP_removal_k1*PAMP;
    PAMP_removal_k1 = 0.1;
  // The PTI step represents reduction of local microbe concentration due to the activation of PRR, as an abstraction of the consequences of Pattern Triggered Immunity (PTI), represented by the amount of callose deposition. No reasonable molecular mechanism for this is proposed in the model.
  PTI: Callose + Path => Callose; PTI_k1*Path*Callose;
    PTI_k1 = 0.1;
  // Pathogen arrival represents movement of microbes from some (distant) 'bulk' to the locality of the cell, where they may interact.
  Pathogen_arrival: Path_bulk => Path + Path_bulk; Apoplast*Pathogen_arrival_k1*Path_bulk;
    Pathogen_arrival_k1 = 0.1;
  // Pathogen removal represents removal of microbes from the locality of the cell, where they may interact, to some other location or state where they can no longer interact. This might be due to movement/diffusion, or microbe destruction.
  Pathogen_removal: Path => ; Apoplast*Pathogen_removal_k1*Path;
    Pathogen_removal_k1 = 0.1;

  // Events:
  // Microbes are introduced to the bulk (not locally to the cell) at a specified time point, as an emulation of inoculation at some other point in the physical system.
  Pathogen_introduced: at (time > 10): Path_bulk = 1;

  // Unit definitions:
  unit substance = dimensionless;
  unit time = dimensionless;
  unit volume = dimensionless;
end
