// SBML level 2 version 4

model proctor1()

  // Compartments:
  compartment cell = 1;  // isVersionOf GO:0005623

  // Species:
  substanceOnly species $ADP in cell = 1000;  // isVersionOf CHEBI:16761
  substanceOnly species $AMP in cell = 1000;  // isVersionOf CHEBI:16027
  substanceOnly species ATMA in cell = 0;  // isVersionOf PATO:000234 uniprot:Q13315
  substanceOnly species ATMI in cell = 200;  // isVersionOf PATO:0002355 uniprot:Q13315
  substanceOnly species $ATP in cell = 10000;  // isVersionOf CHEBI:15422
  substanceOnly species Abeta in cell = 0;  // isVersionOf uniprot:P05067
  substanceOnly species AbetaDimer in cell = 0;  // hasPart uniprot:P05067
  // Abeta dimer bound to antibody
  substanceOnly species AbetaDimer_antiAb in cell = 0;  // hasPart FMA:62871 uniprot:P05067
  substanceOnly species AbetaPlaque in cell = 0;  // isVersionOf uniprot:P05067
  substanceOnly species AbetaPlaque_GliaA in cell = 0;  // hasPart CL:0000129 uniprot:P05067
  // Abeta monomer bound to antibody
  substanceOnly species Abeta_antiAb in cell = 0;  // hasPart FMA:62871 uniprot:P05067
  substanceOnly species AggAbeta_Proteasome in cell = 0;  // hasPart GO:0000502 uniprot:P05067
  substanceOnly species AggTau in cell = 0;  // isVersionOf interpro:IPR002955
  substanceOnly species AggTau_Proteasome in cell = 0;  // hasPart GO:0000502 interpro:IPR002955
  substanceOnly species DUB in cell = 200;  // isVersionOf interpro:IPR001394
  substanceOnly species E1 in cell = 100;  // isVersionOf interpro:IPR000011
  substanceOnly species E1_Ub in cell = 0;  // hasPart interpro:IPR000011 uniprot:P0CG47
  substanceOnly species E2 in cell = 100;  // isVersionOf interpro:IPR000608
  substanceOnly species E2_Ub in cell = 0;  // hasPart interpro:IPR000608 uniprot:P0CG47
  substanceOnly species GSK3b in cell = 500;  // isVersionOf uniprot:P49841
  substanceOnly species GSK3b_p53 in cell = 0;  // hasPart uniprot:P49841 uniprot:P04637
  substanceOnly species GSK3b_p53_P in cell = 0;  // hasPart uniprot:P49841 uniprot:P04637
  // Active glia which can phagocytose
  substanceOnly species GliaA in cell = 0;  // isVersionOf CL:0000129
  // Inactive glia
  substanceOnly species GliaI in cell = 100;  // isVersionOf CL:0000129
  // Glia associated with plaques but not able to phagocytose
  substanceOnly species GliaM1 in cell = 0;  // isVersionOf CL:0000129
  // Glia associated with plaques but not able to phagocytose
  substanceOnly species GliaM2 in cell = 0;  // isVersionOf CL:0000129
  substanceOnly species IR in cell = 0;
  substanceOnly species MT_Tau in cell = 100;  // isVersionOf interpro:IPR015562
  substanceOnly species Mdm2 in cell = 5;  // isVersionOf uniprot:Q00987
  substanceOnly species Mdm2DUB in cell = 200;  // hasPart interpro:IPR001394 uniprot:Q00987
  substanceOnly species Mdm2_P in cell = 0;  // isVersionOf PR:000037070 uniprot:Q00987
  substanceOnly species Mdm2_P1_p53_Ub4 in cell = 0;  // hasPart uniprot:Q00987 uniprot:P04637 uniprot:P0CG47
  substanceOnly species Mdm2_P_Ub in cell = 0;  // hasPart PR:000037070 uniprot:Q00987 uniprot:P0CG47
  substanceOnly species Mdm2_P_Ub2 in cell = 0;  // hasPart PR:000037070 uniprot:Q00987 uniprot:P0CG47
  substanceOnly species Mdm2_P_Ub3 in cell = 0;  // hasPart PR:000037070 uniprot:Q00987 uniprot:P0CG47
  substanceOnly species Mdm2_P_Ub4 in cell = 0;  // hasPart PR:000037070 uniprot:Q00987 uniprot:P0CG47
  substanceOnly species Mdm2_P_Ub4_Proteasome in cell = 0;  // hasPart PR:000037070 GO:0000502 uniprot:Q00987 uniprot:P0CG47
  substanceOnly species Mdm2_Ub in cell = 0;  // hasPart uniprot:Q00987 uniprot:P0CG47
  substanceOnly species Mdm2_Ub2 in cell = 0;  // hasPart uniprot:P0CG47 uniprot:Q00987
  substanceOnly species Mdm2_Ub3 in cell = 0;  // hasPart uniprot:Q00987 uniprot:P0CG47
  substanceOnly species Mdm2_Ub4 in cell = 0;  // hasPart uniprot:Q00987 uniprot:P0CG47
  substanceOnly species Mdm2_Ub4_Proteasome in cell = 0;  // hasPart GO:0000502 uniprot:Q00987 uniprot:P0CG47
  substanceOnly species Mdm2_mRNA in cell = 10;  // encodes uniprot:Q00987
  substanceOnly species Mdm2_p53 in cell = 95;  // hasPart uniprot:P04637 uniprot:Q00987
  substanceOnly species Mdm2_p53_Ub in cell = 0;  // hasPart uniprot:P0CG47 uniprot:Q00987 uniprot:P04637
  substanceOnly species Mdm2_p53_Ub2 in cell = 0;  // hasPart uniprot:P0CG47 uniprot:Q00987 uniprot:P04637
  substanceOnly species Mdm2_p53_Ub3 in cell = 0;  // hasPart uniprot:Q00987 uniprot:P04637 uniprot:P0CG47
  substanceOnly species Mdm2_p53_Ub4 in cell = 0;  // hasPart uniprot:P0CG47 uniprot:Q00987 uniprot:P04637
  substanceOnly species NFT in cell = 0;  // isVersionOf interpro:IPR002955
  substanceOnly species PP1 in cell = 50;  // isVersionOf uniprot:P62136
  substanceOnly species Proteasome in cell = 500;  // isVersionOf GO:0000502
  substanceOnly species Proteasome_Tau in cell = 0;  // hasPart GO:0000502 interpro:IPR002955
  substanceOnly species ROS in cell = 0;  // isVersionOf CHEBI:26523
  substanceOnly species $Sink in cell = 1;
  substanceOnly species $Source in cell = 1;
  substanceOnly species Tau in cell = 0;  // isVersionOf interpro:IPR002955
  substanceOnly species Tau_P1 in cell = 0;  // isVersionOf interpro:IPR002955
  substanceOnly species Tau_P2 in cell = 0;  // isVersionOf interpro:IPR002955
  substanceOnly species Ub in cell = 4000;  // isVersionOf uniprot:P0CG47
  // Antibody against amyloid-beta
  substanceOnly species antiAb in cell = 0;  // isVersionOf FMA:62871
  substanceOnly species damDNA in cell = 0;  // isVersionOf CHEBI:16991
  substanceOnly species degAbetaGlia in cell = 0;
  substanceOnly species disaggPlaque1 in cell = 0;
  substanceOnly species disaggPlaque2 in cell = 0;
  substanceOnly species p53 in cell = 5;  // isVersionOf uniprot:P04637
  substanceOnly species p53DUB in cell = 200;  // hasPart interpro:IPR001394 uniprot:P04637
  substanceOnly species p53_P in cell = 0;  // isVersionOf PR:000037070 uniprot:P04637
  substanceOnly species p53_Ub4_Proteasome in cell = 0;  // hasPart GO:0000502 uniprot:P04637 uniprot:P0CG47
  substanceOnly species p53_mRNA in cell = 10;  // encodes uniprot:P04637

  // Parameters:
  kMdm2PUb = 6.84e-6;
  kMdm2PolyUb = 0.00456;
  kMdm2Ub = 4.56e-6;
  kactATM = 0.0001;
  kactDUBMdm2 = 1e-7;
  kactDUBProtp53 = 0.0001;
  kactDUBp53 = 1e-7;
  kactglia1 = 6e-7;
  kactglia2 = 6e-7;
  kaggAbeta = 3e-6;
  kaggTau = 1e-8;
  kaggTauP1 = 1e-8;
  kaggTauP2 = 1e-7;
  kbinAbantiAb = 1e-6;
  kbinAbetaGlia = 1e-5;
  kbinE1Ub = 0.0002;
  kbinE2Ub = 0.001;
  kbinGSK3bp53 = 2e-6;
  kbinMTTau = 0.1;
  kbinMdm2p53 = 0.001155;
  kbinProt = 2e-6;
  kbinTauProt = 1.925e-7;
  kdam = 0.08;
  kdamROS = 1e-5;
  kdegAbeta = 1.5e-5;
  kdegAbetaGlia = 0.005;
  kdegAntiAb = 2.75e-6;
  kdegMdm2 = 0.01;
  kdegMdm2mRNA = 0.0005;
  kdegTau20SProt = 0.01;
  kdegp53 = 0.005;
  kdegp53mRNA = 0.0001;
  kdephosMdm2 = 0.5;
  kdephosp53 = 0.5;
  kdephospTau = 0.01;
  kdisaggAbeta = 1e-6;
  kdisaggAbeta1 = 0.0002;
  kdisaggAbeta2 = 1e-6;
  kgenROSAbeta = 2e-5;
  kgenROSGlia = 1e-5;
  kgenROSPlaque = 1e-5;
  kinactATM = 0.0005;
  kinactglia1 = 5e-6;
  kinactglia2 = 5e-6;
  kinhibprot = 1e-7;
  kp53PolyUb = 0.01;
  kp53Ub = 5e-5;
  kpf = 0.2;
  kpg = 0.15;
  kpghalf = 10;
  kphosMdm2 = 2;
  kphosMdm2GSK3b = 0.005;
  kphosMdm2GSK3bp53 = 0.5;
  kphosp53 = 0.0002;
  kphospTauGSK3b = 0.0002;
  kphospTauGSK3bp53 = 0.1;
  kprodAbeta = 1.86e-5;
  kprodAbeta2 = 1.86e-5;
  kproteff = 1;
  krelAbetaGlia = 5e-5;
  krelGSK3bp53 = 0.002;
  krelMTTau = 0.0001;
  krelMdm2p53 = 1.155e-5;
  kremROS = 7e-5;
  krepair = 2e-5;
  ksynMdm2 = 0.000495;
  ksynMdm2mRNA = 0.0005;
  ksynMdm2mRNAGSK3bp53 = 0.0007;
  ksynTau = 8e-5;
  ksynp53 = 0.007;
  ksynp53mRNA = 0.001;
  ksynp53mRNAAbeta = 1e-5;
  ktangfor = 0.001;

  // Reactions:
  ATMInactivation: ATMA => ATMI; kinactATM*ATMA;
  ATMactivation: ATMI + damDNA => ATMA + damDNA; kactATM*damDNA*ATMI;
  AbetaAggregation1: 2 Abeta => AbetaDimer; kaggAbeta*Abeta^2*0.5;
  AbetaBindingToGlia: GliaA + AbetaPlaque => AbetaPlaque_GliaA; kbinAbetaGlia*AbetaPlaque*GliaA;
  AbetaDegradation: Abeta => $Sink; kdegAbeta*Abeta;
  AbetaDimer_antiAbBinding: antiAb + AbetaDimer => AbetaDimer_antiAb; kbinAbantiAb*AbetaDimer*antiAb;
  AbetaDimer_antiAbDegredation: AbetaDimer_antiAb => antiAb; 10*kdegAbeta*AbetaDimer_antiAb;
  AbetaDisaggregation1: AbetaDimer => 2 Abeta; kdisaggAbeta*AbetaDimer;
  AbetaDisaggregation3: AbetaPlaque => disaggPlaque1 + AbetaDimer; kdisaggAbeta1*AbetaPlaque;
  AbetaDisaggregation4: antiAb + AbetaPlaque => disaggPlaque2 + antiAb + AbetaDimer; kdisaggAbeta2*antiAb*AbetaPlaque;
  AbetaPlaqueClearanceByGlia: AbetaPlaque_GliaA => degAbetaGlia + GliaA; kdegAbetaGlia*AbetaPlaque_GliaA;
  AbetaPlaqueFormation1: 2 AbetaDimer => AbetaPlaque; kpf*AbetaDimer^2*0.5;
  AbetaPlaqueGrowth: AbetaPlaque + AbetaDimer => 2 AbetaPlaque; kpg*AbetaDimer*AbetaPlaque^2/(kpghalf^2 + AbetaPlaque^2);
  AbetaROSproduction1: Abeta => ROS + Abeta; kgenROSAbeta*Abeta;
  AbetaReleaseFromGlia: AbetaPlaque_GliaA => GliaA + AbetaPlaque; krelAbetaGlia*AbetaPlaque_GliaA;
  Abeta_antiAbBinding: antiAb + Abeta => Abeta_antiAb; kbinAbantiAb*Abeta*antiAb;
  Abeta_antiAbDegredation: Abeta_antiAb => antiAb; 10*kdegAbeta*Abeta_antiAb;
  Abetaproduction1: $Source => Abeta; kprodAbeta*Source;
  Abetaproduction2: GSK3b_p53 => GSK3b_p53 + Abeta; kprodAbeta2*GSK3b_p53;
  Abetaproduction3: GSK3b_p53_P => GSK3b_p53_P + Abeta; kprodAbeta2*GSK3b_p53_P;
  AggAbetaROSproduction2: AggAbeta_Proteasome => ROS + AggAbeta_Proteasome; kgenROSAbeta*AggAbeta_Proteasome;
  DNAdamage: IR => damDNA + IR; kdam*IR;
  DNArepair: damDNA => $Sink; krepair*damDNA;
  Degradationp53_Ub4: $ATP + p53_Ub4_Proteasome => $ADP + Proteasome + 4 Ub; kdegp53*kproteff*p53_Ub4_Proteasome*ATP/(5000 + ATP);
  E1UbBinding: $ATP + Ub + E1 => $AMP + E1_Ub; kbinE1Ub*E1*Ub*ATP/(5000 + ATP);
  E2UbBinding: E1_Ub + E2 => E1 + E2_Ub; kbinE2Ub*E2*E1_Ub;
  GSK3_p53PRelease: GSK3b_p53_P => p53_P + GSK3b; krelGSK3bp53*GSK3b_p53_P;
  GSK3p53Binding: p53 + GSK3b => GSK3b_p53; kbinGSK3bp53*GSK3b*p53;
  GSK3p53PBinding: p53_P + GSK3b => GSK3b_p53_P; kbinGSK3bp53*GSK3b*p53_P;
  GSK3p53Release: GSK3b_p53 => p53 + GSK3b; krelGSK3bp53*GSK3b_p53;
  GliaActivationStep1: AbetaPlaque + GliaI => AbetaPlaque + GliaM1; kactglia1*GliaI*AbetaPlaque;
  GliaActivationStep2: AbetaPlaque + GliaM1 => AbetaPlaque + GliaM2; kactglia1*GliaM1*AbetaPlaque;
  GliaActivationStep3: antiAb + GliaM2 => antiAb + GliaA; kactglia2*GliaM2*antiAb;
  GliaInactivationStep1: GliaA => GliaM2; kinactglia1*GliaA;
  GliaInactivationStep2: GliaM2 => GliaM1; kinactglia2*GliaM2;
  GliaInactivationStep3: GliaM1 => GliaI; kinactglia2*GliaM1;
  Mdm2Degradation: Mdm2_Ub4_Proteasome => 4 Ub + Proteasome; kdegMdm2*Mdm2_Ub4_Proteasome*kproteff;
  Mdm2Deubiquitination1: Mdm2DUB + Mdm2_Ub => Ub + Mdm2DUB + Mdm2; kactDUBMdm2*Mdm2_Ub*Mdm2DUB;
  Mdm2Deubiquitination2: Mdm2DUB + Mdm2_Ub2 => Ub + Mdm2DUB + Mdm2_Ub; kactDUBMdm2*Mdm2_Ub2*Mdm2DUB;
  Mdm2Deubiquitination3: Mdm2DUB + Mdm2_Ub3 => Ub + Mdm2DUB + Mdm2_Ub2; kactDUBMdm2*Mdm2_Ub3*Mdm2DUB;
  Mdm2Deubiquitination4: Mdm2DUB + Mdm2_Ub4 => Ub + Mdm2DUB + Mdm2_Ub3; kactDUBMdm2*Mdm2_Ub4*Mdm2DUB;
  Mdm2GSK3phosphorylation1: GSK3b + Mdm2_p53_Ub4 => GSK3b + Mdm2_P1_p53_Ub4; kphosMdm2GSK3b*Mdm2_p53_Ub4*GSK3b;
  Mdm2GSK3phosphorylation2: GSK3b_p53 + Mdm2_p53_Ub4 => GSK3b_p53 + Mdm2_P1_p53_Ub4; kphosMdm2GSK3bp53*Mdm2_p53_Ub4*GSK3b_p53;
  Mdm2GSK3phosphorylation3: GSK3b_p53_P + Mdm2_p53_Ub4 => GSK3b_p53_P + Mdm2_P1_p53_Ub4; kphosMdm2GSK3bp53*Mdm2_p53_Ub4*GSK3b_p53_P;
  Mdm2PDegradation: Mdm2_P_Ub4_Proteasome => 4 Ub + Proteasome; kdegMdm2*Mdm2_P_Ub4_Proteasome*kproteff;
  Mdm2PDeubiquitination1: Mdm2DUB + Mdm2_P_Ub => Ub + Mdm2DUB + Mdm2_P; kactDUBMdm2*Mdm2_P_Ub*Mdm2DUB;
  Mdm2PDeubiquitination2: Mdm2DUB + Mdm2_P_Ub2 => Ub + Mdm2DUB + Mdm2_P_Ub; kactDUBMdm2*Mdm2_P_Ub2*Mdm2DUB;
  Mdm2PDeubiquitination3: Mdm2DUB + Mdm2_P_Ub3 => Ub + Mdm2DUB + Mdm2_P_Ub2; kactDUBMdm2*Mdm2_P_Ub3*Mdm2DUB;
  Mdm2PDeubiquitination4: Mdm2DUB + Mdm2_P_Ub4 => Ub + Mdm2DUB + Mdm2_P_Ub3; kactDUBMdm2*Mdm2_P_Ub4*Mdm2DUB;
  Mdm2PProteasomeBinding1: Proteasome + Mdm2_P_Ub4 => Mdm2_P_Ub4_Proteasome; kbinProt*Mdm2_P_Ub4*Proteasome;
  Mdm2PUbiquitination: E2_Ub + Mdm2_P => E2 + Mdm2_P_Ub; kMdm2PUb*Mdm2_P*E2_Ub;
  Mdm2PpolyUbiquitination1: E2_Ub + Mdm2_P_Ub => E2 + Mdm2_P_Ub2; kMdm2PolyUb*Mdm2_P_Ub*E2_Ub;
  Mdm2PpolyUbiquitination2: E2_Ub + Mdm2_P_Ub2 => E2 + Mdm2_P_Ub3; kMdm2PolyUb*Mdm2_P_Ub2*E2_Ub;
  Mdm2PpolyUbiquitination3: E2_Ub + Mdm2_P_Ub3 => E2 + Mdm2_P_Ub4; kMdm2PolyUb*Mdm2_P_Ub3*E2_Ub;
  Mdm2ProteasomeBinding1: Proteasome + Mdm2_Ub4 => Mdm2_Ub4_Proteasome; kbinProt*Mdm2_Ub4*Proteasome;
  Mdm2Synthesis: Mdm2_mRNA => Mdm2 + Mdm2_mRNA; ksynMdm2*Mdm2_mRNA;
  Mdm2Ubiquitination: E2_Ub + Mdm2 => E2 + Mdm2_Ub; kMdm2Ub*Mdm2*E2_Ub;
  Mdm2dephosphorylation: Mdm2_P => Mdm2; kdephosMdm2*Mdm2_P;
  Mdm2mRNADegradation: Mdm2_mRNA => $Sink; kdegMdm2mRNA*Mdm2_mRNA;
  Mdm2mRNASynthesis1: p53 => Mdm2_mRNA + p53; ksynMdm2mRNA*p53;
  Mdm2mRNASynthesis2: p53_P => Mdm2_mRNA + p53_P; ksynMdm2mRNA*p53_P;
  Mdm2mRNASynthesis3: GSK3b_p53 => Mdm2_mRNA + GSK3b_p53; ksynMdm2mRNAGSK3bp53*GSK3b_p53;
  Mdm2mRNASynthesis4: GSK3b_p53_P => Mdm2_mRNA + GSK3b_p53_P; ksynMdm2mRNAGSK3bp53*GSK3b_p53_P;
  Mdm2phosphorylation: ATMA + Mdm2 => ATMA + Mdm2_P; kphosMdm2*Mdm2*ATMA;
  Mdm2polyUbiquitination1: E2_Ub + Mdm2_Ub => E2 + Mdm2_Ub2; kMdm2PolyUb*Mdm2_Ub*E2_Ub;
  Mdm2polyUbiquitination2: E2_Ub + Mdm2_Ub2 => E2 + Mdm2_Ub3; kMdm2PolyUb*Mdm2_Ub2*E2_Ub;
  Mdm2polyUbiquitination3: E2_Ub + Mdm2_Ub3 => E2 + Mdm2_Ub4; kMdm2PolyUb*Mdm2_Ub3*E2_Ub;
  P53Mdm2Binding: Mdm2 + p53 => Mdm2_p53; kbinMdm2p53*p53*Mdm2;
  P53Mdm2Release: Mdm2_p53 => Mdm2 + p53; krelMdm2p53*Mdm2_p53;
  PlaqueROSproduction: AbetaPlaque => ROS + AbetaPlaque; kgenROSPlaque*AbetaPlaque;
  ProteasomeInhibitionAbeta: Proteasome + AbetaDimer => AggAbeta_Proteasome; kinhibprot*AbetaDimer*Proteasome;
  ProteasomeInhibitionAggTau: Proteasome + AggTau => AggTau_Proteasome; kinhibprot*AggTau*Proteasome;
  ROSDNAdamage: ROS => damDNA + ROS; kdamROS*ROS;
  ROSgenerationByGlia: AbetaPlaque_GliaA => ROS + AbetaPlaque_GliaA; kgenROSGlia*AbetaPlaque_GliaA;
  ROSremoval: ROS => $Sink; kremROS*ROS;
  TangleFormation1: 2 AggTau => 2 NFT; ktangfor*AggTau^2*0.5;
  TangleFormation2: NFT + AggTau => 2 NFT; ktangfor*AggTau*NFT;
  Tau20SProteasomeDegradation: Proteasome_Tau => Proteasome; kdegTau20SProt*Proteasome_Tau;
  TauAggregation1: 2 Tau => 2 AggTau; kaggTau*Tau^2*0.5;
  TauAggregation2: AggTau + Tau => 2 AggTau; kaggTau*Tau*AggTau;
  TauMTbinding: Tau => MT_Tau; kbinMTTau*Tau;
  TauMTrelease: MT_Tau => Tau; krelMTTau*MT_Tau;
  TauP1Aggregation1: 2 Tau_P1 => 2 AggTau; kaggTauP1*Tau_P1^2*0.5;
  TauP1Aggregation2: AggTau + Tau_P1 => 2 AggTau; kaggTauP1*Tau_P1*AggTau;
  TauP2Aggregation1: 2 Tau_P2 => 2 AggTau; kaggTauP2*Tau_P2^2*0.5;
  TauP2Aggregation2: AggTau + Tau_P2 => 2 AggTau; kaggTauP2*Tau_P2*AggTau;
  TauProteasomeBinding: Proteasome + Tau => Proteasome_Tau; kbinTauProt*Tau*Proteasome;
  TauSynthesis: $Source => Tau; ksynTau*Source;
  Taudephosphorylation1: PP1 + Tau_P2 => PP1 + Tau_P1; kdephospTau*Tau_P2*PP1;
  Taudephosphorylation2: PP1 + Tau_P1 => PP1 + Tau; kdephospTau*Tau_P1*PP1;
  Tauphosphorylation1: Tau + GSK3b_p53 => Tau_P1 + GSK3b_p53; kphospTauGSK3bp53*GSK3b_p53*Tau;
  Tauphosphorylation2: Tau_P1 + GSK3b_p53 => Tau_P2 + GSK3b_p53; kphospTauGSK3bp53*GSK3b_p53*Tau_P1;
  Tauphosphorylation3: Tau + GSK3b_p53_P => Tau_P1 + GSK3b_p53_P; kphospTauGSK3bp53*GSK3b_p53_P*Tau;
  Tauphosphorylation4: Tau_P1 + GSK3b_p53_P => Tau_P2 + GSK3b_p53_P; kphospTauGSK3bp53*GSK3b_p53_P*Tau_P1;
  Tauphosphorylation5: Tau + GSK3b => Tau_P1 + GSK3b; kphospTauGSK3b*GSK3b*Tau;
  Tauphosphorylation6: Tau_P1 + GSK3b => Tau_P2 + GSK3b; kphospTauGSK3b*GSK3b*Tau_P1;
  antiAbRemoval: antiAb => $Sink; kdegAntiAb*antiAb;
  p53Deubiquitination1: p53DUB + Mdm2_p53_Ub => Ub + p53DUB + Mdm2_p53; kactDUBp53*Mdm2_p53_Ub*p53DUB;
  p53Deubiquitination2: p53DUB + Mdm2_p53_Ub2 => Ub + p53DUB + Mdm2_p53_Ub; kactDUBp53*Mdm2_p53_Ub2*p53DUB;
  p53Deubiquitination3: p53DUB + Mdm2_p53_Ub3 => Ub + p53DUB + Mdm2_p53_Ub2; kactDUBp53*Mdm2_p53_Ub3*p53DUB;
  p53Deubiqutination4: p53DUB + Mdm2_p53_Ub4 => Ub + p53DUB + Mdm2_p53_Ub3; kactDUBp53*Mdm2_p53_Ub4*p53DUB;
  p53Monoubiquitination: Mdm2_p53 + E2_Ub => E2 + Mdm2_p53_Ub; kp53Ub*E2_Ub*Mdm2_p53;
  p53Polyubiquitination1: E2_Ub + Mdm2_p53_Ub => E2 + Mdm2_p53_Ub2; kp53PolyUb*Mdm2_p53_Ub*E2_Ub;
  p53Polyubiquitination2: E2_Ub + Mdm2_p53_Ub2 => E2 + Mdm2_p53_Ub3; kp53PolyUb*Mdm2_p53_Ub2*E2_Ub;
  p53Polyubiquitination3: E2_Ub + Mdm2_p53_Ub3 => E2 + Mdm2_p53_Ub4; kp53PolyUb*Mdm2_p53_Ub3*E2_Ub;
  p53ProteasomeBinding1: Proteasome + Mdm2_P1_p53_Ub4 => Mdm2 + p53_Ub4_Proteasome; kbinProt*Mdm2_P1_p53_Ub4*Proteasome;
  p53Synthesis: p53_mRNA => p53_mRNA + p53; ksynp53*p53_mRNA;
  p53dephosphorylation: p53_P => p53; kdephosp53*p53_P;
  p53mRNADegradation: p53_mRNA => $Sink; kdegp53mRNA*p53_mRNA;
  p53mRNASynthesis: $Source => p53_mRNA; ksynp53mRNA*Source;
  p53phosphorylation: ATMA + p53 => ATMA + p53_P; kphosp53*p53*ATMA;
  p53transcriptionViaAbeta: Abeta => Abeta + p53_mRNA; ksynp53mRNAAbeta*Abeta;

  // Events:
  ImmunizeCell: at (time >= 345600): antiAb = 50;

  // Unit definitions:
  unit substance = item;
end
