// SBML level 3 version 1

model queralt()
  // model units - time: min

  // Compartments:
  compartment default_compartment = 1;

  // Species:
  species Cdc15 in default_compartment = 0.0257;
  species Cdc20 in default_compartment = 0;
  species Cdh1 in default_compartment = 3.8e-5;
  species Clb2 in default_compartment = 0.997;
  species MEN in default_compartment = 8e-6;
  species Net1 in default_compartment = 0.098;
  species Net1Cdc14 in default_compartment = 0.485;
  species Polo in default_compartment = 0.945;
  species PoloT in default_compartment = 0.99;
  species Tem1 in default_compartment = 0.00389;
  species $p in default_compartment = 1;
  species $s in default_compartment = 1;
  species securin in default_compartment = 0.352;
  species securinT in default_compartment = 0.6;
  species securinseparase in default_compartment = 0.248;
  species separase in default_compartment = 0.002;
  species separaseT in default_compartment = 0.25;

  // Parameters:
  Cdc14T = 0.5;
  Cdc15T = 1;
  Cdh1T = 1;
  Inh = 0;
  Jcdc15 = 0.2;
  Jcdh = 0.0015;
  Jnet = 0.2;
  Jpolo = 0.25;
  Jtem1 = 0.005;
  Net1T = 1;
  PP2AT = 1;
  Tem1T = 1;
  kaacdc15 = 0.5;
  kaadclb2 = 2;
  kaapolo = 0.5;
  kaatem = 0.5;
  kacdc15 = 0.02;
  kad = 0.1;
  kadcdc20 = 2;
  kadcdh = 1;
  kadclb2 = 0.2;
  kadpolo = 0.25;
  kadsecurin = 2;
  kaicdc15 = 0.2;
  kaitem = 1;
  kap = 2;
  kapcdh = 1;
  kapolo = 0;
  katem = 0;
  kd = 0.45;
  kdcdc20 = 0.05;
  kdcdh = 0.01;
  kdclb2 = 0.03;
  kdpolo = 0.01;
  kdsecurin = 0.05;
  kdseparase = 0.004;
  ki = 20;
  kicdc15 = 0;
  kipolo = 0.1;
  kitem = 0.1;
  kp = 0.4;
  kpp = 0.1;
  kscdc20 = 0.015;
  ksclb2 = 0.03;
  kspolo = 0.01;
  kssecurin = 0.03;
  ksseparase = 0.001;
  lamen = 10;
  lanet = 500;
  lasecurin = 500;
  ldmen = 0.1;
  ldnet = 1;
  ldsecurin = 1;

  // Assignment rules:
  Cdc14 := Cdc14T - Net1Cdc14;
  Net1P := Net1T - Net1 - Net1Cdc14;
  Cdk := Clb2/(1 + Inh);
  PP2A := (1 + kpp*ki*separase)/(1 + ki*separase)*PP2AT;

  // Reactions:
  v_1: $s -> Clb2; ksclb2;
  v_10: separaseT + separase -> $p; kdseparase*separaseT;
  v_11: securin + separase -> securinseparase; lasecurin*securin*separase;
  v_12: securinseparase -> securin + separase; (ldsecurin + kdseparase + kdsecurin + kadsecurin*Cdc20)*securinseparase;  // modifiers: Cdc20
  v_13: $s -> Net1; (kad*Cdc14 + kd*PP2A)*(Net1P/(Jnet + Net1P));
  v_14: Net1 -> $p; (kp*Cdk + kap*MEN)*(Net1/(Jnet + Net1 + Net1Cdc14));  // modifiers: MEN, Net1Cdc14
  v_15: Net1 -> Net1Cdc14; lanet*Net1*Cdc14;
  v_16: Net1Cdc14 -> Net1; ldnet*Net1Cdc14;
  v_17: Net1Cdc14 -> $p; (kp*Cdk + kap*MEN)*(Net1Cdc14/(Jnet + Net1 + Net1Cdc14));  // modifiers: Net1, MEN
  v_18: $s -> PoloT; kspolo;
  v_19: PoloT -> $p; (kdpolo + kadpolo*Cdh1)*PoloT;  // modifiers: Cdh1
  v_2: Clb2 -> $p; (kdclb2 + kadclb2*Cdc20 + kaadclb2*Cdh1)*Clb2;  // modifiers: Cdc20, Cdh1
  v_20: $s -> Polo; (kapolo + kaapolo*Cdk)*((PoloT - Polo)/(Jpolo + PoloT - Polo));  // modifiers: PoloT
  v_21: Polo -> $p; kipolo*(Polo/(Jpolo + Polo));
  v_22: Polo -> $p; (kdpolo + kadpolo*Cdh1)*Polo;  // modifiers: Cdh1
  v_23: $s -> Tem1; (katem + kaatem*Polo)*((Tem1T - Tem1)/(Jtem1 + Tem1T - Tem1));  // modifiers: Polo
  v_24: Tem1 -> $p; (kitem + kaitem*PP2A)*(Tem1/(Jtem1 + Tem1));
  v_25: $s -> Cdc15; (kacdc15 + kaacdc15*Cdc14)*((Cdc15T - Cdc15)/(Jcdc15 + Cdc15T - Cdc15));
  v_26: Cdc15 -> $p; (kicdc15 + kaicdc15*Cdk)*(Cdc15/(Jcdc15 + Cdc15));
  v_27: $s -> MEN; lamen*(Tem1 - MEN)*(Cdc15 - MEN);  // modifiers: Tem1, Cdc15
  v_28: MEN -> $p; ldmen*MEN;
  v_29: MEN -> $p; (kitem + kaitem*PP2A)*(MEN/(Jtem1 + Tem1));  // modifiers: Tem1
  v_3: $s -> Cdc20; kscdc20;
  v_30: MEN -> $p; (kicdc15 + kaicdc15*Cdk)*(MEN/(Jcdc15 + Cdc15));  // modifiers: Cdc15
  v_4: Cdc20 -> $p; (kdcdc20 + kadcdc20*Cdh1)*Cdc20;  // modifiers: Cdh1
  v_5: $s -> Cdh1; (kdcdh + kadcdh*Cdc14T)*((Cdh1T - Cdh1)/(Jcdh + Cdh1T - Cdh1));
  v_6: Cdh1 -> $p; kapcdh*Cdk*(Cdh1/(Jcdh + Cdh1));
  v_7: $s -> securinT + securin; kssecurin;
  v_8: securinT + securin -> $p; (kdsecurin + kadsecurin*Cdc20)*securinT;  // modifiers: Cdc20
  v_9: $s -> separaseT + separase; ksseparase;

  // Unit definitions:
  unit min = 60 second;
end
