// SBML level 2 version 4

model ralser1()

  // Compartments:
  compartment cytoplasm = 1;  // GO:0005829
  compartment extracellular = 1;  // GO:0005576

  // Species:
  species ACE in cytoplasm = 0.04; ACE is "Acetaldehyde";  // kegg.compound:C00084 CHEBI:15343
  species BPG in cytoplasm = 0.1; BPG is "1,3-bisphosphoglycerate";  // kegg.compound:C00236 CHEBI:16001
  species $CO2 in extracellular = 1;  // kegg.compound:C00011 CHEBI:16526
  species D6PGluconate in cytoplasm = 0.1; D6PGluconate is "6-phosphogluconate";  // CHEBI:16863
  species D6PGluconoLactone in cytoplasm = 0.1; D6PGluconoLactone is "D-6-phosphoglucono-delta-lactone";  // CHEBI:16938
  species DHAP in cytoplasm = 1; DHAP is "dihydroxyacetone phosphate";  // CHEBI:16108
  species $ETOH in extracellular = 50; ETOH is "Ethanol";  // kegg.compound:C00469 CHEBI:16236
  species Erythrose4P in cytoplasm = 0; Erythrose4P is "erythrose 4-phosphate";  // CHEBI:48153
  species F16P in cytoplasm = 0.1; F16P is "Fructose-1,6 bisphosphate";  // kegg.compound:C00354 CHEBI:16905
  species $F26BP in cytoplasm = 0.02; F26BP is "F2,6P";  // kegg.compound:C00665 CHEBI:28602
  species F6P in cytoplasm = 0.28; F6P is "Fructose 6 Phosphate";  // kegg.compound:C05345 CHEBI:15946
  species G6P in cytoplasm = 1.39; G6P is "Glucose 6 Phosphate";  // kegg.compound:C00668 CHEBI:17665
  species GA3P in cytoplasm = 0.05; GA3P is "glyceraldehyde 3-phosphate";  // CHEBI:17138
  species GLCi in cytoplasm = 0.087; GLCi is "Glucose in Cytosol";  // kegg.compound:C00293 CHEBI:17234
  species $GLCo in extracellular = 50; GLCo is "Extracellular Glucose";  // kegg.compound:C00293 CHEBI:17234
  species $GLY in extracellular = 0.15; GLY is "Glycerol";  // kegg.compound:C00116 CHEBI:17754
  species NAD in cytoplasm = 1.2;  // kegg.compound:C00003 CHEBI:15846
  species NADH in cytoplasm = 0.39;  // kegg.compound:C00004 CHEBI:16908
  species NADP in cytoplasm = 0.4; NADP is "NADP+";  // CHEBI:18009
  species NADPH in cytoplasm = 1.6;  // CHEBI:16474
  species P in cytoplasm = 5; P is "High energy phosphates";  // hasPart CHEBI:15422 CHEBI:16761 kegg.compound:C00002 kegg.compound:C00008
  species P2G in cytoplasm = 0.1; P2G is "2-phosphoglycerate";  // kegg.compound:C00631 CHEBI:17835
  species P3G in cytoplasm = 0.1; P3G is "3-phosphoglycerate";  // kegg.compound:C00197 CHEBI:17794
  species PEP in cytoplasm = 0.1; PEP is "Phosphoenolpyruvate";  // kegg.compound:C00074 CHEBI:18021
  species PYR in cytoplasm = 3.36; PYR is "Pyruvate";  // kegg.compound:C00022 CHEBI:15361
  species Ribose5P in cytoplasm = 0.1; Ribose5P is "ribose 5-phosphate";  // CHEBI:17797
  species Ribulose5P in cytoplasm = 0.1; Ribulose5P is "ribulose 5-phosphate";  // CHEBI:17363
  species $SUCC in extracellular = 0.1; SUCC is "Succinate";  // CHEBI:30031
  species Seduhept7P in cytoplasm = 0.1; Seduhept7P is "sedoheptulose 7-phosphate";  // CHEBI:15721
  species $X in cytoplasm = 0.1;
  species Xyl5P in cytoplasm = 0.1; Xyl5P is "xylulose 5-phosphate";  // CHEBI:16332

  // Parameters:
  SUMAXP = 4.1; SUMAXP is "sum of AXP conc";  // hasPart CHEBI:15422 CHEBI:16761 CHEBI:16027 kegg.compound:C00002
  k_rel_GAPDH = 1 dimensionless;
  k_rel_TPI = 1 dimensionless;
  ratio_NADPH_NADP has dimensionless;

  // Assignment rules:
  ratio_NADPH_NADP := NADPH/NADP;

  // Reactions:
  v6PGL: D6PGluconoLactone => D6PGluconate; cytoplasm*(Vm6PGL*D6PGluconoLactone/(Km6PGL + D6PGluconoLactone));  // isVersionOf kegg.reaction:R02035 GO:0017057
    Km6PGL = 0.8 mM; Vm6PGL = 4 mMpermin;
  vADH: NADH + ACE -> NAD + $ETOH; cytoplasm*(-(VmADH/(KiADHNAD*KmADHETOH)*(NAD*ETOH - NADH*ACE/KeqADH)/(1 + NAD/KiADHNAD + KmADHNAD*ETOH/(KiADHNAD*KmADHETOH) + KmADHNADH*ACE/(KiADHNADH*KmADHACE) + NADH/KiADHNADH + NAD*ETOH/(KiADHNAD*KmADHETOH) + KmADHNADH*NAD*ACE/(KiADHNAD*KiADHNADH*KmADHACE) + KmADHNAD*ETOH*NADH/(KiADHNAD*KmADHETOH*KiADHNADH) + NADH*ACE/(KiADHNADH*KmADHACE) + NAD*ETOH*ACE/(KiADHNAD*KmADHETOH*KiADHACE) + ETOH*NADH*ACE/(KiADHETOH*KiADHNADH*KmADHACE)))); vADH is "Alcohol dehydrogenase";  // isHomologTo kegg.reaction:R00746 ec-code:1.1.1.2 reactome:REACT_799
    KiADHETOH = 90 mM; KiADHACE = 1.1 mM; KmADHACE = 1.11 mM; KiADHNADH = 0.031 mM; KmADHNADH = 0.11 mM; KmADHNAD = 0.17 mM; KeqADH = 6.9e-5 dimensionless; KmADHETOH = 17 mM; KiADHNAD = 0.92 mM; VmADH = 810 mMpermin;
  vALD: F16P -> GA3P + DHAP; cytoplasm*(VmALD*F16P/KmALDF16P*(1 - DHAP*GA3P/(F16P*KeqALD))/(1 + F16P/KmALDF16P + DHAP/KmALDDHAP + GA3P/KmALDGAP + F16P*GA3P/(KmALDF16P*KmALDGAPi) + DHAP*GA3P/(KmALDDHAP*KmALDGAP))); vALD is "Aldolase";  // isHomologTo kegg.reaction:R01070 ec-code:4.1.2.13 reactome:REACT_1602
    KmALDGAPi = 10 mM; KmALDGAP = 2 mM; KmALDDHAP = 2.4 mM; KmALDF16P = 0.3 mM; KeqALD = 0.069 dimensionless; vALD_KeqTPI = 0.045 dimensionless; VmALD = 322.258 mMpermin;
  vATP: P -> $X; cytoplasm*(KATPASE*(P - 4*vATP_KeqAK*P - SUMAXP + (P^2 - 4*vATP_KeqAK*P^2 - 2*P*SUMAXP + 8*vATP_KeqAK*P*SUMAXP + SUMAXP^2)^0.5)/(2 - 8*vATP_KeqAK)); vATP is "ATPase activity";  // isVersionOf GO:0016887 ec-code:3.6.1.3
    vATP_KeqAK = 0.45 dimensionless; KATPASE = 39.5 permin;
  vENO: P2G -> PEP; cytoplasm*(VmENO/KmENOP2G*(P2G - PEP/KeqENO)/(1 + P2G/KmENOP2G + PEP/KmENOPEP)); vENO is "Enolase";  // isHomologTo kegg.reaction:R00658 ec-code:4.2.1.11 reactome:REACT_1400
    KmENOPEP = 0.5 mM; KeqENO = 6.7 dimensionless; KmENOP2G = 0.04 mM; VmENO = 365.806 mMpermin;
  vG3PDH: NADH + DHAP -> NAD + $GLY; cytoplasm*(VmG3PDH*(-(GLY*NAD/KeqG3PDH) + NADH*DHAP/(1 + vG3PDH_KeqTPI))/(KmG3PDHDHAP*KmG3PDHNADH*(1 + NAD/KmG3PDHNAD + NADH/KmG3PDHNADH)*(1 + GLY/KmG3PDHGLY + DHAP/((1 + vG3PDH_KeqTPI)*KmG3PDHDHAP)))); vG3PDH is "Glycerol 3-phosphate dehydrogenase";  // isVersionOf ec-code:1.1.1.8
    KmG3PDHGLY = 1 mM; KmG3PDHNAD = 0.93 mM; KmG3PDHNADH = 0.023 mM; KmG3PDHDHAP = 0.4 mM; vG3PDH_KeqTPI = 0.045 dimensionless; KeqG3PDH = 4300 dimensionless; VmG3PDH = 70.15 mMpermin;
  vG6PDH: NADP + G6P => NADPH + D6PGluconoLactone; cytoplasm*(VmG6PDH*G6P*NADP/(KmG6P*vG6PDH_KmNADP)/((1 + G6P/KmG6P + NADPH/vG6PDH_KiNADPH)*(1 + NADP/vG6PDH_KmNADP)));  // isVersionOf GO:0004345 ec-code:1.1.1.49 kegg.reaction:R00835
    vG6PDH_KiNADPH = 0.017 mM; vG6PDH_KmNADP = 0.02 mM; KmG6P = 0.04 mM; VmG6PDH = 4 mMpermin;
  vGAPDH: NAD + GA3P -> NADH + BPG; cytoplasm*(k_rel_GAPDH*VmGAPDHf*GA3P*NAD/(KmGAPDHGAP*KmGAPDHNAD)*(1 - BPG*NADH/(GA3P*NAD*KeqGAPDH))/((1 + GA3P/KmGAPDHGAP + BPG/KmGAPDHBPG)*(1 + NAD/KmGAPDHNAD + NADH/KmGAPDHNADH))); vGAPDH is "Glyceraldehyde 3-phosphate dehydrogenase";  // isHomologTo kegg.reaction:R01061 ec-code:1.2.1.12 reactome:REACT_1847
    KeqGAPDH = 0.005 dimensionless; KmGAPDHNAD = 0.09 mM; KmGAPDHGAP = 0.21 mM; VmGAPDHf = 1184.52 mMpermin; vGAPDH_KeqTPI = 0.045 dimensionless; KmGAPDHNADH = 0.06 mM; KmGAPDHBPG = 0.0098 mM; VmGAPDHr = 6549.68 mMpermin;
  vGLK: P + GLCi -> G6P; cytoplasm*(VmGLK*(-(G6P*(SUMAXP - (SUMAXP^2 - 2*SUMAXP*P + 8*vGLK_KeqAK*SUMAXP*P + P^2 - 4*vGLK_KeqAK*P^2)^0.5)/((1 - 4*vGLK_KeqAK)*KeqGLK)) + GLCi*(-SUMAXP + P - 4*vGLK_KeqAK*P + (SUMAXP^2 - 2*SUMAXP*P + 8*vGLK_KeqAK*SUMAXP*P + P^2 - 4*vGLK_KeqAK*P^2)^0.5)/(2 - 8*vGLK_KeqAK))/(KmGLKATP*KmGLKGLCi*(1 + G6P/KmGLKG6P + GLCi/KmGLKGLCi)*(1 + (SUMAXP - (SUMAXP^2 - 2*SUMAXP*P + 8*vGLK_KeqAK*SUMAXP*P + P^2 - 4*vGLK_KeqAK*P^2)^0.5)/((1 - 4*vGLK_KeqAK)*KmGLKADP) + (-SUMAXP + P - 4*vGLK_KeqAK*P + (SUMAXP^2 - 2*SUMAXP*P + 8*vGLK_KeqAK*SUMAXP*P + P^2 - 4*vGLK_KeqAK*P^2)^0.5)/((2 - 8*vGLK_KeqAK)*KmGLKATP)))); vGLK is "Hexokinase";  // isHomologTo kegg.reaction:R00299 ec-code:2.7.1.2 reactome:REACT_1318
    KmGLKADP = 0.23 mM; KmGLKG6P = 30 mM; KmGLKGLCi = 0.08 mM; KmGLKATP = 0.15 mM; KeqGLK = 3800 dimensionless; vGLK_KeqAK = 0.45 dimensionless; VmGLK = 226.452 mMpermin;
  vGLT: $GLCo -> GLCi; cytoplasm*(VmGLT*(GLCo - GLCi/KeqGLT)/(KmGLTGLCo*(1 + GLCo/KmGLTGLCo + GLCi/KmGLTGLCi + 0.91*GLCo*GLCi/(KmGLTGLCi*KmGLTGLCo)))); vGLT is "Glucose transport";  // isVersionOf reactome:REACT_2092 GO:0046323
    KmGLTGLCi = 1.1918 mM; KmGLTGLCo = 1.1918 mM; KeqGLT = 1 mM; VmGLT = 97.264 mMpermin;
  vGluDH: NADP + D6PGluconate => NADPH + Ribulose5P; cytoplasm*(VmGluDH*D6PGluconate*NADP/(KmGluconate*vGluDH_KmNADP)/((1 + D6PGluconate/KmGluconate + NADPH/vGluDH_KiNADPH)*(1 + NADP/vGluDH_KmNADP)));  // isVersionOf GO:0004616 kegg.reaction:R01528
    vGluDH_KiNADPH = 0.03 mM; vGluDH_KmNADP = 0.03 mM; KmGluconate = 0.02 mM; VmGluDH = 4 mMpermin;
  vNADPH: NADPH => NADP; cytoplasm*kNADPH*NADPH;  // isVersionOf GO:0070995
    kNADPH = 2 permin;
  vPDC: PYR -> $CO2 + ACE; cytoplasm*(VmPDC*PYR^nPDC/KmPDCPYR^nPDC/(1 + PYR^nPDC/KmPDCPYR^nPDC)); vPDC is "Pyruvate decarboxylase";  // kegg.reaction:R00224 ec-code:4.1.1.1
    KmPDCPYR = 4.33 mM; nPDC = 1.9 dimensionless; VmPDC = 174.194 mMpermin;
  vPFK: P + F6P -> F16P; cytoplasm*(gR*VmPFK*F6P*(-SUMAXP + P - 4*vPFK_KeqAK*P + (SUMAXP^2 - 2*SUMAXP*P + 8*vPFK_KeqAK*SUMAXP*P + P^2 - 4*vPFK_KeqAK*P^2)^0.5)*(1 + F6P/KmPFKF6P + (-SUMAXP + P - 4*vPFK_KeqAK*P + (SUMAXP^2 - 2*SUMAXP*P + 8*vPFK_KeqAK*SUMAXP*P + P^2 - 4*vPFK_KeqAK*P^2)^0.5)/((2 - 8*vPFK_KeqAK)*KmPFKATP) + gR*F6P*(-SUMAXP + P - 4*vPFK_KeqAK*P + (SUMAXP^2 - 2*SUMAXP*P + 8*vPFK_KeqAK*SUMAXP*P + P^2 - 4*vPFK_KeqAK*P^2)^0.5)/((2 - 8*vPFK_KeqAK)*KmPFKATP*KmPFKF6P))/((2 - 8*vPFK_KeqAK)*KmPFKATP*KmPFKF6P*(L0*(1 + CPFKF26BP*F26BP/KPFKF26BP + CPFKF16BP*F16P/KPFKF16BP)^2*(1 + 2*CPFKAMP*vPFK_KeqAK*(SUMAXP - (SUMAXP^2 - 2*SUMAXP*P + 8*vPFK_KeqAK*SUMAXP*P + P^2 - 4*vPFK_KeqAK*P^2)^0.5)^2/((-1 + 4*vPFK_KeqAK)*KPFKAMP*(SUMAXP - P + 4*vPFK_KeqAK*P - (SUMAXP^2 - 2*SUMAXP*P + 8*vPFK_KeqAK*SUMAXP*P + P^2 - 4*vPFK_KeqAK*P^2)^0.5)))^2*(1 + CiPFKATP*(-SUMAXP + P - 4*vPFK_KeqAK*P + (SUMAXP^2 - 2*SUMAXP*P + 8*vPFK_KeqAK*SUMAXP*P + P^2 - 4*vPFK_KeqAK*P^2)^0.5)/((2 - 8*vPFK_KeqAK)*KiPFKATP))^2*(1 + CPFKATP*(-SUMAXP + P - 4*vPFK_KeqAK*P + (SUMAXP^2 - 2*SUMAXP*P + 8*vPFK_KeqAK*SUMAXP*P + P^2 - 4*vPFK_KeqAK*P^2)^0.5)/((2 - 8*vPFK_KeqAK)*KmPFKATP))^2/((1 + F26BP/KPFKF26BP + F16P/KPFKF16BP)^2*(1 + 2*vPFK_KeqAK*(SUMAXP - (SUMAXP^2 - 2*SUMAXP*P + 8*vPFK_KeqAK*SUMAXP*P + P^2 - 4*vPFK_KeqAK*P^2)^0.5)^2/((-1 + 4*vPFK_KeqAK)*KPFKAMP*(SUMAXP - P + 4*vPFK_KeqAK*P - (SUMAXP^2 - 2*SUMAXP*P + 8*vPFK_KeqAK*SUMAXP*P + P^2 - 4*vPFK_KeqAK*P^2)^0.5)))^2*(1 + (-SUMAXP + P - 4*vPFK_KeqAK*P + (SUMAXP^2 - 2*SUMAXP*P + 8*vPFK_KeqAK*SUMAXP*P + P^2 - 4*vPFK_KeqAK*P^2)^0.5)/((2 - 8*vPFK_KeqAK)*KiPFKATP))^2) + (1 + F6P/KmPFKF6P + (-SUMAXP + P - 4*vPFK_KeqAK*P + (SUMAXP^2 - 2*SUMAXP*P + 8*vPFK_KeqAK*SUMAXP*P + P^2 - 4*vPFK_KeqAK*P^2)^0.5)/((2 - 8*vPFK_KeqAK)*KmPFKATP) + gR*F6P*(-SUMAXP + P - 4*vPFK_KeqAK*P + (SUMAXP^2 - 2*SUMAXP*P + 8*vPFK_KeqAK*SUMAXP*P + P^2 - 4*vPFK_KeqAK*P^2)^0.5)/((2 - 8*vPFK_KeqAK)*KmPFKATP*KmPFKF6P))^2))); vPFK is "Phosphofructokinase";  // modifiers: F26BP; isHomologTo kegg.reaction:R00756 ec-code:2.7.1.11 reactome:REACT_736
    CPFKATP = 3 dimensionless; KiPFKATP = 0.65 mM; CiPFKATP = 100 dimensionless; KPFKAMP = 0.0995 mM; CPFKAMP = 0.0845 dimensionless; KPFKF16BP = 0.111 mM; CPFKF16BP = 0.397 dimensionless; KPFKF26BP = 0.000682 mM; CPFKF26BP = 0.0174 dimensionless; L0 = 0.66 dimensionless; KmPFKATP = 0.71 mM; KmPFKF6P = 0.1 mM; vPFK_KeqAK = 0.45 dimensionless; VmPFK = 182.903 mMpermin; gR = 5.12 dimensionless;
  vPGI: G6P -> F6P; cytoplasm*(VmPGI/KmPGIG6P*(G6P - F6P/KeqPGI)/(1 + G6P/KmPGIG6P + F6P/KmPGIF6P)); vPGI is "Glucose-6-phosphate isomerase";  // isHomologTo kegg.reaction:R00771 ec-code:5.3.1.9 reactome:REACT_116
    KmPGIF6P = 0.3 mM; KeqPGI = 0.314 dimensionless; KmPGIG6P = 1.4 mM; VmPGI = 339.677 mMpermin;
  vPGK: BPG -> P + P3G; cytoplasm*(VmPGK*(KeqPGK*BPG*(SUMAXP - (SUMAXP^2 - 2*SUMAXP*P + 8*vPGK_KeqAK*SUMAXP*P + P^2 - 4*vPGK_KeqAK*P^2)^0.5)/(1 - 4*vPGK_KeqAK) - (-SUMAXP + P - 4*vPGK_KeqAK*P + (SUMAXP^2 - 2*SUMAXP*P + 8*vPGK_KeqAK*SUMAXP*P + P^2 - 4*vPGK_KeqAK*P^2)^0.5)*P3G/(2 - 8*vPGK_KeqAK))/(KmPGKATP*KmPGKP3G*(1 + (SUMAXP - (SUMAXP^2 - 2*SUMAXP*P + 8*vPGK_KeqAK*SUMAXP*P + P^2 - 4*vPGK_KeqAK*P^2)^0.5)/((1 - 4*vPGK_KeqAK)*KmPGKADP) + (-SUMAXP + P - 4*vPGK_KeqAK*P + (SUMAXP^2 - 2*SUMAXP*P + 8*vPGK_KeqAK*SUMAXP*P + P^2 - 4*vPGK_KeqAK*P^2)^0.5)/((2 - 8*vPGK_KeqAK)*KmPGKATP))*(1 + BPG/KmPGKBPG + P3G/KmPGKP3G))); vPGK is "Phosphoglycerate kinase";  // isHomologTo kegg.reaction:R01512 ec-code:2.7.2.3 reactome:REACT_1771
    KmPGKBPG = 0.003 mM; KmPGKADP = 0.2 mM; KmPGKP3G = 0.53 mM; KmPGKATP = 0.3 mM; vPGK_KeqAK = 0.45 dimensionless; KeqPGK = 3200 dimensionless; VmPGK = 1306.45 mMpermin;
  vPGM: P3G -> P2G; cytoplasm*(VmPGM/KmPGMP3G*(P3G - P2G/KeqPGM)/(1 + P3G/KmPGMP3G + P2G/KmPGMP2G)); vPGM is "Phosphoglycerate mutase";  // isHomologTo kegg.reaction:R01518 ec-code:5.4.2.1 reactome:REACT_576
    KmPGMP2G = 0.08 mM; KeqPGM = 0.19 dimensionless; KmPGMP3G = 1.2 mM; VmPGM = 2525.81 mMpermin;
  vPPI: Ribulose5P -> Ribose5P; cytoplasm*((VmPPIf*Ribulose5P/vPPI_KmRibu5P - VmPPIr*Ribose5P/KmRibo5P)/(1 + Ribulose5P/vPPI_KmRibu5P + Ribose5P/KmRibo5P));  // isVersionOf GO:0004751 kegg.reaction:R01056
    KmRibo5P = 1.6 mM; vPPI_KmRibu5P = 1.6 mM; VmPPIr = 3458 mMpermin; VmPPIf = 3458 mMpermin;
  vPYK: PEP -> P + PYR; cytoplasm*(VmPYK/(KmPYKPEP*KmPYKADP)*(PEP*(SUMAXP - (P^2 - 4*vPYK_KeqAK*P^2 - 2*P*SUMAXP + 8*vPYK_KeqAK*P*SUMAXP + SUMAXP^2)^0.5)/(1 - 4*vPYK_KeqAK) - PYR*(P - 4*vPYK_KeqAK*P - SUMAXP + (P^2 - 4*vPYK_KeqAK*P^2 - 2*P*SUMAXP + 8*vPYK_KeqAK*P*SUMAXP + SUMAXP^2)^0.5)/(2 - 8*vPYK_KeqAK)/KeqPYK)/((1 + PEP/KmPYKPEP + PYR/KmPYKPYR)*(1 + (P - 4*vPYK_KeqAK*P - SUMAXP + (P^2 - 4*vPYK_KeqAK*P^2 - 2*P*SUMAXP + 8*vPYK_KeqAK*P*SUMAXP + SUMAXP^2)^0.5)/(2 - 8*vPYK_KeqAK)/KmPYKATP + (SUMAXP - (P^2 - 4*vPYK_KeqAK*P^2 - 2*P*SUMAXP + 8*vPYK_KeqAK*P*SUMAXP + SUMAXP^2)^0.5)/(1 - 4*vPYK_KeqAK)/KmPYKADP))); vPYK is "Pyruvate kinase";  // isHomologTo kegg.reaction:R00200 ec-code:2.7.1.40 reactome:REACT_1911
    KmPYKATP = 1.5 mM; KmPYKPYR = 21 mM; KeqPYK = 6500 dimensionless; vPYK_KeqAK = 0.45 dimensionless; KmPYKADP = 0.53 mM; KmPYKPEP = 0.14 mM; VmPYK = 1088.71 mMpermin;
  vR5PI: Ribulose5P -> Xyl5P; cytoplasm*((VmR5PIf*Ribulose5P/vR5PI_KmRibu5P - VmR5PIr*Xyl5P/KmXyl)/(1 + Ribulose5P/vR5PI_KmRibu5P + Xyl5P/KmXyl));
    KmXyl = 1.5 mM; vR5PI_KmRibu5P = 1.5 mM; VmR5PIr = 1039 mMpermin; VmR5PIf = 1039 mMpermin;
  vSUC: 3 NAD + 2 ACE -> $SUCC + 3 NADH; cytoplasm*KSUCC*ACE; vSUC is "Succinate synthesis";  // isVersionOf GO:0006105
    KSUCC = 21.4 permin;
  vTPI: GA3P -> DHAP; cytoplasm*(k_rel_TPI*(VmDHAP*GA3P/vTPI_KmGA3P - VmGA3P*DHAP/KmDHAP)/(1 + GA3P/vTPI_KmGA3P + DHAP/KmDHAP));  // isVersionOf ec-code:5.3.1.1 GO:0004807 kegg.reaction:R01015
    VmGA3P = 555 mMpermin; VmDHAP = 10900 mMpermin; KmDHAP = 1.23 mM; vTPI_KmGA3P = 1.27 mM;
  vTransald: GA3P + Seduhept7P -> Erythrose4P + F6P; cytoplasm*((VmTransaldf*GA3P*Seduhept7P/(vTransald_KmGA3P*vTransald_KmSeduhept) - VmTransaldr*F6P*Erythrose4P/(vTransald_KmF6P*vTransald_KmEry4P))/((1 + GA3P/vTransald_KmGA3P + F6P/vTransald_KmF6P)*(1 + Seduhept7P/vTransald_KmSeduhept + Erythrose4P/vTransald_KmEry4P)));  // isVersionOf kegg.reaction:R01827 GO:0004801
    vTransald_KmEry4P = 0.018 mM; vTransald_KmF6P = 0.32 mM; vTransald_KmSeduhept = 0.18 mM; vTransald_KmGA3P = 0.22 mM; VmTransaldr = 10 mMpermin; VmTransaldf = 55 mMpermin;
  vTransk1: Xyl5P + Ribose5P -> Seduhept7P + GA3P; cytoplasm*((VmTransk1f*Ribose5P*Xyl5P/(KmRibose5P*vTransk1_KmXyl5P) - VmTransk1r*GA3P*Seduhept7P/(vTransk1_KmGA3P*vTransk1_KmSeduhept))/((1 + Ribose5P/KmRibose5P + GA3P/vTransk1_KmGA3P)*(1 + Xyl5P/vTransk1_KmXyl5P + Seduhept7P/vTransk1_KmSeduhept)));  // isVersionOf kegg.reaction:R01641 GO:0004802
    vTransk1_KmSeduhept = 0.15 mM; vTransk1_KmGA3P = 0.1 mM; vTransk1_KmXyl5P = 0.15 mM; KmRibose5P = 0.1 mM; VmTransk1r = 2 mMpermin; VmTransk1f = 4 mMpermin;
  vTransk2: Erythrose4P + Xyl5P -> F6P + GA3P; cytoplasm*((VmTransk2f*Erythrose4P*Xyl5P/(vTransk2_KmEry4P*vTransk2_KmXyl5P) - VmTransk2r*F6P*GA3P/(vTransk2_KmF6P*vTransk2_KmGA3P))/((1 + Xyl5P/vTransk2_KmXyl5P + GA3P/vTransk2_KmGA3P)*(1 + Erythrose4P/vTransk2_KmEry4P + F6P/vTransk2_KmF6P)));  // isVersionOf GO:0004802 kegg.reaction:R01830
    vTransk2_KmGA3P = 2.1 mM; vTransk2_KmF6P = 1.1 mM; vTransk2_KmEry4P = 0.09 mM; vTransk2_KmXyl5P = 0.16 mM; VmTransk2r = 43 mMpermin; VmTransk2f = 3.2 mMpermin;

  // Unit definitions:
  unit permin = 1 / (60 second);
  unit mM = 1e-3 mole / litre;
  unit mMpermin = 1e-3 mole / (60 second * litre);
  unit minute = 60 second;
  unit millimole = 1e-3 mole;
end
