// SBML level 3 version 1

model rohwer1()
  // model units - substance: mM, time: min, extent: mM

  // Compartments:
  compartment default_compartment = 1;

  // Species:
  species $ADP in default_compartment = 0.2;
  species $ATP in default_compartment = 1;
  species Fru in default_compartment = 1;
  species $Fruex in default_compartment = 5;
  species Glc in default_compartment = 1;
  species $Glcex in default_compartment = 5;
  species HexP in default_compartment = 1;
  species Suc in default_compartment = 1;
  species Suc6P in default_compartment = 1;
  species $Sucvac in default_compartment = 0;
  species $UDP in default_compartment = 0.2;
  species $glycolysis in default_compartment = 0;
  species $phos in default_compartment = 5.1;

  // Parameters:
  Keq6 = 10;
  Keq8 = 5;
  Ki1Fru = 1;
  Ki2Glc = 1;
  Ki3G6P = 0.1;
  Ki4F6P = 10;
  Ki5ADP = 2;
  Ki5Fru = 12;
  Ki6F6P = 0.4;
  Ki6Pi = 3;
  Ki6Suc6P = 0.07;
  Ki6UDPGlc = 1.4;
  Ki8Fru = 4;
  Ki8Suc = 40;
  Ki8UDP = 0.3;
  Ki9Fru = 15;
  Ki9Glc = 15;
  Km10F6P = 0.2;
  Km11Suc = 100;
  Km1Fruex = 0.2;
  Km2Glcex = 0.2;
  Km3ATP = 0.25;
  Km3Glc = 0.07;
  Km4ATP = 0.25;
  Km4Fru = 10;
  Km5ATP = 0.085;
  Km5Fru = 0.1;
  Km6F6P = 0.6;
  Km6Suc6P = 0.1;
  Km6UDP = 0.3;
  Km6UDPGlc = 1.8;
  Km7Suc6P = 0.1;
  Km8Fru = 4;
  Km8Suc = 50;
  Km8UDP = 0.3;
  Km8UDPGlc = 0.3;
  Km9Suc = 10;
  Vmax1 = 0.286;
  Vmax10 = 0.1;
  Vmax11 = 1;
  Vmax2 = 0.286;
  Vmax3 = 0.197;
  Vmax4 = 0.197;
  Vmax5 = 0.164;
  Vmax6f = 0.379;
  Vmax6r = 0.2;
  Vmax7 = 0.5;
  Vmax8f = 0.677;
  Vmax8r = 0.3;
  Vmax9 = 0.372;

  // Reactions:
  v_1: $Fruex -> Fru; Vmax1*Fruex/(Km1Fruex*(1 + Fru/Ki1Fru) + Fruex);
  v_10: HexP -> $glycolysis; Vmax10*0.0575*HexP/(Km10F6P + 0.0575*HexP);
  v_11: Suc -> $Sucvac; Vmax11*Suc/(Km11Suc + Suc);
  v_2: $Glcex -> Glc; Vmax2*Glcex/(Km2Glcex*(1 + Glc/Ki2Glc) + Glcex);
  v_3: Glc + $ATP -> HexP + $ADP; Vmax3*Glc/Km3Glc*(ATP/Km3ATP)/((1 + ATP/Km3ATP)*(1 + Glc/Km3Glc + Fru/Km4Fru + 0.113*HexP/Ki3G6P + 0.0575*HexP/Ki4F6P));  // modifiers: Fru
  v_4: Fru + $ATP -> HexP + $ADP; Vmax4*Fru/Km4Fru*(ATP/Km4ATP)/((1 + ATP/Km4ATP)*(1 + Glc/Km3Glc + Fru/Km4Fru + 0.113*HexP/Ki3G6P + 0.0575*HexP/Ki4F6P));  // modifiers: Glc
  v_5: Fru + $ATP -> HexP + $ADP; Vmax5/(1 + Fru/Ki5Fru)*(Fru/Km5Fru)*(ATP/Km5ATP)/(1 + Fru/Km5Fru + ATP/Km5ATP + Fru*ATP/(Km5Fru*Km5ATP) + ADP/Ki5ADP);
  v_6: 2 HexP -> Suc6P + $UDP; Vmax6f*(0.0575*HexP*0.8231*HexP - Suc6P*UDP/Keq6)/(0.0575*HexP*0.8231*HexP*(1 + Suc6P/Ki6Suc6P) + Km6F6P*(1 + phos/Ki6Pi)*(0.8231*HexP + Ki6UDPGlc) + Km6UDPGlc*0.0575*HexP + Vmax6f/(Vmax6r*Keq6)*(Km6UDP*Suc6P*(1 + 0.8231*HexP/Ki6UDPGlc) + UDP*(Km6Suc6P*(1 + Km6UDPGlc*0.0575*HexP/(Ki6UDPGlc*Km6F6P*(1 + phos/Ki6Pi))) + Suc6P*(1 + 0.0575*HexP/Ki6F6P))));  // modifiers: phos
  v_7: Suc6P -> Suc + $phos; Vmax7*Suc6P/(Km7Suc6P + Suc6P);
  v_8: HexP + Fru -> Suc + $UDP; -Vmax8f*(Suc*UDP - Fru*0.8231*HexP/Keq8)/(Suc*UDP*(1 + Fru/Ki8Fru) + Km8Suc*(UDP + Ki8UDP) + Km8UDP*Suc + Vmax8f/(Vmax8r*Keq8)*(Km8UDPGlc*Fru*(1 + UDP/Ki8UDP) + 0.8231*HexP*(Km8Fru*(1 + Km8UDP*Suc/(Ki8UDP*Km8Suc)) + Fru*(1 + Suc/Ki8Suc))));
  v_9: Suc -> Glc + Fru; Vmax9/(1 + Glc/Ki9Glc)*Suc/(Km9Suc*(1 + Fru/Ki9Fru) + Suc);

  // Unit definitions:
  unit mM = 1e-3 mole / litre;
  unit min = 60 second;
end
