// SBML level 3 version 1

model rohwer2()
  // model units - substance: uM, time: min, extent: uM

  // Compartments:
  compartment default_compartment = 1;

  // Species:
  species EI in default_compartment = 3;
  species EIIA in default_compartment = 20;
  species EIIAP in default_compartment = 20;
  species EIIAPIICB in default_compartment = 0;
  species EIICB in default_compartment = 5;
  species EIICBP in default_compartment = 5;
  species EIICBPGlc in default_compartment = 0;
  species EIP in default_compartment = 2;
  species EIPHPr in default_compartment = 0;
  species $Glc in default_compartment = 500;
  species $GlcP in default_compartment = 50;
  species HPr in default_compartment = 25;
  species HPrP in default_compartment = 25;
  species HPrPIIA in default_compartment = 0;
  species $PEP in default_compartment = 2800;
  species $Pyr in default_compartment = 900;
  species PyrPI in default_compartment = 0;

  // Parameters:
  k10f = 4800;
  k10r = 0.0054;
  k1f = 1960;
  k1r = 480000;
  k2f = 108000;
  k2r = 294;
  k3f = 14000;
  k3r = 14000;
  k4f = 84000;
  k4r = 3360;
  k5f = 21960;
  k5r = 21960;
  k6f = 4392;
  k6r = 3384;
  k7f = 880;
  k7r = 880;
  k8f = 2640;
  k8r = 960;
  k9f = 260;
  k9r = 389;

  // Reactions:
  v_1: $PEP + EI -> PyrPI; k1f*PEP*EI - k1r*PyrPI;
  v_10: EIICBPGlc -> EIICB + $GlcP; k10f*EIICBPGlc - k10r*EIICB*GlcP;
  v_2: PyrPI -> $Pyr + EIP; k2f*PyrPI - k2r*Pyr*EIP;
  v_3: EIP + HPr -> EIPHPr; k3f*EIP*HPr - k3r*EIPHPr;
  v_4: EIPHPr -> EI + HPrP; k4f*EIPHPr - k4r*EI*HPrP;
  v_5: HPrP + EIIA -> HPrPIIA; k5f*HPrP*EIIA - k5r*HPrPIIA;
  v_6: HPrPIIA -> HPr + EIIAP; k6f*HPrPIIA - k6r*HPr*EIIAP;
  v_7: EIIAP + EIICB -> EIIAPIICB; k7f*EIIAP*EIICB - k7r*EIIAPIICB;
  v_8: EIIAPIICB -> EIIA + EIICBP; k8f*EIIAPIICB - k8r*EIIA*EIICBP;
  v_9: EIICBP + $Glc -> EIICBPGlc; k9f*EIICBP*Glc - k9r*EIICBPGlc;

  // Unit definitions:
  unit min = 60 second;
  unit uM = 1e-6 mole / litre;
end
