// SBML level 2 version 3

model santolini1()

  // Compartments:
  compartment cytosol = 1;  // GO:0005829

  // Species:
  species FeII in cytosol = 0;  // hasPart uniprot:P29476 CHEBI:29033 CHEBI:17627
  species FeIII in cytosol = 1;  // hasPart uniprot:P29476 CHEBI:17627 CHEBI:29034
  species FeIII_NO in cytosol = 0;  // hasPart uniprot:P29476 CHEBI:29034 CHEBI:17627 CHEBI:16480
  species FeIII_star in cytosol = 0;  // hasPart uniprot:P29476 CHEBI:29034 CHEBI:17627
  species FeIII_t in cytosol;  // hasPart uniprot:P29476 CHEBI:17627 CHEBI:29034
  species FeII_NO in cytosol = 0;  // hasPart uniprot:P29476 CHEBI:29033 CHEBI:17627 CHEBI:16480
  species FeII_O2 in cytosol = 0;  // uniprot:P29476 CHEBI:17627 CHEBI:29033 CHEBI:15379
  species FeII_star in cytosol = 0;  // hasPart uniprot:P29476 CHEBI:29033 CHEBI:17627
  species FeII_star_O2 in cytosol = 0;  // hasPart uniprot:P29476 CHEBI:29033 CHEBI:17627 CHEBI:15379
  species $NADPH in cytosol = 40;  // kegg.compound:C00005 CHEBI:16474
  species $NADPplus in cytosol = 0;  // kegg.compound:C00006 CHEBI:18009
  species $NO in cytosol = 0;  // kegg.compound:C00533 CHEBI:16480
  species $NO3 in cytosol = 0;  // kegg.compound:C00244 CHEBI:17632
  species $O2 in cytosol = 140;  // kegg.compound:C00007 CHEBI:15379
  species $citrulline in cytosol = 0; citrulline is "citruline";  // kegg.compound:C00327 CHEBI:16349

  // Parameters:
  k1 = 2.6 persec;
  k10 = 0.0013 peruMpersec;
  k2 = 0.9 peruMpersec;
  k3 = 26 persec;
  k4 = 2.6 persec;
  k5 = 0.9 peruMpersec;
  k6 = 26 persec;
  k7 = 5 persec;
  k8 = 2.6 persec;
  k9 = 0.0001 persec;

  // Assignment rules:
  FeIII_t := FeIII + FeIII_star;

  // Reactions:
  r1: $NADPH + FeIII => $NADPplus + FeII; cytosol*k1*FeIII;  // isVersionOf GO:0016651
  r10: $O2 + FeII_NO => $NO3 + FeIII; cytosol*k10*FeII_NO*O2;
  r2: $O2 + FeII => FeII_O2; cytosol*k2*FeII*O2;
  r3: FeII_O2 => FeIII_star; cytosol*k3*FeII_O2;
  r4: 0.5 $NADPH + FeIII_star => 0.5 $NADPplus + FeII_star; cytosol*k4*FeIII_star;  // isVersionOf GO:0016651
  r5: $O2 + FeII_star => FeII_star_O2; cytosol*k5*FeII_star*O2;
  r6: FeII_star_O2 => $citrulline + FeIII_NO; cytosol*k6*FeII_star_O2;
  r9: FeII_NO => $NO + FeII; cytosol*k9*FeII_NO;
  rF: FeIII_NO => $NO + FeIII; cytosol*k7*FeIII_NO;
  rG: 0.5 $NADPH + FeIII_NO => 0.5 $NADPplus + FeII_NO; cytosol*k8*FeIII_NO;  // isVersionOf GO:0016651

  // Unit definitions:
  unit persec = 1 / second;
  unit uM = 1e-6 mole / litre;
  unit peruMpersec = litre / (second * 1e-6 mole);
  unit micromole = 1e-6 mole;
end
