// SBML level 2 version 1

model scheper1()

  // Compartments:
  compartment cytoplasm = 1e-15;  // GO:0005737

  // Species:
  species $EmptySet in cytoplasm = 0;
  species M in cytoplasm = 0; M is "mRNA";  // isVersionOf kegg.compound:C00046 CHEBI:33699
  species P in cytoplasm = 0; P is "protein";  // CHEBI:16541 kegg.compound:C00017

  // Reactions:
  Md: M => $EmptySet; cytoplasm*qM*M; Md is "messenger degradation";  // isVersionOf GO:0006402
    qM = 0.21;
  Pd: P => $EmptySet; cytoplasm*qP*P; Pd is "protein degradation";  // isVersionOf GO:0030163
    qP = 0.21;
  TC: $EmptySet => M; cytoplasm*(rM/(1 + (P/k)^n)); TC is "mRNA production";  // modifiers: P; isVersionOf GO:0009299
    n = 2; k = 1; rM = 1;
  TL: $EmptySet => P; cytoplasm*rP*delay(M, parameter_0000009)^m; TL is "protein production";  // modifiers: M; isVersionOf GO:0006412
    parameter_0000009 = 4; m = 3; rP = 1;

  // Unit definitions:
  unit time = 3600 second;
end
