// SBML level 3 version 1

model schoeberl()
  // model units - substance: moleculespercell, time: min

  // Compartments:
  compartment default_compartment = 1;

  // Species:
  species $ext in default_compartment = 1;
  species x10 in default_compartment = 0;
  species x100 in default_compartment = 0;
  species x101 in default_compartment = 0;
  species x102 in default_compartment = 0;
  species x103 in default_compartment = 0;
  species x11 in default_compartment = 0;
  species x12 in default_compartment = 81000;
  species x13 in default_compartment = 0;
  species x14 in default_compartment = 12000;
  species x15 in default_compartment = 0;
  species x16 in default_compartment = 0;
  species x17 in default_compartment = 0;
  species x18 in default_compartment = 0;
  species x19 in default_compartment = 0;
  species x2 in default_compartment = 50000;
  species x20 in default_compartment = 0;
  species x21 in default_compartment = 0;
  species x22 in default_compartment = 11000;
  species x23 in default_compartment = 0;
  species x24 in default_compartment = 26300;
  species x25 in default_compartment = 0;
  species x26 in default_compartment = 72000;
  species x27 in default_compartment = 0;
  species x28 in default_compartment = 0;
  species x29 in default_compartment = 0;
  species x3 in default_compartment = 0;
  species x30 in default_compartment = 40000;
  species x31 in default_compartment = 101000;
  species x32 in default_compartment = 0;
  species x33 in default_compartment = 0;
  species x34 in default_compartment = 0;
  species x35 in default_compartment = 0;
  species x36 in default_compartment = 0;
  species x37 in default_compartment = 0;
  species x38 in default_compartment = 0;
  species x39 in default_compartment = 0;
  species x4 in default_compartment = 0;
  species x40 in default_compartment = 0;
  species x41 in default_compartment = 40000;
  species x42 in default_compartment = 0;
  species x43 in default_compartment = 0;
  species x44 in default_compartment = 40000;
  species x45 in default_compartment = 0;
  species x46 in default_compartment = 0;
  species x47 in default_compartment = 21000000;
  species x48 in default_compartment = 0;
  species x49 in default_compartment = 0;
  species x5 in default_compartment = 0;
  species x50 in default_compartment = 0;
  species x51 in default_compartment = 0;
  species x52 in default_compartment = 0;
  species x53 in default_compartment = 40000;
  species x54 in default_compartment = 0;
  species x55 in default_compartment = 22100000;
  species x56 in default_compartment = 0;
  species x57 in default_compartment = 0;
  species x58 in default_compartment = 0;
  species x59 in default_compartment = 0;
  species x6 in default_compartment = 0;
  species x60 in default_compartment = 10000000;
  species x61 in default_compartment = 0;
  species x62 in default_compartment = 0;
  species x63 in default_compartment = 0;
  species x64 in default_compartment = 0;
  species x65 in default_compartment = 0;
  species x66 in default_compartment = 0;
  species x67 in default_compartment = 0;
  species x68 in default_compartment = 0;
  species x69 in default_compartment = 0;
  species x7 in default_compartment = 0;
  species x70 in default_compartment = 0;
  species x71 in default_compartment = 0;
  species x72 in default_compartment = 0;
  species x73 in default_compartment = 0;
  species x74 in default_compartment = 0;
  species x75 in default_compartment = 0;
  species x76 in default_compartment = 0;
  species x77 in default_compartment = 0;
  species x78 in default_compartment = 0;
  species x79 in default_compartment = 0;
  species x8 in default_compartment = 0;
  species x80 in default_compartment = 0;
  species x81 in default_compartment = 0;
  species x82 in default_compartment = 0;
  species x83 in default_compartment = 0;
  species x84 in default_compartment = 0;
  species x85 in default_compartment = 0;
  species x86 in default_compartment = 0;
  species x87 in default_compartment = 0;
  species x88 in default_compartment = 0;
  species x89 in default_compartment = 0;
  species x9 in default_compartment = 0;
  species x90 in default_compartment = 0;
  species x91 in default_compartment = 0;
  species x92 in default_compartment = 0;
  species x93 in default_compartment = 0;
  species x94 in default_compartment = 0;
  species x95 in default_compartment = 0;
  species x96 in default_compartment = 0;
  species x97 in default_compartment = 0;
  species x98 in default_compartment = 0;
  species x99 in default_compartment = 0;

  // Parameters:
  ERKt = 22100000;
  GAPt = 12000;
  Grb2t = 11000;
  KmERK = 3e-7;
  KmMEK = 3e-7;
  KmPase = 6e-8;
  Lo = 5e-8;
  MEKt = 21000000;
  Pase1t = 40000;
  Pase2t = 40000;
  Pase3t = 10000000;
  Prot = 81000;
  RT = 50000;
  Raft = 40000;
  RasGDP = 72000;
  SHCt = 101000;
  SOSt = 26300;
  Vs = 1e-12;
  Vv = 4.3e-18;
  Vz = 1e-12;
  a = 6e23;
  grb2sos = 40000;
  k1 = 30000000;
  k10 = 140000;
  k126 = 100000;
  k127 = 0;
  k13 = 2.17;
  k15 = 10000;
  k16 = 10000000;
  k17 = 10000000;
  k18 = 15000000;
  k19 = 100000;
  k2 = 10000000;
  k20 = 2100000;
  k21 = 220000;
  k22 = 21000000;
  k23 = 6;
  k25 = 10000000;
  k28 = 1000000;
  k29 = 700000;
  k3 = 1;
  k32 = 240000;
  k33 = 21000000;
  k34 = 4500000;
  k35 = 4500000;
  k36 = 0.005;
  k37 = 900000;
  k4 = 1.73e-7;
  k40 = 30000000;
  k41 = 30000000;
  k42 = 71000000;
  k43 = 0;
  k45 = 0;
  k47 = 0;
  k48 = 14300000;
  k49 = 0;
  k5 = 0;
  k50 = 270000;
  k53 = 0;
  k55 = 0;
  k56 = 14100000;
  k57 = 0;
  k58 = 5000000;
  k6 = 0.0005;
  k60 = 0.0055;
  k61 = 0.00067;
  k63 = 0;
  k8 = 1000000;
  kd1 = 0.00384;
  kd10 = 0.011;
  kd10b = 0;
  kd126 = 2;
  kd127 = 0.0001;
  kd13 = 0;
  kd15 = 0;
  kd16 = 0;
  kd17 = 0.06;
  kd18 = 1.3;
  kd19 = 0.5;
  kd2 = 0.1;
  kd20 = 0.4;
  kd21 = 0.023;
  kd22 = 0.1;
  kd23 = 0.06;
  kd24 = 0.55;
  kd25 = 0.0214;
  kd28 = 0.0053;
  kd29 = 1;
  kd3 = 0.01;
  kd32 = 0.1;
  kd33 = 0.2;
  kd34 = 0.03;
  kd35 = 0.0015;
  kd36 = 0;
  kd37 = 0.3;
  kd4 = 0.00166;
  kd40 = 0.064;
  kd41 = 0.0429;
  kd42 = 0.2;
  kd43 = 1;
  kd44 = 0.01833;
  kd45 = 3.5;
  kd47 = 2.9;
  kd48 = 0.8;
  kd50 = 0.5;
  kd52 = 0.033;
  kd53 = 16;
  kd55 = 5.7;
  kd56 = 0.6;
  kd58 = 0.5;
  kd6 = 0.005;
  kd60 = 0;
  kd61 = 0;
  kd8 = 0.2;
  rho = 1000000000;
  x1 = 5e-8;

  // Assignment rules:
  k10b := k10/a/Vv;
  kd57 := k56/a/Vz*a*Vz*KmPase - kd56;
  k52 := (kd53 + kd52)/a/Vz/KmERK;
  kd49 := k48/a/Vz*a*Vz*KmPase - kd48;
  kd63 := kd24*0.5;
  k44 := (kd45 + kd44)/a/Vz/KmMEK;
  kd5 := (-1.35e-5*(RT/(kd1/k1/Lo + 1)) + 1.55)/60;

  // Reactions:
  v_1: x2 -> x3; (k1*x1*x2 - kd1*x3)*60;
  v_10: x6 + x16 -> x10; (k10b*x6*x16 - kd10*x10)*60;
  v_100: x60 + x81 -> x85; (k58/a/Vz*x60*x81 - kd58*x85)*60;
  v_101: x55 + x60 -> x85; (k57*x55*x60 - kd57*x85)*60;
  v_102: x15 -> x17; (k6*x15*1 - kd6*x17)*60;
  v_103: x32 -> x63; (k6*x32*1 - kd6*x63)*60;
  v_104: x33 -> x64; (k6*x33*1 - kd6*x64)*60;
  v_105: x25 -> x19; (k6*x25*1 - kd6*x19)*60;
  v_106: x12 + x25 -> x88; (k4*x25*x12 - kd4*x88)*60;
  v_107: x9 + x19 -> x88; (k5*x9*x19 - kd5*x88)*60;
  v_108: x27 -> x20; (k6*x27*1 - kd6*x20)*60;
  v_109: x12 + x27 -> x89; (k4*x27*x12 - kd4*x89)*60;
  v_11: 2 x10 -> x11; (k2/a/Vs*x10*x10 - kd2*x11)*60;
  v_110: x9 + x20 -> x89; (k5*x9*x20 - kd5*x89)*60;
  v_111: x29 -> x21; (k6*x29*1 - kd6*x21)*60;
  v_112: x12 + x29 -> x90; (k4*x29*x12 - kd4*x90)*60;
  v_113: x9 + x21 -> x90; (k5*x9*x21 - kd5*x90)*60;
  v_114: x34 -> x65; (k6*x34*1 - kd6*x65)*60;
  v_115: x12 + x34 -> x91; (k4*x34*x12 - kd4*x91)*60;
  v_116: x9 + x65 -> x91; (k5*x9*x65 - kd5*x91)*60;
  v_117: x35 -> x66; (k6*x35*1 - kd6*x66)*60;
  v_118: x12 + x35 -> x92; (k4*x35*x12 - kd4*x92)*60;
  v_119: x9 + x66 -> x92; (k5*x9*x66 - kd5*x92)*60;
  v_12: x11 -> x8; (k3*x11*1 - kd3*x8)*60;
  v_120: x36 -> x67; (k6*x36*1 - kd6*x67)*60;
  v_121: x12 + x36 -> x93; (k4*x36*x12 - kd4*x93)*60;
  v_122: x9 + x67 -> x93; (k5*x9*x67 - kd5*x93)*60;
  v_123: x37 -> x68; (k6*x37*1 - kd6*x68)*60;
  v_124: x12 + x37 -> x94; (k4*x37*x12 - kd4*x94)*60;
  v_125: x9 + x68 -> x94; (k5*x68*x9 - kd5*x94)*60;
  v_126: x25 + x59 -> x95; (k126/a/Vz*x59*x25 - kd126*x95)*60;
  v_127: x19 + x83 -> x96; (k126/a/Vz*x83*x19 - kd126*x96)*60;
  v_128: x35 + x59 -> x97; (k126/a/Vz*x59*x35 - kd126*x97)*60;
  v_129: x66 + x83 -> x98; (k126/a/Vz*x83*x66 - kd126*x98)*60;
  v_13: $ext -> x2; (k13*1*1 - kd13*x2)*60;
  v_130: x24 + x59 -> x101; (k126/a/Vz*x59*x24 - kd126*x101)*60;
  v_131: x24 + x83 -> x102; (k126/a/Vz*x83*x24 - kd126*x102)*60;
  v_132: x17 -> x87; (k60*x17*1 - kd60*x87)*60;
  v_133: x18 -> x87; (k60*x18*1 - kd60*x87)*60;
  v_134: x19 -> x87; (k60*x19*1 - kd60*x87)*60;
  v_135: x20 -> x87; (k60*x20*1 - kd60*x87)*60;
  v_136: x21 -> x87; (k60*x21*1 - kd60*x87)*60;
  v_137: x63 -> x87; (k60*x63*1 - kd60*x87)*60;
  v_138: x64 -> x87; (k60*x64*1 - kd60*x87)*60;
  v_139: x65 -> x87; (k60*x65*1 - kd60*x87)*60;
  v_14: x8 + x14 -> x17; (k8/a/Vz*x8*x14 - kd8*x17)*60;
  v_140: x66 -> x87; (k60*x66*1 - kd60*x87)*60;
  v_141: x67 -> x87; (k60*x67*1 - kd60*x87)*60;
  v_142: x68 -> x87; (k60*x68*1 - kd60*x87)*60;
  v_143: x59 + x99 -> x95; (k127*x59*x99 - kd127*x95)*60;
  v_144: x59 + x99 -> x97; (k127*x59*x99 - kd127*x97)*60;
  v_145: x59 + x103 -> x101; (k127*x59*x103 - kd127*x101)*60;
  v_146: x83 + x100 -> x96; (k127*x83*x100 - kd127*x96)*60;
  v_147: x83 + x100 -> x98; (k127*x83*x100 - kd127*x98)*60;
  v_148: x83 + x103 -> x102; (k127*x83*x103 - kd127*x102)*60;
  v_15: x9 -> x12; (k15*x9*1 - kd15*x12)*60;
  v_16: x15 + x22 -> x23; (k16/a/Vz*x22*x15 - kd63*x23)*60;
  v_17: x23 + x24 -> x25; (k17/a/Vz*x24*x23 - kd17*x25)*60;
  v_18: x25 + x26 -> x27; (k18/a/Vz*x26*x25 - kd18*x27)*60;
  v_19: x25 + x28 -> x27; (k19/a/Vz*x28*x25 - kd19*x27)*60;
  v_2: 2 x3 -> x4; (k2/a/Vs*x3*x3 - kd2*x4)*60;
  v_20: x25 + x43 -> x29; (k20/a/Vz*x25*x43 - kd20*x29)*60;
  v_21: x25 + x26 -> x29; (k21/a/Vz*x25*x26 - kd21*x29)*60;
  v_22: x15 + x31 -> x32; (k22/a/Vz*x31*x15 - kd22*x32)*60;
  v_23: x32 -> x33; (k23*x32*1 - kd23*x33)*60;
  v_24: x22 + x33 -> x34; (k16/a/Vz*x22*x33 - kd24*x34)*60;
  v_25: x24 + x34 -> x35; (k25/a/Vz*x24*x34 - kd25*x35)*60;
  v_26: x26 + x35 -> x36; (k18/a/Vz*x26*x35 - kd18*x36)*60;
  v_27: x28 + x35 -> x36; (k19/a/Vz*x35*x28 - kd19*x36)*60;
  v_28: x28 + x41 -> x42; (k28/a/Vz*x28*x41 - kd28*x42)*60;
  v_29: x43 + x45 -> x42; (k29/a/Vz*x43*x45 - kd29*x42)*60;
  v_3: x4 -> x5; (k3*x4*1 - kd3*x5)*60;
  v_30: x35 + x43 -> x37; (k20/a/Vz*x35*x43 - kd20*x37)*60;
  v_31: x26 + x35 -> x37; (k21/a/Vz*x35*x26 - kd21*x37)*60;
  v_32: x15 + x38 -> x35; (k32/a/Vz*x15*x38 - kd32*x35)*60;
  v_33: x30 + x40 -> x38; (k33/a/Vz*x40*x30 - kd33*x38)*60;
  v_34: x15 + x30 -> x25; (k34/a/Vz*x15*x30 - kd34*x25)*60;
  v_35: x22 + x24 -> x30; (k35/a/Vz*x24*x22 - kd35*x30)*60;
  v_36: x40 -> x31; (k36*x40*1 - kd36*x31)*60;
  v_37: x15 + x40 -> x33; (k37/a/Vz*x15*x40 - kd37*x33)*60;
  v_38: x22 + x40 -> x39; (k16/a/Vz*x22*x40 - kd24*x39)*60;
  v_39: x15 + x39 -> x34; (k37/a/Vz*x15*x39 - kd37*x34)*60;
  v_4: x12 + x23 -> x7; (k4*x23*x12 - kd4*x7)*60;
  v_40: x24 + x39 -> x38; (k40/a/Vz*x24*x39 - kd40*x38)*60;
  v_41: x30 + x33 -> x35; (k41/a/Vz*x30*x33 - kd41*x35)*60;
  v_42: x44 + x45 -> x46; (k42/a/Vz*x44*x45 - kd42*x46)*60;
  v_43: x41 + x44 -> x46; (k43*x41*x44 - kd43*x46)*60;
  v_44: x45 + x47 -> x48; (k44*x47*x45 - kd52*x48)*60;
  v_45: x45 + x49 -> x48; (k45*x49*x45 - kd45*x48)*60;
  v_46: x45 + x49 -> x50; (k44*x49*x45 - kd52*x50)*60;
  v_47: x45 + x51 -> x50; (k47*x51*x45 - kd47*x50)*60;
  v_48: x51 + x53 -> x52; (k48/a/Vz*x51*x53 - kd48*x52)*60;
  v_49: x49 + x53 -> x52; (k49*x49*x53 - kd49*x52)*60;
  v_5: x9 + x18 -> x7; (k5*x18*x9 - kd5*x7)*60;
  v_50: x49 + x53 -> x54; (k50/a/Vz*x53*x49 - kd50*x54)*60;
  v_51: x47 + x53 -> x54; (k49*x47*x53 - kd49*x54)*60;
  v_52: x51 + x55 -> x56; (k52*x55*x51 - kd44*x56)*60;
  v_53: x51 + x57 -> x56; (k53*x51*x57 - kd53*x56)*60;
  v_54: x51 + x57 -> x58; (k52*x51*x57 - kd44*x58)*60;
  v_55: x51 + x59 -> x58; (k55*x59*x51 - kd55*x58)*60;
  v_56: x59 + x60 -> x61; (k56/a/Vz*x59*x60 - kd56*x61)*60;
  v_57: x57 + x60 -> x61; (k57*x57*x60 - kd57*x61)*60;
  v_58: x57 + x60 -> x62; (k58/a/Vz*x60*x57 - kd58*x62)*60;
  v_59: x55 + x60 -> x62; (k57*x55*x60 - kd57*x62)*60;
  v_6: x2 -> x6; (k6*x2*1 - kd6*x6)*60;
  v_60: x6 -> x86; (k60*x6*1 - kd60*x86)*60;
  v_61: x16 -> x13; (k61*x16*1 - kd61*x13)*60;
  v_62: x8 -> x87; (k60*x8*1 - kd60*x87)*60;
  v_63: x17 + x22 -> x18; (k16/a/Vz*x17*x22 - kd63*x18)*60;
  v_64: x18 + x24 -> x19; (k17/a/Vz*x24*x18 - kd17*x19)*60;
  v_65: x19 + x26 -> x20; (k18/a/Vz*x26*x19 - kd18*x20)*60;
  v_66: x19 + x69 -> x20; (k19/a/Vz*x69*x19 - kd19*x20)*60;
  v_67: x19 + x71 -> x21; (k20/a/Vz*x71*x19 - kd20*x21)*60;
  v_68: x19 + x26 -> x21; (k21/a/Vz*x19*x26 - kd21*x21)*60;
  v_69: x17 + x31 -> x63; (k22/a/Vz*x31*x17 - kd22*x63)*60;
  v_7: x5 -> x8; (k6*x5*1 - kd6*x8)*60;
  v_70: x63 -> x64; (k23*x63*1 - kd23*x64)*60;
  v_71: x22 + x64 -> x65; (k16/a/Vz*x22*x64 - kd24*x65)*60;
  v_72: x24 + x65 -> x66; (k25/a/Vz*x24*x65 - kd25*x66)*60;
  v_73: x26 + x66 -> x67; (k18/a/Vz*x26*x66 - kd18*x67)*60;
  v_74: x66 + x69 -> x67; (k19/a/Vz*x66*x69 - kd19*x67)*60;
  v_75: x41 + x69 -> x70; (k28/a/Vz*x69*x41 - kd28*x70)*60;
  v_76: x71 + x72 -> x70; (k29/a/Vz*x71*x72 - kd29*x70)*60;
  v_77: x66 + x71 -> x68; (k20/a/Vz*x71*x66 - kd20*x68)*60;
  v_78: x26 + x66 -> x68; (k21/a/Vz*x66*x26 - kd21*x68)*60;
  v_79: x17 + x38 -> x66; (k32/a/Vz*x17*x38 - kd32*x66)*60;
  v_8: x5 + x14 -> x15; (k8/a/Vz*x5*x14 - kd8*x15)*60;
  v_80: x17 + x30 -> x19; (k34/a/Vz*x17*x30 - kd34*x19)*60;
  v_81: x17 + x40 -> x64; (k37/a/Vz*x17*x40 - kd37*x64)*60;
  v_82: x17 + x39 -> x65; (k37/a/Vz*x17*x39 - kd37*x65)*60;
  v_83: x30 + x64 -> x66; (k41/a/Vz*x30*x64 - kd41*x66)*60;
  v_84: x44 + x72 -> x73; (k42/a/Vz*x44*x72 - kd42*x73)*60;
  v_85: x41 + x44 -> x73; (k43*x41*x44 - kd43*x73)*60;
  v_86: x47 + x72 -> x74; (k44*x47*x72 - kd52*x74)*60;
  v_87: x72 + x75 -> x74; (k45*x75*x72 - kd45*x74)*60;
  v_88: x72 + x75 -> x76; (k44*x72*x75 - kd52*x76)*60;
  v_89: x72 + x77 -> x76; (k47*x72*x77 - kd47*x76)*60;
  v_9: x23 -> x18; (k6*x23*1 - kd6*x18)*60;
  v_90: x53 + x77 -> x78; (k48/a/Vz*x77*x53 - kd48*x78)*60;
  v_91: x53 + x75 -> x78; (k49*x75*x53 - kd49*x78)*60;
  v_92: x53 + x75 -> x79; (k50/a/Vz*x53*x75 - kd50*x79)*60;
  v_93: x47 + x53 -> x79; (k49*x47*x53 - kd49*x79)*60;
  v_94: x55 + x77 -> x80; (k52*x55*x77 - kd44*x80)*60;
  v_95: x77 + x81 -> x80; (k53*x81*x77 - kd53*x80)*60;
  v_96: x77 + x81 -> x82; (k52*x77*x81 - kd44*x82)*60;
  v_97: x77 + x83 -> x82; (k55*x83*x77 - kd55*x82)*60;
  v_98: x60 + x83 -> x84; (k56/a/Vz*x83*x60 - kd56*x84)*60;
  v_99: x60 + x81 -> x84; (k57*x81*x60 - kd57*x84)*60;

  // Unit definitions:
  unit moleculespercell = 1; moleculespercell is "molecules/cell";
  unit min = 60 second;
end
