// SBML level 2 version 4

model sen1()

  // Compartments:
  compartment unnamed = 1;  // isVersionOf BTO:0000757

  // Species:
  species $EtnE in unnamed = 0;  // isVersionOf CHEBI:16000
  species Ser in unnamed = 0;  // isVersionOf CHEBI:17822
  species $SerE in unnamed = 0.0001;  // substance in mole; isVersionOf CHEBI:17822
  species Cho in unnamed = 0;  // isVersionOf CHEBI:15354
  species PEtn in unnamed = 0;  // isVersionOf CHEBI:17553
  species Etn in unnamed = 0;  // isVersionOf CHEBI:16000
  species $ChoE in unnamed = 5e-5;  // substance in mole; isVersionOf CHEBI:15354
  species PCho in unnamed = 0;  // isVersionOf CHEBI:18132
  species PC in unnamed = 0;  // isVersionOf CHEBI:49183
  species PE in unnamed = 0;  // isVersionOf CHEBI:16038
  species PS in unnamed = 0;  // isVersionOf CHEBI:72738

  // Parameters:
  km5 = 0.0001222237;
  km6 = 0.0002038682;
  Vm9 = 0.001416783;
  Vm8 = 4.127884e-7;
  Vm4 = 8.62083e-6;
  km13 = 0.0002037771;
  km16 = 3.040726e-5;
  kf17 = 0.0005;
  km11 = 0.171123;
  km12 = 2.413084e-5;
  km9 = 0.3211254;
  Vm13 = 1.537542e-6;
  km4 = 0.0001086085;
  Vm11 = 8.990547e-5;
  Vm3 = 2.62039e-6;
  Vm2 = 1.305681e-6;
  km10 = 3.760852e-6;
  km2 = 0.0007967225;
  Vm12 = 1.566283e-6;
  km1 = 0.0003628943;
  Vm15 = 2.324327e-7;
  Vm5 = 1.078061e-6;
  Vm6 = 2.245185e-6;
  km8 = 3.104989e-5;
  Vm7 = 5.613527e-6;
  km14 = 0.1551646;
  Vm14 = 0.0007737527;
  km3 = 2.395912e-5;
  Vm1 = 3.409365e-6;
  km15 = 0.0001023269;
  Vm10 = 6.97333e-7;
  Vm16 = 5.556584e-7;
  kb17 = 0.0001328102;
  km7 = 0.0002273683;

  // Reactions:
  R11: PE => PS; Vm11*PE/(km11 + PE);
  R2: Ser => PS; Vm2*Ser/(km2 + Ser);
  R10: PC => PS; Vm10*PC/(km10 + PC);
  R16: Cho => PCho; Vm16*Cho/(km16 + Cho);
  R9: PE => PC; Vm9*PE/(km9 + PE);
  R3: Ser => Etn; Vm3*Ser/(km3 + Ser);
  R8: PCho => PC; Vm8*PCho/(km8 + PCho);
  R17: $EtnE -> Etn; kf17*EtnE - kb17*Etn;
  R4: Etn => PEtn; Vm4*Etn/(km4 + Etn);
  R1: $SerE => Ser; Vm1*SerE/(km1 + SerE);
  R15: $ChoE => Cho; Vm15*ChoE/(km15 + ChoE);
  R7: PEtn => PE; Vm7*PEtn/(km7 + PEtn);
  R5: PEtn => PCho; Vm5*PEtn/(km5 + PEtn);
  R6: PS => PE; Vm6*PS/(km6 + PS);
  R13: PS => ; Vm13*PS/(km13 + PS);
  R14: PE => ; Vm14*PS/(km14 + PS);  // modifiers: PS
  R12: PC => ; Vm12*PC/(km12 + PC);

  // Unit definitions:
  unit _1_per_minute = 0.01666667 dimensionless / second; _1_per_minute is "1/minute";
  unit mole_per_liter = 1000 dimensionless * mole / metre^3; mole_per_liter is "mole/liter";
  unit mole_per_liter_per_minute = 16.66667 dimensionless * mole / (second * metre^3); mole_per_liter_per_minute is "mole/liter/minute";
  unit liter = 1e-3 dimensionless * metre^3;
end
