// SBML level 2 version 4

model sengupta1()

  // Compartments:
  compartment mitochondria = 1 volume;
  compartment mit_inner_membrane = 1 volume;
  compartment IMS = 1 volume;
  compartment mit_outer_membrane = 1 volume;
  compartment default = 1 volume;

  // Species:
  species PEP in default = 17.4;
  species C14_Ketoacyl_CoA in mitochondria = 0; C14_Ketoacyl_CoA is "C14 Ketoacyl-CoA";
  species C12Acyl_CoA in mitochondria = 0; C12Acyl_CoA is "C12Acyl-CoA";
  species C10Acyl_CoA in mitochondria = 0; C10Acyl_CoA is "C10Acyl-CoA";
  species C12_Ketoacyl_CoA in mitochondria = 0; C12_Ketoacyl_CoA is "C12 Ketoacyl-CoA";
  species C12_L_3_hydroxyacyl_CoA in mitochondria = 0; C12_L_3_hydroxyacyl_CoA is "C12 L-3-hydroxyacyl-CoA";
  species C12_2_trans_enoyl_CoA in mitochondria = 0; C12_2_trans_enoyl_CoA is "C12 2-trans-enoyl-CoA";
  species C10_2_trans_enoyl_CoA in mitochondria = 0; C10_2_trans_enoyl_CoA is "C10 2-trans-enoyl-CoA";
  species C10_L_3_hydroxyacyl_CoA in mitochondria = 0; C10_L_3_hydroxyacyl_CoA is "C10 L-3-hydroxyacyl-CoA";
  species C10_Ketoacyl_CoA in mitochondria = 0; C10_Ketoacyl_CoA is "C10 Ketoacyl-CoA";
  species C8Acyl_CoA in mitochondria = 0; C8Acyl_CoA is "C8Acyl-CoA";
  species Pyruvate in default = 64;
  species C6Acyl_CoA in mitochondria = 0; C6Acyl_CoA is "C6Acyl-CoA";
  species C8_Ketoacyl_CoA in mitochondria = 0; C8_Ketoacyl_CoA is "C8 Ketoacyl-CoA";
  species C8_L_3_hydroxyacyl_CoA in mitochondria = 0; C8_L_3_hydroxyacyl_CoA is "C8 L-3-hydroxyacyl-CoA";
  species C8_2_trans_enoyl_CoA in mitochondria = 0; C8_2_trans_enoyl_CoA is "C8 2-trans-enoyl-CoA";
  species C6_2_trans_enoyl_CoA in mitochondria = 0; C6_2_trans_enoyl_CoA is "C6 2-trans-enoyl-CoA";
  species C6_L_3_hydroxyacyl_CoA in mitochondria = 0; C6_L_3_hydroxyacyl_CoA is "C6 L-3-hydroxyacyl-CoA";
  species C6_Ketoacyl_CoA in mitochondria = 0; C6_Ketoacyl_CoA is "C6 Ketoacyl-CoA";
  species C4Acyl_CoA in mitochondria = 0; C4Acyl_CoA is "C4Acyl-CoA";
  species C4_Ketoacyl_CoA in mitochondria = 0; C4_Ketoacyl_CoA is "C4 Ketoacyl-CoA";
  species Amino_acids in default = 0;
  species C4_L_3_hydroxyacyl_CoA in mitochondria = 0; C4_L_3_hydroxyacyl_CoA is "C4 L-3-hydroxyacyl-CoA";
  species C4_2_trans_enoyl_CoA in mitochondria = 0; C4_2_trans_enoyl_CoA is "C4 2-trans-enoyl-CoA";
  species CAC in mit_inner_membrane = 0;
  species Creatine in mit_outer_membrane = 36.7;
  species Creatine_phosphate in mitochondria = 33;
  species C22_AcylCoA_cyt in default = 0;
  species Carnitine_cyt in default = 43;
  species C22car_ims_IMS in IMS = 0;
  species C20_AcylCoA_cyt in default = 0;
  species C20car_ims_IMS in IMS = 0;
  species UDP_glucose4epimerase in default = 0;
  species C18_AcylCoA_cyt in default = 0;
  species C18car_ims_IMS in IMS = 0;
  species C16_AcylCoA_cyt in default = 0;
  species C16car_ims_IMS in IMS = 0;
  species C14_AcylCoA_cyt in default = 0;
  species C14car_ims_IMS in IMS = 0;
  species car_mat in mitochondria = 43;
  species Alanine in default = 333;
  species C22Acyl_CoA in mitochondria = 0; C22Acyl_CoA is "C22Acyl-CoA";
  species Hexokinase in default = 0;
  species Alpha_keto_acid in default = 0;
  species Glutaminase in mitochondria = 0;
  species _6PGDL in default = 0.00762;
  species _6PGluconate in default = 2720;
  species D_Ribulose5P in default = 1.58; D_Ribulose5P is "D-Ribulose5P";
  species NADPH in default = 51;
  species G6PDehydrogenase in default = 0;
  species Ribose5P in default = 13.2;
  species Xylulose5P in default = 0.43;
  species Lactonase in default = 0;
  species C22_2_trans_enoyl_CoA in mitochondria = 0; C22_2_trans_enoyl_CoA is "C22 2-trans-enoyl-CoA";
  species NAPDH in default = 51;
  species _6PGluconate_dehydrogenase in default = 0;
  species Phosphopentose_isomerase in default = 0;
  species Epimerase in default = 0;
  species G1P in default = 5;
  species Glycogen_Primer in default = 0;
  species Glycogen in default = 43.3;
  species UDP in default = 41;
  species Citrate in mitochondria = 190;
  species PPi_default in default = 1.8;
  species UDP_Glucose_Phosphorylase in default = 0;
  species Glycosyl_transferase in default = 0;
  species Alpha_KG_default in default = 8.9;
  species C22_L_3_hydroxyacyl_CoA in mitochondria = 0; C22_L_3_hydroxyacyl_CoA is "C22 L-3-hydroxyacyl-CoA";
  species Aspartate in mitochondria = 0;
  species G6P in default = 29.1;
  species CO2_default in default = 21600;
  species CoA_SH_default in default = 20; CoA_SH_default is "CoA-SH";
  species Aspartate_aminotransferase in mitochondria = 0;
  species GDP_default in default = 15;
  species Sedoheptulase7P in default = 0.89;
  species Erythrose4P in default = 1770;
  species Transaldolase in default = 0;
  species Phosphogluco_mutase in default = 0;
  species HCO3_NH4 in mitochondria = 24900; HCO3_NH4 is "HCO3-+ NH4+";
  species Glycosyl_4_6_Transferase in default = 0; Glycosyl_4_6_Transferase is "Glycosyl-4,6-Transferase";
  species Glycogen_phosphorylase in default = 0;
  species Limit_Dextrin in default = 0;
  species Unbranched_alpha_1_4_polymer in default = 0; Unbranched_alpha_1_4_polymer is "Unbranched alpha(1,4)polymer";
  species Alpha1_6_Glycosidase in default = 0; Alpha1_6_Glycosidase is "Alpha1,6-Glycosidase";
  species Glygogen_Phosphorylase in default = 0;
  species _1_2O2 in mitochondria = 3480; _1_2O2 is "1/2O2";
  species Cya_a3 in mit_inner_membrane = 0; Cya_a3 is "Cya-a3";
  species _2e in mit_inner_membrane = 0;
  species Succinate_dehydrogenase in mitochondria = 0;
  species CyC in mit_inner_membrane = 0;
  species CyC2 in mit_inner_membrane = 0;
  species Cyb in mit_inner_membrane = 0;
  species Q in mit_inner_membrane = 0;
  species FMN in mit_inner_membrane = 0.0075;
  species Fumarase in mitochondria = 0;
  species Malate_dehydrogenase in mitochondria = 0;
  species Sucrase in default = 0;
  species Sucrose in default = 1.8;
  species F1P in default = 0.17;
  species Fructose in default = 31;
  species Fructokinase in default = 0;
  species _2ATP in mitochondria = 2780;
  species Aldolase in default = 0;
  species Triglyceride in default = 43.2;
  species Glyceraldehyde in default = 1476;
  species Triokinase in default = 0;
  species Lactate in default = 740;
  species Trehalose in default = 0.056;
  species Trehalase in default = 0;
  species F6P in default = 10.2;
  species _2ADP in mitochondria = 320;
  species _2NADH in default = 44;
  species _2NAD in default = 48; _2NAD is "2NAD+";
  species Galactose1P in default = 31;
  species Galactokinase in default = 0;
  species Galactose in default = 88.3;
  species Lactose in default = 1.45;
  species s308 in default = 0; s308 is "UDP-galactose1phosphate uridylyl transferase";
  species F1_6BISPHOSPHATASE in default = 0; F1_6BISPHOSPHATASE is "F1,6BISPHOSPHATASE";
  species H20 in default = 55000000;
  species AcetoacetylCoA in mitochondria = 0;
  species HMGCoA in mitochondria = 0.25;
  species Acetoacetate in mitochondria = 21;
  species Acetone in mitochondria = 30;
  species D_Beta_Hydroxybutyrate in mitochondria = 36; D_Beta_Hydroxybutyrate is "D-Beta-Hydroxybutyrate";
  species AcetylCoA in mitochondria = 0;
  species HMG_CoA_Synthase in mitochondria = 0; HMG_CoA_Synthase is "HMG-CoA Synthase";
  species Acetoacetate_Decarboxylase in mitochondria = 0;
  species H_default in default = 0; H_default is "H+";
  species Carbamoyl_phosphate in mitochondria = 0;
  species s330 in mitochondria = 0; s330 is "D Betahydroxybutyrate dehydrogenase";
  species Beta_KetoacylCoA_dehydrogenase in mitochondria = 0; Beta_KetoacylCoA_dehydrogenase is "Beta-KetoacylCoA dehydrogenase";
  species Mg2_default in default = 850; Mg2_default is "Mg2+";
  species NADP in default = 0; NADP is "NADP+";
  species UDP_Glucose in default = 155; UDP_Glucose is "UDP-Glucose";
  species Glycogen_Synthase in default = 0;
  species Transketolase in default = 0;
  species Ornithine in mitochondria = 89;
  species Glutamine_mitochondria in mitochondria = 586;
  species Glutamate_mitochondria in mitochondria = 7.9;
  species Citrulline in mitochondria = 38;
  species Arginine in mitochondria = 99;
  species Pi_mitochondria in mitochondria = 379.1;
  species ATP_mitochondria in mitochondria = 1390;
  species ADP_mitochondria in mitochondria = 160;
  species H2O_mitochondria in mitochondria = 55000000;
  species A_CoA in mitochondria = 0;
  species CO2_mitochondria in mitochondria = 21600;
  species GA3P in default = 4.8;
  species CoA_SH_mitochondria in mitochondria = 20; CoA_SH_mitochondria is "CoA-SH";
  species s351 in mitochondria = 22; s351 is "NADH";
  species GDP_mitochondria in mitochondria = 15;
  species FADH2 in mitochondria = 0;
  species Aconitase in mitochondria = 0;
  species NAD_mitochondria in mitochondria = 24; NAD_mitochondria is "NAD+";
  species FAD in mitochondria = 0.075;
  species Mg2_mitochondria in mitochondria = 850; Mg2_mitochondria is "Mg2+";
  species _2H_mitochondria in mitochondria = 0; _2H_mitochondria is "2H+";
  species PHOSPHO_TRIOSE_ISOMERASE in default = 0;
  species H_mitochondria in mitochondria = 0; H_mitochondria is "H+";
  species Thiolase in mitochondria = 0;
  species PPi_mitochondria in mitochondria = 1.8;
  species Acyl_CoA_dehydrogenase in mitochondria = 0; Acyl_CoA_dehydrogenase is "Acyl-CoA dehydrogenase";
  species Enoyl_CoA_hydratase in mitochondria = 0; Enoyl_CoA_hydratase is "Enoyl-CoA hydratase";
  species s366 in mitochondria = 0; s366 is "Beta-hydroxyacyl-CoA dehydrogenase";
  species C22car_ims_mitochondria in mitochondria = 0;
  species C14car_ims_mitochondria in mitochondria = 0;
  species C16car_ims_mitochondria in mitochondria = 0;
  species C22_Ketoacyl_CoA in mitochondria = 0; C22_Ketoacyl_CoA is "C22 Ketoacyl-CoA";
  species C18car_ims_mitochondria in mitochondria = 0;
  species C20car_ims_mitochondria in mitochondria = 0;
  species FeS_mitochondria in mitochondria = 0;
  species FeS_mit_inner_membrane in mit_inner_membrane = 0;
  species Glutamine_default in default = 586;
  species Glutamate_default in default = 7.9;
  species Citrullyl_AMP_intermediate in mitochondria = 0;
  species s381 in mitochondria = 22; s381 is "NADH";
  species QH2 in mit_inner_membrane = 7.4;
  species _2H_IMS in IMS = 0; _2H_IMS is "2H+";
  species Arginosuccinate in mitochondria = 0.0032;
  species cis_Aconitate in mitochondria = 13; cis_Aconitate is "cis-Aconitate";
  species Fumarate in mitochondria = 1.5;
  species Creatine_Kinase in IMS = 0;
  species Carbamoyl_phosphate_synthetase_I in mitochondria = 0;
  species C20Acyl_CoA in mitochondria = 0; C20Acyl_CoA is "C20Acyl-CoA";
  species PGA_MUTASE in default = 0;
  species Pi_default in default = 379.1;
  species PYRUVATE_KINASE in default = 0;
  species ADP_default in default = 160;
  species AMP in mitochondria = 51;
  species GTP in default = 56;
  species UREA in mitochondria = 6500;
  species Alpha_KG_mitochondria in mitochondria = 0; Alpha_KG_mitochondria is "Alpha-KG";
  species OAA in mitochondria = 61;
  species Glycerol3P in default = 30;
  species Isocitrate in mitochondria = 6;
  species FA in default = 0;
  species Citrate_Synthase in mitochondria = 0;
  species Isocitrate_dehydrogenase in mitochondria = 0;
  species Alpha_KG_dehydrgenase_complex in mitochondria = 0; Alpha_KG_dehydrgenase_complex is "Alpha-KG dehydrgenase complex";
  species S_CoA_synthase in mitochondria = 0;
  species S_CoA in mitochondria = 20;
  species ATP_default in default = 1390;
  species H2O_default in default = 55000000;
  species C18Acyl_CoA in mitochondria = 0; C18Acyl_CoA is "C18Acyl-CoA";
  species C20_Ketoacyl_CoA in mitochondria = 0; C20_Ketoacyl_CoA is "C20 Ketoacyl-CoA";
  species NADH_default in default = 22;
  species C20_L_3_hydroxyacyl_CoA in mitochondria = 0; C20_L_3_hydroxyacyl_CoA is "C20 L-3-hydroxyacyl-CoA";
  species C20_2_trans_enoyl_CoA in mitochondria = 0; C20_2_trans_enoyl_CoA is "C20 2-trans-enoyl-CoA";
  species Succinate in mitochondria = 0;
  species C18_2_trans_enoyl_CoA in mitochondria = 0; C18_2_trans_enoyl_CoA is "C18 2-trans-enoyl-CoA";
  species Glucose in default = 4440;
  species C18_L_3_hydroxyacyl_CoA in mitochondria = 0; C18_L_3_hydroxyacyl_CoA is "C18 L-3-hydroxyacyl-CoA";
  species F1_6P in default = 1.2; F1_6P is "F1,6P";
  species _1_3_BiPGA in default = 0.4; _1_3_BiPGA is "1,3-BiPGA";
  species _2_PGA in default = 14; _2_PGA is "2-PGA";
  species G_6_P_Phosphatase in default = 0; G_6_P_Phosphatase is "G-6-P Phosphatase";
  species Phosphohexo_isomerase in default = 0;
  species _3_PGA in default = 47.2; _3_PGA is "3-PGA";
  species C18_Ketoacyl_CoA in mitochondria = 0; C18_Ketoacyl_CoA is "C18 Ketoacyl-CoA";
  species OXALOACETATE in default = 61;
  species DHAP in default = 15.6;
  species C16Acyl_CoA in mitochondria = 0; C16Acyl_CoA is "C16Acyl-CoA";
  species C14Acyl_CoA in mitochondria = 0; C14Acyl_CoA is "C14Acyl-CoA";
  species G3P_DEHYDROGENASE in default = 0;
  species PGA_KINASE in default = 0;
  species ENOLASE in default = 0;
  species PEP_CARBOXYKINASE in default = 0;
  species C16_Ketoacyl_CoA in mitochondria = 0; C16_Ketoacyl_CoA is "C16 Ketoacyl-CoA";
  species Malate in mitochondria = 3.2;
  species PYRUVATE_CARBOXYLASE in default = 0;
  species PYRUVATE_DEHYDROGENASE in mitochondria = 0;
  species Co_Ash in mitochondria = 20; Co_Ash is "Co-Ash";
  species NAD_default in default = 24; NAD_default is "NAD+";
  species TPP in mitochondria = 0.0032;
  species LIPOATE in mitochondria = 0.077;
  species C16_L_3_hydroxyacyl_CoA in mitochondria = 0; C16_L_3_hydroxyacyl_CoA is "C16 L-3-hydroxyacyl-CoA";
  species C16_2_trans_enoyl_CoA in mitochondria = 0; C16_2_trans_enoyl_CoA is "C16 2-trans-enoyl-CoA";
  species C14_2_trans_enoyl_CoA in mitochondria = 0; C14_2_trans_enoyl_CoA is "C14 2-trans-enoyl-CoA";
  species C14_L_3_hydroxyacyl_CoA in mitochondria = 0; C14_L_3_hydroxyacyl_CoA is "C14 L-3-hydroxyacyl-CoA";

  // Reactions:
  re1: Glutamine_default => Glutamine_mitochondria; Glutamine_default*re1_k2;
    re1_k2 = 1 substance; re1_k1 = 1 substance;
  re10: Citrulline => Citrulline; Citrulline*re10_k1;
    re10_k1 = 1 substance;
  re100: FADH2 => FADH2; FADH2*re100_k1;
    re100_k1 = 1 substance;
  re101: s351 => s381; s351*re101_k1;
    re101_k1 = 1 substance;
  re102: s351 => s381; s351*re102_k1;
    re102_k1 = 1 substance;
  re103: s351 => s381; s351*re103_k1;
    re103_k1 = 1 substance;
  re104: NAD_mitochondria => NAD_mitochondria; NAD_mitochondria*re104_k1;
    re104_k1 = 1 substance;
  re105: NAD_mitochondria => NAD_mitochondria; NAD_mitochondria*re105_k1;
    re105_k1 = 1 substance;
  re106: NAD_mitochondria => NAD_mitochondria; NAD_mitochondria*re106_k1;
    re106_k1 = 1 substance;
  re107: FAD => FAD; FAD*re107_k1;
    re107_k1 = 1 substance;
  re108: NAD_mitochondria => NAD_mitochondria; NAD_mitochondria*re108_k1;
    re108_k1 = 1 substance;
  re109: s351 => s381; s351*re109_k1;
    re109_k1 = 1 substance;
  re11: ATP_mitochondria + Citrulline => ADP_mitochondria + Citrullyl_AMP_intermediate; Citrulline*ATP_mitochondria*re11_k1;
    re11_k1 = 1 substance;
  re110: FAD + C22Acyl_CoA => FADH2 + C22_2_trans_enoyl_CoA; re110_v1*C22Acyl_CoA/(re110_k1 + C22Acyl_CoA);  // modifiers: Acyl_CoA_dehydrogenase
    re110_k1 = 3 substance; re110_v1 = 1 substance;
  re111: H2O_mitochondria + C22_2_trans_enoyl_CoA => C22_L_3_hydroxyacyl_CoA; re111_v1*C22_2_trans_enoyl_CoA/(re111_k1 + C22_2_trans_enoyl_CoA);  // modifiers: Enoyl_CoA_hydratase
    re111_k1 = 100 substance; re111_v1 = 1 substance;
  re112: NAD_mitochondria + C22_L_3_hydroxyacyl_CoA => H_mitochondria + s351 + C22_Ketoacyl_CoA; re112_v1*C22_L_3_hydroxyacyl_CoA/(re112_k1 + C22_L_3_hydroxyacyl_CoA);  // modifiers: s366
    re112_k1 = 34.5 substance; re112_v1 = 1 substance;
  re113: CoA_SH_mitochondria + C22_Ketoacyl_CoA => C20Acyl_CoA; re113_v1*C22_Ketoacyl_CoA/(re113_k1 + C22_Ketoacyl_CoA);  // modifiers: Thiolase
    re113_k1 = 16 substance; re113_v1 = 1 substance;
  re114: H2O_mitochondria + C20_2_trans_enoyl_CoA => C20_L_3_hydroxyacyl_CoA; re114_v1*C20_2_trans_enoyl_CoA/(re114_k1 + C20_2_trans_enoyl_CoA);  // modifiers: Enoyl_CoA_hydratase
    re114_k1 = 100 substance; re114_v1 = 1 substance;
  re115: NAD_mitochondria + C20_L_3_hydroxyacyl_CoA => H_mitochondria + s351 + C20_Ketoacyl_CoA; re115_v1*C20_L_3_hydroxyacyl_CoA/(re115_k1 + C20_L_3_hydroxyacyl_CoA);  // modifiers: s366
    re115_k1 = 34.5 substance; re115_v1 = 1 substance;
  re116: CoA_SH_mitochondria + C20_Ketoacyl_CoA => C18Acyl_CoA; re116_v1*C20_Ketoacyl_CoA/(re116_k1 + C20_Ketoacyl_CoA);  // modifiers: Thiolase
    re116_k1 = 16 substance; re116_v1 = 1 substance;
  re117: FAD + C20Acyl_CoA => FADH2 + C20_2_trans_enoyl_CoA; re117_v1*C20Acyl_CoA/(re117_k1 + C20Acyl_CoA);  // modifiers: Acyl_CoA_dehydrogenase
    re117_k1 = 3 substance; re117_v1 = 1 substance;
  re118: H2O_mitochondria + C18_2_trans_enoyl_CoA => C18_L_3_hydroxyacyl_CoA; re118_v1*C18_2_trans_enoyl_CoA/(re118_k1 + C18_2_trans_enoyl_CoA);  // modifiers: Enoyl_CoA_hydratase
    re118_k1 = 100 substance; re118_v1 = 1 substance;
  re119: NAD_mitochondria + C18_L_3_hydroxyacyl_CoA => H_mitochondria + s351 + C18_Ketoacyl_CoA; re119_v1*C18_L_3_hydroxyacyl_CoA/(re119_k1 + C18_L_3_hydroxyacyl_CoA);  // modifiers: s366
    re119_k1 = 34.5 substance; re119_v1 = 1 substance;
  re12: ATP_mitochondria + Aspartate + Citrullyl_AMP_intermediate => PPi_mitochondria + AMP + Arginosuccinate; Citrullyl_AMP_intermediate*Aspartate*ATP_mitochondria*re12_k1;
    re12_k1 = 1 substance;
  re120: CoA_SH_mitochondria + C18_Ketoacyl_CoA => C16Acyl_CoA; re120_v1*C18_Ketoacyl_CoA/(re120_k1 + C18_Ketoacyl_CoA);  // modifiers: Thiolase
    re120_k1 = 16 substance; re120_v1 = 1 substance;
  re121: H2O_mitochondria + C16_2_trans_enoyl_CoA => C16_L_3_hydroxyacyl_CoA; re121_v1*C16_2_trans_enoyl_CoA/(re121_k1 + C16_2_trans_enoyl_CoA);  // modifiers: Enoyl_CoA_hydratase
    re121_k1 = 100 substance; re121_v1 = 1 substance;
  re122: NAD_mitochondria + C16_L_3_hydroxyacyl_CoA => H_mitochondria + s351 + C16_Ketoacyl_CoA; re122_v1*C16_L_3_hydroxyacyl_CoA/(re122_k1 + C16_L_3_hydroxyacyl_CoA);  // modifiers: s366
    re122_k1 = 34.5 substance; re122_v1 = 1 substance;
  re123: CoA_SH_mitochondria + C16_Ketoacyl_CoA => C14Acyl_CoA; re123_v1*C16_Ketoacyl_CoA/(re123_k1 + C16_Ketoacyl_CoA);  // modifiers: Thiolase
    re123_k1 = 16 substance; re123_v1 = 1 substance;
  re124: FAD + C16Acyl_CoA => FADH2 + C16_2_trans_enoyl_CoA; re124_v1*C16Acyl_CoA/(re124_k1 + C16Acyl_CoA);  // modifiers: Acyl_CoA_dehydrogenase
    re124_k1 = 3 substance; re124_v1 = 1 substance;
  re125: FAD + C18Acyl_CoA => FADH2 + C18_2_trans_enoyl_CoA; re125_v1*C18Acyl_CoA/(re125_k1 + C18Acyl_CoA);  // modifiers: Acyl_CoA_dehydrogenase
    re125_k1 = 3 substance; re125_v1 = 1 substance;
  re126: H2O_mitochondria + C14_2_trans_enoyl_CoA => C14_L_3_hydroxyacyl_CoA; re126_v1*C14_2_trans_enoyl_CoA/(re126_k1 + C14_2_trans_enoyl_CoA);  // modifiers: Enoyl_CoA_hydratase
    re126_k1 = 100 substance; re126_v1 = 1 substance;
  re127: NAD_mitochondria + C14_L_3_hydroxyacyl_CoA => H_mitochondria + s351 + C14_Ketoacyl_CoA; re127_v1*C14_L_3_hydroxyacyl_CoA/(re127_k1 + C14_L_3_hydroxyacyl_CoA);  // modifiers: s366
    re127_k1 = 34.5 substance; re127_v1 = 1 substance;
  re128: CoA_SH_mitochondria + C14_Ketoacyl_CoA => C12Acyl_CoA; re128_v1*C14_Ketoacyl_CoA/(re128_k1 + C14_Ketoacyl_CoA);  // modifiers: Thiolase
    re128_k1 = 34.5 substance; re128_v1 = 1 substance;
  re129: H2O_mitochondria + C12_2_trans_enoyl_CoA => C12_L_3_hydroxyacyl_CoA; re129_v1*C12_2_trans_enoyl_CoA/(re129_k1 + C12_2_trans_enoyl_CoA);  // modifiers: Enoyl_CoA_hydratase
    re129_k1 = 100 substance; re129_v1 = 1 substance;
  re13: H2O_mitochondria + Arginine => UREA + Arginine; Arginine*H2O_mitochondria*re13_k1;
    re13_k1 = 1 substance;
  re130: NAD_mitochondria + C12_L_3_hydroxyacyl_CoA => H_mitochondria + s351 + C12_Ketoacyl_CoA; re130_v1*C12_L_3_hydroxyacyl_CoA/(re130_k1 + C12_L_3_hydroxyacyl_CoA);  // modifiers: s366
    re130_k1 = 34.5 substance; re130_v1 = 1 substance;
  re131: CoA_SH_mitochondria + C12_Ketoacyl_CoA => C10Acyl_CoA; re131_v1*C12_Ketoacyl_CoA/(re131_k1 + C12_Ketoacyl_CoA);  // modifiers: Thiolase
    re131_k1 = 16 substance; re131_v1 = 1 substance;
  re132: FAD + C12Acyl_CoA => FADH2 + C12_2_trans_enoyl_CoA; re132_v1*C12Acyl_CoA/(re132_k1 + C12Acyl_CoA);  // modifiers: Acyl_CoA_dehydrogenase
    re132_k1 = 3 substance; re132_v1 = 1 substance;
  re133: H2O_mitochondria + C10_2_trans_enoyl_CoA => C10_L_3_hydroxyacyl_CoA; re133_v1*C10_2_trans_enoyl_CoA/(re133_k1 + C10_2_trans_enoyl_CoA);  // modifiers: Enoyl_CoA_hydratase
    re133_k1 = 100 substance; re133_v1 = 1 substance;
  re134: NAD_mitochondria + C10_L_3_hydroxyacyl_CoA => H_mitochondria + s351 + C10_Ketoacyl_CoA; re134_v1*C10_L_3_hydroxyacyl_CoA/(re134_k1 + C10_L_3_hydroxyacyl_CoA);  // modifiers: s366
    re134_k1 = 34.5 substance; re134_v1 = 1 substance;
  re135: CoA_SH_mitochondria + C10_Ketoacyl_CoA => C8Acyl_CoA; re135_v1*C10_Ketoacyl_CoA/(re135_k1 + C10_Ketoacyl_CoA);  // modifiers: Thiolase
    re135_k1 = 16 substance; re135_v1 = 1 substance;
  re136: H2O_mitochondria + C8_2_trans_enoyl_CoA => C8_L_3_hydroxyacyl_CoA; re136_v1*C8_2_trans_enoyl_CoA/(re136_k1 + C8_2_trans_enoyl_CoA);  // modifiers: Enoyl_CoA_hydratase
    re136_k1 = 100 substance; re136_v1 = 1 substance;
  re137: NAD_mitochondria + C8_L_3_hydroxyacyl_CoA => H_mitochondria + s351 + C8_Ketoacyl_CoA; re137_v1*C8_L_3_hydroxyacyl_CoA/(re137_k1 + C8_L_3_hydroxyacyl_CoA);  // modifiers: s366
    re137_k1 = 34.5 substance; re137_v1 = 1 substance;
  re138: CoA_SH_mitochondria + C8_Ketoacyl_CoA => C6Acyl_CoA; v2*C8_Ketoacyl_CoA/(re138_k2 + C8_Ketoacyl_CoA);  // modifiers: Thiolase
    re138_k2 = 16 substance; v2 = 1 substance; re138_k1 = 16 substance; re138_v1 = 1 substance;
  re139: FAD + C8Acyl_CoA => FADH2 + C8_2_trans_enoyl_CoA; re139_v1*C8Acyl_CoA/(re139_k1 + C8Acyl_CoA);  // modifiers: Acyl_CoA_dehydrogenase
    re139_k1 = 3 substance; re139_v1 = 1 substance;
  re14: Arginine => Ornithine; Arginine*re14_k1;
    re14_k1 = 1 substance;
  re140: FAD + C10Acyl_CoA => FADH2 + C10_2_trans_enoyl_CoA; re140_v1*C10Acyl_CoA/(re140_k1 + C10Acyl_CoA);  // modifiers: Acyl_CoA_dehydrogenase
    re140_k1 = 3 substance; re140_v1 = 1 substance;
  re141: FAD + C14Acyl_CoA => FADH2 + C14_2_trans_enoyl_CoA; re141_v1*C14Acyl_CoA/(re141_k1 + C14Acyl_CoA);  // modifiers: Acyl_CoA_dehydrogenase
    re141_k1 = 3 substance; re141_v1 = 1 substance;
  re142: H2O_mitochondria + C6_2_trans_enoyl_CoA => C6_L_3_hydroxyacyl_CoA; re142_v1*C6_2_trans_enoyl_CoA/(re142_k1 + C6_2_trans_enoyl_CoA);  // modifiers: Enoyl_CoA_hydratase
    re142_k1 = 100 substance; re142_v1 = 1 substance;
  re143: NAD_mitochondria + C6_L_3_hydroxyacyl_CoA => H_mitochondria + s351 + C6_Ketoacyl_CoA; re143_v1*C6_L_3_hydroxyacyl_CoA/(re143_k1 + C6_L_3_hydroxyacyl_CoA);  // modifiers: s366
    re143_k1 = 34.5 substance; re143_v1 = 1 substance;
  re144: CoA_SH_mitochondria + C6_Ketoacyl_CoA => C4Acyl_CoA; re144_v1*C6_Ketoacyl_CoA/(re144_k1 + C6_Ketoacyl_CoA);  // modifiers: Thiolase
    re144_k1 = 16 substance; re144_v1 = 1 substance;
  re145: H2O_mitochondria + C4_2_trans_enoyl_CoA => C4_L_3_hydroxyacyl_CoA; re145_v1*C4_2_trans_enoyl_CoA/(re145_k1 + C4_2_trans_enoyl_CoA);  // modifiers: Enoyl_CoA_hydratase
    re145_k1 = 100 substance; re145_v1 = 1 substance;
  re146: NAD_mitochondria + C4_L_3_hydroxyacyl_CoA => H_mitochondria + s351 + C4_Ketoacyl_CoA; re146_v1*C4_L_3_hydroxyacyl_CoA/(re146_k1 + C4_L_3_hydroxyacyl_CoA);  // modifiers: s366
    re146_k1 = 34.5 substance; re146_v1 = 1 substance;
  re147: CoA_SH_mitochondria + C4_Ketoacyl_CoA => A_CoA; re147_v1*C4_Ketoacyl_CoA/(re147_k1 + C4_Ketoacyl_CoA);  // modifiers: Thiolase
    re147_k1 = 16 substance; re147_v1 = 1 substance;
  re148: FAD + C4Acyl_CoA => FADH2 + C4_2_trans_enoyl_CoA; re148_v1*C4Acyl_CoA/(re148_k1 + C4Acyl_CoA);  // modifiers: Acyl_CoA_dehydrogenase
    re148_k1 = 3 substance; re148_v1 = 1 substance;
  re149: FAD + C6Acyl_CoA => FADH2 + C6_2_trans_enoyl_CoA; re149_v1*C6Acyl_CoA/(re149_k1 + C6Acyl_CoA);  // modifiers: Acyl_CoA_dehydrogenase
    re149_k1 = 3 substance; re149_v1 = 1 substance;
  re15: H2O_mitochondria + OAA + CO2_mitochondria + A_CoA => CoA_SH_mitochondria + Citrate; re15_v1*A_CoA/(re15_k1 + A_CoA);  // modifiers: Citrate_Synthase
    re15_k1 = 0.11 substance; re15_v1 = 1 substance;
  re150: C22_Ketoacyl_CoA => A_CoA; C22_Ketoacyl_CoA*re150_k1;
    re150_k1 = 1 substance;
  re151: C20_Ketoacyl_CoA => A_CoA; C20_Ketoacyl_CoA*re151_k1;
    re151_k1 = 1 substance;
  re152: C6_Ketoacyl_CoA => A_CoA; C6_Ketoacyl_CoA*re152_k1;
    re152_k1 = 1 substance;
  re153: C18_Ketoacyl_CoA => A_CoA; C18_Ketoacyl_CoA*re153_k1;
    re153_k1 = 1 substance;
  re154: C8_Ketoacyl_CoA => A_CoA; C8_Ketoacyl_CoA*re154_k1;
    re154_k1 = 1 substance;
  re155: C10_Ketoacyl_CoA => A_CoA; C10_Ketoacyl_CoA*re155_k1;
    re155_k1 = 1 substance;
  re156: C16_Ketoacyl_CoA => A_CoA; C16_Ketoacyl_CoA*re156_k1;
    re156_k1 = 1 substance;
  re157: C14_Ketoacyl_CoA => A_CoA; C14_Ketoacyl_CoA*re157_k1;
    re157_k1 = 1 substance;
  re158: C12_Ketoacyl_CoA => A_CoA; C12_Ketoacyl_CoA*re158_k1;
    re158_k1 = 1 substance;
  re159: Carnitine_cyt + C22_AcylCoA_cyt => CoA_SH_default + C22car_ims_IMS; C22_AcylCoA_cyt*Carnitine_cyt*re159_k1;  // modifiers: Creatine
    re159_k1 = 1 substance;
  re16: Citrate -> H2O_mitochondria + cis_Aconitate; re16_v1*Citrate/(re16_k1 + Citrate);  // modifiers: Aconitase
    re16_k1 = 2900 substance; re16_v1 = 1 substance;
  re160: Carnitine_cyt + C20_AcylCoA_cyt => CoA_SH_default + C20car_ims_IMS; C20_AcylCoA_cyt*Carnitine_cyt*re160_k1;  // modifiers: Creatine
    re160_k1 = 1 substance;
  re161: Carnitine_cyt + C18_AcylCoA_cyt => CoA_SH_default + C18car_ims_IMS; C18_AcylCoA_cyt*Carnitine_cyt*re161_k1;  // modifiers: Creatine
    re161_k1 = 1 substance;
  re162: Carnitine_cyt + C16_AcylCoA_cyt => CoA_SH_default + C16car_ims_IMS; C16_AcylCoA_cyt*Carnitine_cyt*re162_k1;  // modifiers: Creatine
    re162_k1 = 1 substance;
  re163: Carnitine_cyt + C14_AcylCoA_cyt => CoA_SH_default + C14car_ims_IMS; C14_AcylCoA_cyt*Carnitine_cyt*re163_k1;  // modifiers: Creatine
    re163_k1 = 1 substance;
  re164: C22car_ims_IMS => C22car_ims_mitochondria; C22car_ims_IMS*re164_k1;  // modifiers: CAC
    re164_k1 = 1 substance;
  re165: C20car_ims_IMS => C20car_ims_mitochondria; C20car_ims_IMS*re165_k1;  // modifiers: CAC
    re165_k1 = 1 substance;
  re166: C18car_ims_IMS => C18car_ims_mitochondria; C18car_ims_IMS*re166_k1;  // modifiers: CAC
    re166_k1 = 1 substance;
  re167: C16car_ims_IMS => C16car_ims_mitochondria; C16car_ims_IMS*re167_k1;  // modifiers: CAC
    re167_k1 = 1 substance;
  re168: C14car_ims_IMS => C14car_ims_mitochondria; C14car_ims_IMS*re168_k1;  // modifiers: CAC
    re168_k1 = 1 substance;
  re169: C22car_ims_mitochondria => car_mat + C22Acyl_CoA; C22car_ims_mitochondria*re169_k1;  // modifiers: Creatine_phosphate
    re169_k1 = 1 substance;
  re17: H2O_mitochondria + cis_Aconitate -> Isocitrate; re17_v1*cis_Aconitate/(re17_k1 + cis_Aconitate);  // modifiers: Aconitase
    re17_k1 = 2900 substance; re17_v1 = 1 substance;
  re170: C20car_ims_mitochondria => car_mat + C20Acyl_CoA; C20car_ims_mitochondria*re170_k1;  // modifiers: Creatine_phosphate
    re170_k1 = 1 substance;
  re171: C18car_ims_mitochondria => car_mat + C18Acyl_CoA; C18car_ims_mitochondria*re171_k1;  // modifiers: Creatine_phosphate
    re171_k1 = 1 substance;
  re172: C16car_ims_mitochondria => car_mat + C16Acyl_CoA; C16car_ims_mitochondria*re172_k1;  // modifiers: Creatine_phosphate
    re172_k1 = 1 substance;
  re173: C14car_ims_mitochondria => car_mat + C14Acyl_CoA; C14car_ims_mitochondria*re173_k1;  // modifiers: Creatine_phosphate
    re173_k1 = 1 substance;
  re175: ATP_mitochondria + Creatine_phosphate => Creatine; re175_v1*Creatine_phosphate/(re175_k1 + Creatine_phosphate);  // modifiers: Creatine_Kinase
    re175_k1 = 1.16 substance; re175_v1 = 1 substance;
  re18: NAD_mitochondria + CoA_SH_mitochondria + Alpha_KG_mitochondria => H_mitochondria + s351 + CO2_mitochondria + S_CoA; re18_v1*Alpha_KG_mitochondria/(re18_k1 + Alpha_KG_mitochondria);  // modifiers: Alpha_KG_dehydrgenase_complex
    re18_k1 = 490 substance; re18_v1 = 1 substance;
  re182: Creatine => AMP + Creatine_phosphate; re182_v1*Creatine/(re182_k1 + Creatine);
    re182_k1 = 9.6 substance; re182_v1 = 1 substance;
  re19: GDP_mitochondria + S_CoA -> CoA_SH_mitochondria + ATP_mitochondria + Succinate; re19_v1*S_CoA/(re19_k1 + S_CoA);  // modifiers: S_CoA_synthase
    re19_k1 = 0.09 substance; re19_v1 = 1 substance;
  re2: Alpha_keto_acid + Amino_acids => Alpha_KG_default + Glutamate_default; Amino_acids*Alpha_keto_acid*re2_k1;
    re2_k1 = 1 substance;
  re20: FAD + Succinate -> FADH2 + Fumarate; re20_v1*Succinate/(re20_k1 + Succinate);  // modifiers: Succinate_dehydrogenase
    re20_k1 = 875 substance; re20_v1 = 1 substance;
  re21: H2O_mitochondria + Fumarate -> Malate; re21_v1*Fumarate/(re21_k1 + Fumarate);  // modifiers: Fumarase
    re21_k1 = 0.013 substance; re21_v1 = 1 substance;
  re22: NAD_mitochondria + Malate -> H_mitochondria + s351 + OAA; re22_v1*Malate/(re22_k1 + Malate);  // modifiers: Malate_dehydrogenase
    re22_k1 = 0.00038 substance; re22_v1 = 1 substance;
  re23: NAD_mitochondria + Isocitrate => H_mitochondria + s351 + CO2_mitochondria + Alpha_KG_mitochondria; re23_v1*Isocitrate/(re23_k1 + Isocitrate);  // modifiers: Isocitrate_dehydrogenase
    re23_k1 = 73 substance; re23_v1 = 1 substance;
  re24: Arginosuccinate => Fumarate + Arginine; Arginosuccinate*re24_k1;
    re24_k1 = 1 substance;
  re25: ATP_default + Glucose => ADP_default + G6P; re25_v1*Glucose/(re25_k1 + Glucose);  // modifiers: Hexokinase
    re25_k1 = 0.048 substance; re25_v1 = 1 substance;
  re26: G6P -> F6P; re26_v1*G6P/(re26_k1 + G6P);  // modifiers: Phosphohexo_isomerase
    re26_k1 = 0.000213 substance; re26_v1 = 1 substance;
  re27: ATP_default + F6P => ADP_default + F1_6P; F6P*ATP_default*re27_k1;
    re27_k1 = 1 substance;
  re28: ADP_default + _1_3_BiPGA => ATP_default + _3_PGA; re28_v1*_1_3_BiPGA/(re28_k1 + _1_3_BiPGA);  // modifiers: Mg2_default, PGA_KINASE
    re28_k1 = 300 substance; re28_v1 = 1 substance;
  re29: _3_PGA -> _2_PGA; re29_v1*_3_PGA/(re29_k1 + _3_PGA);  // modifiers: PGA_MUTASE
    re29_k1 = 0.1 substance; re29_v1 = 1 substance;
  re3: OAA + Glutamate_default => Aspartate + Glutamate_mitochondria; Glutamate_default*OAA*re3_k1;  // modifiers: Aspartate_aminotransferase
    re3_k1 = 1 substance;
  re30: _2_PGA => PEP; re30_v1*_2_PGA/(re30_k1 + _2_PGA);  // modifiers: ENOLASE
    re30_k1 = 300 substance; re30_v1 = 1 substance;
  re31: ADP_default + PEP => ATP_default + Pyruvate; re31_v1*PEP/(re31_k1 + PEP);  // modifiers: PYRUVATE_KINASE
    re31_k1 = 5.8 substance; re31_v1 = 1 substance;
  re32: H20 + G6P => Pi_default + Glucose; re32_v1*G6P/(re32_k1 + G6P);  // modifiers: G_6_P_Phosphatase
    re32_k1 = 2 substance; re32_v1 = 1 substance;
  re33: H2O_default + F1_6P => Pi_default + F6P; re33_v1*F1_6P/(re33_k1 + F1_6P);  // modifiers: F1_6BISPHOSPHATASE
    re33_k1 = 1.3 substance; re33_v1 = 1 substance;
  re34: ATP_default + Pyruvate => ADP_default + OXALOACETATE; re34_v1*Pyruvate/(re34_k1 + Pyruvate);  // modifiers: PYRUVATE_CARBOXYLASE
    re34_k1 = 0.11 substance; re34_v1 = 1 substance;
  re35: GDP_default + OXALOACETATE => GTP + PEP; re35_v1*OXALOACETATE/(re35_k1 + OXALOACETATE);  // modifiers: PEP_CARBOXYKINASE
    re35_k1 = 791 substance; re35_v1 = 1 substance;
  re36: ATP_default + _3_PGA => ADP_default + _1_3_BiPGA; _3_PGA*ATP_default*re36_k1;
    re36_k1 = 1 substance;
  re37: F1_6P -> GA3P; F1_6P*re37_k1;
    re37_k1 = 1 substance;
  re38: F1_6P -> DHAP; F1_6P*re38_k1;
    re38_k1 = 1 substance;
  re39: GA3P -> DHAP; re39_v1*GA3P/(re39_k1 + GA3P);  // modifiers: PHOSPHO_TRIOSE_ISOMERASE
    re39_k1 = 13.6 substance; re39_v1 = 1 substance;
  re4: Glutamine_mitochondria => Glutamate_mitochondria; re4_v1*Glutamine_mitochondria/(re4_k1 + Glutamine_mitochondria);  // modifiers: Glutaminase
    re4_k1 = 0.04 substance; re4_v1 = 1 substance;
  re40: NAD_default + Pi_default + GA3P => H_default + NADH_default + _1_3_BiPGA; GA3P*Pi_default*NAD_default*re40_k1;
    re40_k1 = 1 substance;
  re41: H_default + NADH_default + _1_3_BiPGA => NAD_default + Pi_default + GA3P; re41_v1*_1_3_BiPGA/(re41_k1 + _1_3_BiPGA);  // modifiers: G3P_DEHYDROGENASE
    re41_k1 = 33 substance; re41_v1 = 1 substance;
  re42: LIPOATE + FAD + NAD_mitochondria + Co_Ash + TPP + Pyruvate => H_mitochondria + s351 + A_CoA; re42_v1*Pyruvate/(re42_k1 + Pyruvate);  // modifiers: Mg2_mitochondria, PYRUVATE_DEHYDROGENASE
    re42_k1 = 40 substance; re42_v1 = 1 substance;
  re43: NADP + G6P => NADPH + _6PGDL; re43_v1*G6P/(re43_k1 + G6P);  // modifiers: Mg2_default, G6PDehydrogenase
    re43_k1 = 0.04 substance; re43_v1 = 1 substance;
  re44: H2O_default + _6PGDL => _6PGluconate; re44_v1*_6PGDL/(re44_k1 + _6PGDL);  // modifiers: Mg2_default, Lactonase
    re44_k1 = 18.2 substance; re44_v1 = 1 substance;
  re45: NADP + _6PGluconate => CO2_default + H_default + NAPDH + D_Ribulose5P; re45_v1*_6PGluconate/(re45_k1 + _6PGluconate);  // modifiers: _6PGluconate_dehydrogenase
    re45_k1 = 0.157 substance; re45_v1 = 1 substance;
  re46: D_Ribulose5P -> Ribose5P; re46_v1*D_Ribulose5P/(re46_k1 + D_Ribulose5P);  // modifiers: Phosphopentose_isomerase
    re46_k1 = 13.6 substance; re46_v1 = 1 substance;
  re47: Ribose5P -> Xylulose5P; re47_v1*Ribose5P/(re47_k1 + Ribose5P);  // modifiers: Epimerase
    re47_k1 = 140 substance; re47_v1 = 1 substance;
  re48: UDP + G1P => PPi_default + UDP_Glucose; re48_v1*G1P/(re48_k1 + G1P);  // modifiers: UDP_Glucose_Phosphorylase
    re48_k1 = 0.066 substance; re48_v1 = 1 substance;
  re49: UDP_Glucose => Glycogen_Primer; UDP_Glucose*re49_k1;
    re49_k1 = 1 substance;
  re5: Alpha_KG_default + Alanine => Alpha_keto_acid + Glutamate_default; Alanine*Alpha_KG_default*re5_k1;
    re5_k1 = 1 substance;
  re50: Glycogen_Primer => Glycogen; re50_v1*Glycogen_Primer/(re50_k1 + Glycogen_Primer);  // modifiers: Glycosyl_4_6_Transferase, Glycogen_Synthase, Glycosyl_transferase
    re50_k1 = 0.08 substance; re50_v1 = 1 substance;
  re51: Ribose5P + Xylulose5P => Sedoheptulase7P + GA3P; re51_v1*Xylulose5P/(re51_k1 + Xylulose5P);  // modifiers: Transketolase
    re51_k1 = 0.19 substance; re51_v1 = 1 substance;
  re52: Erythrose4P + Xylulose5P => GA3P + F6P; re52_v1*Xylulose5P/(re52_k1 + Xylulose5P);  // modifiers: Transketolase
    re52_k1 = 0.19 substance; re52_v1 = 1 substance;
  re53: Sedoheptulase7P + GA3P => Erythrose4P + F6P; re53_v1*GA3P/(re53_k1 + GA3P);  // modifiers: Transaldolase
    re53_k1 = 0.13 substance; re53_v1 = 1 substance;
  re54: G6P => G1P; re54_v1*G6P/(re54_k1 + G6P);  // modifiers: Phosphogluco_mutase
    re54_k1 = 0.045 substance; re54_v1 = 1 substance;
  re55: Glycogen => Limit_Dextrin + G1P; re55_v1*Glycogen/(re55_k1 + Glycogen);  // modifiers: Glycogen_phosphorylase
    re55_k1 = 0.1 substance; re55_v1 = 1 substance;
  re56: Limit_Dextrin => Glucose + Unbranched_alpha_1_4_polymer; re56_v1*Limit_Dextrin/(re56_k1 + Limit_Dextrin);  // modifiers: Alpha1_6_Glycosidase
    re56_k1 = 0.08 substance; re56_v1 = 1 substance;
  re57: ATP_default + Unbranched_alpha_1_4_polymer => ADP_default + G1P; re57_v1*Unbranched_alpha_1_4_polymer/(re57_k1 + Unbranched_alpha_1_4_polymer);  // modifiers: Glygogen_Phosphorylase
    re57_k1 = 0.1 substance; re57_v1 = 1 substance;
  re58: FMN => FeS_mit_inner_membrane; FMN*re58_k1;
    re58_k1 = 1 substance;
  re59: FADH2 + FeS_mit_inner_membrane => FAD + Q; FeS_mit_inner_membrane*FADH2*re59_k1;
    re59_k1 = 1 substance;
  re6: _2ATP + HCO3_NH4 => _2ADP + Carbamoyl_phosphate; re6_v1*HCO3_NH4/(re6_k1 + HCO3_NH4);  // modifiers: Carbamoyl_phosphate_synthetase_I
    re6_k1 = 13 substance; re6_v1 = 1 substance;
  re60: Q => QH2; Q*re60_k1;
    re60_k1 = 1 substance;
  re61: QH2 => Cyb; QH2*re61_k1;
    re61_k1 = 1 substance;
  re62: Cyb => FeS_mitochondria; Cyb*re62_k1;
    re62_k1 = 1 substance;
  re63: FeS_mitochondria => _2e; FeS_mitochondria*re63_k1;
    re63_k1 = 1 substance;
  re64: _2e => QH2; _2e*re64_k1;
    re64_k1 = 1 substance;
  re65: QH2 => CyC2; QH2*re65_k1;
    re65_k1 = 1 substance;
  re66: FeS_mit_inner_membrane => FeS_mit_inner_membrane; FeS_mit_inner_membrane*re66_k1;
    re66_k1 = 1 substance;
  re67: CyC2 => CyC; CyC2*re67_k1;
    re67_k1 = 1 substance;
  re68: CyC => Cya_a3; CyC*re68_k1;
    re68_k1 = 1 substance;
  re69: _2H_mitochondria => Q; _2H_mitochondria*re69_k1;
    re69_k1 = 1 substance;
  re7: Glutamine_mitochondria => HCO3_NH4; Glutamine_mitochondria*re7_k1;
    re7_k1 = 1 substance;
  re70: _1_2O2 => Cya_a3; _1_2O2*re70_k1;
    re70_k1 = 1 substance;
  re71: H2O_mitochondria => Cya_a3; H2O_mitochondria*re71_k1;
    re71_k1 = 1 substance;
  re72: FMN => _2H_IMS; FMN*re72_k1;
    re72_k1 = 1 substance;
  re73: QH2 => _2H_IMS; QH2*re73_k1;
    re73_k1 = 1 substance;
  re74: QH2 => _2H_IMS; QH2*re74_k1;
    re74_k1 = 1 substance;
  re75: _2H_mitochondria => _2e; _2H_mitochondria*re75_k1;
    re75_k1 = 1 substance;
  re76: _2H_mitochondria => Cya_a3; _2H_mitochondria*re76_k1;
    re76_k1 = 1 substance;
  re77: s381 => FMN; s381*re77_k1;
    re77_k1 = 1 substance;
  re78: FMN => NAD_mitochondria; FMN*re78_k1;
    re78_k1 = 1 substance;
  re79: ATP_default + Fructose => ADP_default + F1P; re79_v1*Fructose/(re79_k1 + Fructose);  // modifiers: Fructokinase
    re79_k1 = 0.58 substance; re79_v1 = 1 substance;
  re8: Glutamate_mitochondria => HCO3_NH4; Glutamate_mitochondria*re8_k1;
    re8_k1 = 1 substance;
  re80: H2O_default + Sucrose => Fructose + Glucose; re80_v1*Sucrose/(re80_k1 + Sucrose);  // modifiers: Sucrase
    re80_k1 = 10 substance; re80_v1 = 1 substance;
  re81: Glyceraldehyde => Glycerol3P; Glyceraldehyde*re81_k1;
    re81_k1 = 1 substance;
  re82: FA + Glycerol3P => Triglyceride; Glycerol3P*FA*re82_k1;
    re82_k1 = 1 substance;
  re83: F1P => Glyceraldehyde + DHAP; re83_v1*F1P/(re83_k1 + F1P);  // modifiers: Aldolase
    re83_k1 = 1.7 substance; re83_v1 = 1 substance;
  re84: ATP_default + Glyceraldehyde => ADP_default + GA3P; re84_v1*Glyceraldehyde/(re84_k1 + Glyceraldehyde);  // modifiers: Triokinase
    re84_k1 = 0.31 substance; re84_v1 = 1 substance;
  re85: NADH_default + Lactate => NAD_default + Glucose; Lactate*NADH_default*re85_k1;
    re85_k1 = 1 substance;
  re86: Pyruvate => Lactate; Pyruvate*re86_k1;
    re86_k1 = 1 substance;
  re87: H2O_default + Trehalose => Glucose; re87_v1*Trehalose/(re87_k1 + Trehalose);  // modifiers: Trehalase
    re87_k1 = 1.37 substance; re87_v1 = 1 substance;
  re88: ATP_default + Galactose => ADP_default + Galactose1P; re88_v1*Galactose/(re88_k1 + Galactose);  // modifiers: Mg2_default, Galactokinase
    re88_k1 = 970 substance; re88_v1 = 1 substance;
  re89: _2NAD + Galactose1P => H_default + _2NADH + UDP_Glucose; re89_v1*Galactose1P/(re89_k1 + Galactose1P);  // modifiers: UDP_glucose4epimerase
    re89_k1 = 0.069 substance; re89_v1 = 1 substance;
  re9: Carbamoyl_phosphate + Ornithine => Pi_mitochondria + Citrulline; Ornithine*Carbamoyl_phosphate*re9_k1;
    re9_k1 = 1 substance;
  re90: Lactose => Glucose + Galactose; Lactose*re90_k1;
    re90_k1 = 1 substance;
  re91: UDP_Glucose => G1P; re91_v1*UDP_Glucose/(re91_k1 + UDP_Glucose);  // modifiers: s308
    re91_k1 = 0.13 substance; re91_v1 = 1 substance;
  re92: H2O_mitochondria + AcetylCoA + AcetoacetylCoA => CoA_SH_mitochondria + HMGCoA; re92_v1*AcetoacetylCoA/(re92_k1 + AcetoacetylCoA);  // modifiers: HMG_CoA_Synthase
    re92_k1 = 294 substance; re92_v1 = 1 substance;
  re93: HMGCoA => A_CoA + Acetoacetate; HMGCoA*re93_k1;
    re93_k1 = 1 substance;
  re94: Acetoacetate => CO2_mitochondria + Acetone; re94_v1*Acetoacetate/(re94_k1 + Acetoacetate);  // modifiers: Acetoacetate_Decarboxylase
    re94_k1 = 1.28 substance; re94_v1 = 1 substance;
  re95: H_mitochondria + s351 + Acetoacetate -> NAD_mitochondria + D_Beta_Hydroxybutyrate; re95_v1*Acetoacetate/(re95_k1 + Acetoacetate);  // modifiers: s330
    re95_k1 = 12.6 substance; re95_v1 = 1 substance;
  re96: CoA_SH_mitochondria + AcetoacetylCoA => A_CoA; re96_v1*AcetoacetylCoA/(re96_k1 + AcetoacetylCoA);  // modifiers: Thiolase
    re96_k1 = 100 substance; re96_v1 = 1 substance;
  re97: A_CoA => CoA_SH_mitochondria + AcetoacetylCoA; re97_v1*A_CoA/(re97_k1 + A_CoA);  // modifiers: Thiolase
    re97_k1 = 16 substance; re97_v1 = 1 substance;
  re98: S_CoA + Acetoacetate => Succinate + AcetoacetylCoA; re98_v1*Acetoacetate/(re98_k1 + Acetoacetate);  // modifiers: Beta_KetoacylCoA_dehydrogenase
    re98_k1 = 18.7 substance; re98_v1 = 1 substance;
  re99: Pyruvate => Alanine; Pyruvate*re99_k1;
    re99_k1 = 1 substance;

  // Unit definitions:
  unit time = second;
  unit length = metre;
  unit area = metre^2;
  unit volume = litre;
  unit substance = mole;
end
