// SBML level 2 version 4

function Modified_Mass_Action(k1, Enzyme, Substrate1, Substrate2, k2, Product)
  k1*Enzyme*Substrate1*Substrate2 - k2*Product;
end

function Modified_Michaelis_Menten(k, Enzyme, Substrate, Km)
  k*Enzyme*Substrate/(Km + Substrate);
end

model sharp1()

  // Compartments:
  compartment compartment_1 = 1;  // isVersionOf GO:0005623

  // Species:
  species $CD14 in compartment_1 = 1;  // isVersionOf uniprot:P10810
  species $TRAF6 in compartment_1 = 1;  // isVersionOf uniprot:P70196
  species TRAF6_IRAK1_P in compartment_1 = 0; TRAF6_IRAK1_P is "TRAF6:IRAK1[P]";  // hasPart uniprot:Q62406 uniprot:P70196
  species $TAK1_TAB1_TAB2 in compartment_1 = 1; TAK1_TAB1_TAB2 is "TAK1:TAB1:TAB2";  // hasPart uniprot:Q9NYJ8 uniprot:Q8CF89 uniprot:P49117
  species TAK1_TAB1_TAB2_TRAF6 in compartment_1 = 0; TAK1_TAB1_TAB2_TRAF6 is "TAK1:TAB1:TAB2:TRAF6";  // hasPart uniprot:P70196 uniprot:Q9NYJ8 uniprot:Q8CF89 uniprot:P49117
  species IKK in compartment_1 = 0.1;  // isVersionOf uniprot:Q60680
  species IKK_P in compartment_1 = 0; IKK_P is "IKK[P]";  // isVersionOf kegg.compound:C00562 uniprot:Q60680
  species $RIP1 in compartment_1 = 1;  // isVersionOf uniprot:Q62172
  species $TRAM in compartment_1 = 1;  // isVersionOf uniprot:O09000
  species $TRIF in compartment_1 = 1;  // isVersionOf uniprot:Q80X56
  species IRF3 in compartment_1 = 1;  // isVersionOf uniprot:P70671
  species $IRAK4 in compartment_1 = 1;  // isVersionOf uniprot:Q8R4K2
  species IRF3_P in compartment_1 = 0; IRF3_P is "IRF3[P]";  // isVersionOf kegg.compound:C00562 uniprot:P70671
  species IRF3_P_nuc in compartment_1 = 0; IRF3_P_nuc is "IRF3[P](nuc)";  // isVersionOf GO:0005634 kegg.compound:C00562 uniprot:P70671
  species $source in compartment_1 = 1;
  species $sink in compartment_1 = 0;
  species TNFa in compartment_1 = 0;  // isVersionOf uniprot:P06804
  species $TNFR1 in compartment_1 = 1;  // isVersionOf uniprot:P25118
  species $TRADD in compartment_1 = 1;  // isVersionOf uniprot:Q3U0V2
  species $TRAF2 in compartment_1 = 1;  // isVersionOf uniprot:P39429
  species TNFa_TNFR1_TRAF2_TRADD_RIP1 in compartment_1 = 0; TNFa_TNFR1_TRAF2_TRADD_RIP1 is "TNFa:TNFR1:TRAF2:TRADD:RIP1";  // hasPart uniprot:P39429 uniprot:Q3U0V2 uniprot:P25118 uniprot:P06804
  species IkBa in compartment_1 = 0;  // isVersionOf uniprot:Q9Z1E3
  species $LBP in compartment_1 = 1;  // isVersionOf uniprot:Q61805
  species IkBa_NFkB in compartment_1 = 0; IkBa_NFkB is "IkBa:NFkB";  // hasPart uniprot:P25799 uniprot:Q9Z1E3
  species NFkB in compartment_1 = 0.1;  // isVersionOf uniprot:P25799
  species IKK_P_IkBa_NFkB in compartment_1 = 0; IKK_P_IkBa_NFkB is "IKK[P]:IkBa:NFkB";  // hasPart uniprot:Q60778 uniprot:Q9Z1E3 uniprot:Q60680
  species IkBb in compartment_1 = 0;  // isVersionOf uniprot:Q60778
  species IkBb_NFkB in compartment_1 = 0; IkBb_NFkB is "IkBb:NFkB";  // hasPart uniprot:Q60778 uniprot:P25799
  species IKK_P_IkBb_NFkB in compartment_1 = 0; IKK_P_IkBb_NFkB is "IKK[P]:IkBb:NFkB";  // hasPart uniprot:P25799 uniprot:Q60680
  species IkBe in compartment_1 = 0;  // isVersionOf uniprot:O54910
  species IkBe_NFkB in compartment_1 = 0; IkBe_NFkB is "IkBe:NFkB";  // hasPart uniprot:O54910 uniprot:P25799
  species IKK_P_IkBe_NFkB in compartment_1 = 0; IKK_P_IkBe_NFkB is "IKK[P]:IkBe:NFkB";  // hasPart uniprot:O54910 uniprot:P25799 uniprot:Q60680
  species NFkB_nuc in compartment_1 = 0; NFkB_nuc is "NFkB(nuc)";  // occursIn uniprot:P25799 GO:0005634
  species $LPS in compartment_1 = 1;  // isVersionOf CHEBI:16412
  species IkBa_nuc in compartment_1 = 0; IkBa_nuc is "IkBa(nuc)";  // isVersionOf GO:0005634 uniprot:Q9Z1E3
  species IkBa_NFkB_nuc in compartment_1 = 0; IkBa_NFkB_nuc is "IkBa:NFkB(nuc)";  // hasPart GO:0005634 uniprot:P25799 uniprot:Q9Z1E3
  species IkBb_nuc in compartment_1 = 0; IkBb_nuc is "IkBb(nuc)";  // isVersionOf GO:0005634 uniprot:Q60778
  species IkBb_NFkB_nuc in compartment_1 = 0; IkBb_NFkB_nuc is "IkBb:NFkB(nuc)";  // hasPart GO:0005634 uniprot:Q60778 uniprot:P25799
  species IkBe_nuc in compartment_1 = 0; IkBe_nuc is "IkBe(nuc)";  // isVersionOf GO:0005634 uniprot:O54910
  species IkBe_NFkB_nuc in compartment_1 = 0; IkBe_NFkB_nuc is "IkBe:NFkB(nuc)";  // hasPart GO:0005634 uniprot:O54910 uniprot:P25799
  species IkBa_mRNA in compartment_1 = 0;  // encodes uniprot:Q9Z1E3
  species IkBb_mRNA in compartment_1 = 0;  // encodes uniprot:Q60778
  species IkBe_mRNA in compartment_1 = 0;  // encodes uniprot:O54910
  species IKK_P_IkBa in compartment_1 = 0; IKK_P_IkBa is "IKK[P]:IkBa";  // hasPart uniprot:Q9Z1E3 uniprot:Q60680
  species species_5 in compartment_1 = 0; species_5 is "LPS:LBP:CD14:TLR4:TIRAP:MyD88:IRAK4";  // hasPart uniprot:P08571 uniprot:P22366 uniprot:Q99JY1 uniprot:Q9QUK6
  species IKK_P_IkBb in compartment_1 = 0; IKK_P_IkBb is "IKK[P]:IkBb";  // hasPart uniprot:Q60778 uniprot:Q60680
  species IKK_P_IkBe in compartment_1 = 0; IKK_P_IkBe is "IKK[P]:IkBe";  // hasPart uniprot:O54910 uniprot:Q60680
  species species_52 in compartment_1 = 0; species_52 is "LPS:LBP:CD14:TLR4:RIP1:TRAM:TRIF:TBK/IKKe";  // hasPart uniprot:Q62172 uniprot:O09000 uniprot:Q80X56 uniprot:Q9WUN2
  species $TBK1_IKKe in compartment_1 = 1; TBK1_IKKe is "TBK1/IKKe";  // hasPart uniprot:Q9R0T8 uniprot:Q9WUN2
  species $MyD88 in compartment_1 = 1;  // isVersionOf uniprot:P22366
  species $TIRAP in compartment_1 = 1;  // isVersionOf uniprot:Q99JY1
  species $TLR4 in compartment_1 = 1;  // isVersionOf uniprot:Q9QUK6
  species IRAK1 in compartment_1 = 1;  // isVersionOf uniprot:Q62406

  // Reactions:
  reaction_1: $TIRAP + $IRAK4 + $MyD88 + $TLR4 + $CD14 + $LBP + $LPS -> species_5; compartment_1*(reaction_1_k1*LPS*LBP*CD14*TLR4*MyD88*IRAK4*TIRAP - reaction_1_k2*species_5); reaction_1 is "MYD881) Receptor Complex Formation";
    reaction_1_k2 = 0.0001; reaction_1_k1 = 0.0001;
  TRIF05_Inducible_TNFa_Synthesis: 2 IRF3_P_nuc => 2 IRF3_P_nuc + TNFa; compartment_1*TRIF05_Inducible_TNFa_Synthesis_k1*IRF3_P_nuc^2; TRIF05_Inducible_TNFa_Synthesis is "TRIF05) Inducible TNFa Synthesis";
    TRIF05_Inducible_TNFa_Synthesis_k1 = 0.02;
  reaction_11: $source => TNFa; compartment_1*reaction_11_k1*source; reaction_11 is "TRIF06) Constitutive TNFa Synthesis";
    reaction_11_k1 = 0.001;
  TRIF09_TNFa_Degradation: TNFa => $sink; compartment_1*TRIF09_TNFa_Degradation_k1*TNFa; TRIF09_TNFa_Degradation is "TRIF09) TNFa Degradation";
    TRIF09_TNFa_Degradation_k1 = 0.1;
  reaction_13: $RIP1 + $TRADD + $TRAF2 + $TNFR1 + TNFa -> TNFa_TNFR1_TRAF2_TRADD_RIP1; compartment_1*(reaction_13_k1*TNFa*TNFR1*TRAF2*TRADD*RIP1 - reaction_13_k2*TNFa_TNFR1_TRAF2_TRADD_RIP1); reaction_13 is "TRIF10) TNFa Receptor Complex Formation";
    reaction_13_k2 = 0.1; reaction_13_k1 = 0.1;
  reaction_14: IKK => IKK_P; compartment_1*Modified_Michaelis_Menten(reaction_14_k, TNFa_TNFR1_TRAF2_TRADD_RIP1, IKK, reaction_14_Km); reaction_14 is "TRIF11) IKK Phosphorylation by RIP1";  // modifiers: TNFa_TNFR1_TRAF2_TRADD_RIP1
    reaction_14_Km = 0.1; reaction_14_k = 0.1;
  NFkB01_IkBa_NFkB_Binding: NFkB + IkBa -> IkBa_NFkB; compartment_1*(NFkB01_IkBa_NFkB_Binding_k1*IkBa*NFkB - NFkB01_IkBa_NFkB_Binding_k2*IkBa_NFkB); NFkB01_IkBa_NFkB_Binding is "NFkB01) IkBa:NFkB Binding";
    NFkB01_IkBa_NFkB_Binding_k2 = 0.0005; NFkB01_IkBa_NFkB_Binding_k1 = 0.5;
  NFkB02_IKK_IkBa_NFkB_Binding_1: IkBa_NFkB + IKK_P -> IKK_P_IkBa_NFkB; compartment_1*(NFkB02_IKK_IkBa_NFkB_Binding_1_k1*IKK_P*IkBa_NFkB - NFkB02_IKK_IkBa_NFkB_Binding_1_k2*IKK_P_IkBa_NFkB); NFkB02_IKK_IkBa_NFkB_Binding_1 is "NFkB02) IKK:IkBa:NFkB Binding (1)";
    NFkB02_IKK_IkBa_NFkB_Binding_1_k2 = 0.0125; NFkB02_IKK_IkBa_NFkB_Binding_1_k1 = 0.185;
  NFkB03_IkBb_NFkB_Binding: NFkB + IkBb -> IkBb_NFkB; compartment_1*(NFkB03_IkBb_NFkB_Binding_k1*IkBb*NFkB - NFkB03_IkBb_NFkB_Binding_k2*IkBb_NFkB); NFkB03_IkBb_NFkB_Binding is "NFkB03) IkBb:NFkB Binding";
    NFkB03_IkBb_NFkB_Binding_k2 = 0.0005; NFkB03_IkBb_NFkB_Binding_k1 = 0.5;
  NFkB04_IKK_IkBb_NFkB_Binding_1: IkBb_NFkB + IKK_P -> IKK_P_IkBb_NFkB; compartment_1*(NFkB04_IKK_IkBb_NFkB_Binding_1_k1*IKK_P*IkBb_NFkB - NFkB04_IKK_IkBb_NFkB_Binding_1_k2*IKK_P_IkBb_NFkB); NFkB04_IKK_IkBb_NFkB_Binding_1 is "NFkB04) IKK:IkBb:NFkB Binding (1)";
    NFkB04_IKK_IkBb_NFkB_Binding_1_k2 = 0.00175; NFkB04_IKK_IkBb_NFkB_Binding_1_k1 = 0.048;
  NFkB05_IkBe_NFkB_Binding: NFkB + IkBe -> IkBe_NFkB; compartment_1*(NFkB05_IkBe_NFkB_Binding_k1*IkBe*NFkB - NFkB05_IkBe_NFkB_Binding_k2*IkBe_NFkB); NFkB05_IkBe_NFkB_Binding is "NFkB05) IkBe:NFkB Binding";
    NFkB05_IkBe_NFkB_Binding_k2 = 0.0005; NFkB05_IkBe_NFkB_Binding_k1 = 0.5;
  reaction_2: $TRAF6 + IRAK1 -> TRAF6_IRAK1_P; compartment_1*Modified_Mass_Action(reaction_2_k1, species_5, IRAK1, TRAF6, reaction_2_k2, TRAF6_IRAK1_P); reaction_2 is "MYD882) IRAK1 and TRAF6 Phosphorylation";  // modifiers: species_5
    reaction_2_k2 = 0.001; reaction_2_k1 = 0.001;
  NFkB06_IKK_IkBe_NFkB_Binding_1: IkBe_NFkB + IKK_P -> IKK_P_IkBe_NFkB; compartment_1*(NFkB06_IKK_IkBe_NFkB_Binding_1_k1*IKK_P*IkBe_NFkB - NFkB06_IKK_IkBe_NFkB_Binding_1_k2*IKK_P_IkBe_NFkB); NFkB06_IKK_IkBe_NFkB_Binding_1 is "NFkB06) IKK:IkBe:NFkB Binding (1)";
    NFkB06_IKK_IkBe_NFkB_Binding_1_k2 = 0.00175; NFkB06_IKK_IkBe_NFkB_Binding_1_k1 = 0.07;
  NFkB07_IKK_IkBa_NFkB_Catalysis: IKK_P_IkBa_NFkB => NFkB + IKK_P; compartment_1*NFkB07_IKK_IkBa_NFkB_Catalysis_k1*IKK_P_IkBa_NFkB; NFkB07_IKK_IkBa_NFkB_Catalysis is "NFkB07) IKK:IkBa:NFkB Catalysis";
    NFkB07_IKK_IkBa_NFkB_Catalysis_k1 = 0.0204;
  NFkB08_IKK_IkBb_NFkB_Catalysis: IKK_P_IkBb_NFkB => NFkB + IKK_P; compartment_1*NFkB08_IKK_IkBb_NFkB_Catalysis_k1*IKK_P_IkBb_NFkB; NFkB08_IKK_IkBb_NFkB_Catalysis is "NFkB08) IKK:IkBb:NFkB Catalysis";
    NFkB08_IKK_IkBb_NFkB_Catalysis_k1 = 0.0075;
  NFkB09_IKK_IkBe_NFkB_Catalysis: IKK_P_IkBe_NFkB => NFkB + IKK_P; compartment_1*NFkB09_IKK_IkBe_NFkB_Catalysis_k1*IKK_P_IkBe_NFkB; NFkB09_IKK_IkBe_NFkB_Catalysis is "NFkB09) IKK:IkBe:NFkB Catalysis";
    NFkB09_IKK_IkBe_NFkB_Catalysis_k1 = 0.011;
  reaction_24: IkBa_NFkB => NFkB; compartment_1*reaction_24_k1*IkBa_NFkB; reaction_24 is "NFkB10) IkBa:NFkB Constitutive Degradation";
    reaction_24_k1 = 2.25e-5;
  reaction_25: IkBb_NFkB => NFkB; compartment_1*reaction_25_k1*IkBb_NFkB; reaction_25 is "NFkB11) IkBb:NFkB Constitutive Degradation";
    reaction_25_k1 = 2.25e-5;
  reaction_26: IkBe_NFkB => NFkB; compartment_1*reaction_26_k1*IkBe_NFkB; reaction_26 is "NFkB12) IkBe:NFkB Constitutive Degradation";
    reaction_26_k1 = 2.25e-5;
  reaction_27: NFkB -> NFkB_nuc; compartment_1*(reaction_27_k1*NFkB - reaction_27_k2*NFkB_nuc); reaction_27 is "NFkB13) NFkB Nuclear Import/Export";
    reaction_27_k2 = 8e-5; reaction_27_k1 = 0.09;
  NFkB14_Nuclear_IkBa_NFkB_Binding: NFkB_nuc + IkBa_nuc -> IkBa_NFkB_nuc; compartment_1*(NFkB14_Nuclear_IkBa_NFkB_Binding_k1*IkBa_nuc*NFkB_nuc - NFkB14_Nuclear_IkBa_NFkB_Binding_k2*IkBa_NFkB_nuc); NFkB14_Nuclear_IkBa_NFkB_Binding is "NFkB14) Nuclear IkBa:NFkB Binding";
    NFkB14_Nuclear_IkBa_NFkB_Binding_k2 = 0.0005; NFkB14_Nuclear_IkBa_NFkB_Binding_k1 = 0.5;
  NFkB15_Nuclear_IkBb_NFkB_Binding: NFkB_nuc + IkBb_nuc -> IkBb_NFkB_nuc; compartment_1*(NFkB15_Nuclear_IkBb_NFkB_Binding_k1*IkBb_nuc*NFkB_nuc - NFkB15_Nuclear_IkBb_NFkB_Binding_k2*IkBb_NFkB_nuc); NFkB15_Nuclear_IkBb_NFkB_Binding is "NFkB15) Nuclear IkBb:NFkB Binding";
    NFkB15_Nuclear_IkBb_NFkB_Binding_k2 = 0.0005; NFkB15_Nuclear_IkBb_NFkB_Binding_k1 = 0.5;
  MYD883_TAK_TAB_Binds_to_TRAF6: $TAK1_TAB1_TAB2 + TRAF6_IRAK1_P -> TAK1_TAB1_TAB2_TRAF6; compartment_1*(MYD883_TAK_TAB_Binds_to_TRAF6_k1*TRAF6_IRAK1_P*TAK1_TAB1_TAB2 - MYD883_TAK_TAB_Binds_to_TRAF6_k2*TAK1_TAB1_TAB2_TRAF6); MYD883_TAK_TAB_Binds_to_TRAF6 is "MYD883) TAK/TAB Binds to TRAF6";
    MYD883_TAK_TAB_Binds_to_TRAF6_k2 = 0.01; MYD883_TAK_TAB_Binds_to_TRAF6_k1 = 0.003;
  NFkB16_Nuclear_IkBe_NFkB_Binding: NFkB_nuc + IkBe_nuc -> IkBe_NFkB_nuc; compartment_1*(NFkB16_Nuclear_IkBe_NFkB_Binding_k1*IkBe_nuc*NFkB_nuc - NFkB16_Nuclear_IkBe_NFkB_Binding_k2*IkBe_NFkB_nuc); NFkB16_Nuclear_IkBe_NFkB_Binding is "NFkB16) Nuclear IkBe:NFkB Binding";
    NFkB16_Nuclear_IkBe_NFkB_Binding_k2 = 0.0005; NFkB16_Nuclear_IkBe_NFkB_Binding_k1 = 0.5;
  reaction_31: $source => IkBa_mRNA; compartment_1*reaction_31_k1*source; reaction_31 is "NFkB17) Constitutive IkBa mRNA Synthesis";
    reaction_31_k1 = 1.54e-6;
  reaction_32: 2 NFkB_nuc => 2 NFkB_nuc + IkBa_mRNA; compartment_1*reaction_32_k1*NFkB_nuc^2; reaction_32 is "NFkB18) Inducible IkBa mRNA Synthesis";
    reaction_32_k1 = 0.0165;
  NFkB19_IkBa_mRNA_degradation: IkBa_mRNA => $sink; compartment_1*NFkB19_IkBa_mRNA_degradation_k1*IkBa_mRNA; NFkB19_IkBa_mRNA_degradation is "NFkB19) IkBa mRNA degradation";
    NFkB19_IkBa_mRNA_degradation_k1 = 0.00028;
  reaction_34: $source => IkBb_mRNA; compartment_1*reaction_34_k1*source; reaction_34 is "NFkB20) Constitutive IkBb mRNA Synthesis";
    reaction_34_k1 = 1.78e-7;
  NFkB21_IkBb_mRNA_degradation: IkBb_mRNA => $sink; compartment_1*NFkB21_IkBb_mRNA_degradation_k1*IkBb_mRNA; NFkB21_IkBb_mRNA_degradation is "NFkB21) IkBb mRNA degradation";
    NFkB21_IkBb_mRNA_degradation_k1 = 0.00028;
  reaction_36: $source => IkBe_mRNA; compartment_1*reaction_36_k1*source; reaction_36 is "NFkB22) Constitutive IkBe mRNA Synthesis";
    reaction_36_k1 = 1.27e-7;
  NFkB23_IkBe_mRNA_degradation: IkBe_mRNA => $sink; compartment_1*NFkB23_IkBe_mRNA_degradation_k1*IkBe_mRNA; NFkB23_IkBe_mRNA_degradation is "NFkB23) IkBe mRNA degradation";
    NFkB23_IkBe_mRNA_degradation_k1 = 0.00028;
  NFkB24_IKK_IkBa_Binding: IkBa + IKK_P -> IKK_P_IkBa; compartment_1*(NFkB24_IKK_IkBa_Binding_k1*IKK_P*IkBa - NFkB24_IKK_IkBa_Binding_k2*IKK_P_IkBa); NFkB24_IKK_IkBa_Binding is "NFkB24) IKK:IkBa Binding";
    NFkB24_IKK_IkBa_Binding_k2 = 0.00125; NFkB24_IKK_IkBa_Binding_k1 = 0.0225;
  NFkB25_IkBa_Translation: IkBa_mRNA => IkBa_mRNA + IkBa; compartment_1*NFkB25_IkBa_Translation_k1*IkBa_mRNA; NFkB25_IkBa_Translation is "NFkB25) IkBa Translation";
    NFkB25_IkBa_Translation_k1 = 0.00408;
  reaction_4: IKK => IKK_P; compartment_1*Modified_Michaelis_Menten(reaction_4_k, TAK1_TAB1_TAB2_TRAF6, IKK, reaction_4_Km); reaction_4 is "MYD884) IKK Phosphorylation by TAK1";  // modifiers: TAK1_TAB1_TAB2_TRAF6
    reaction_4_Km = 0.1; reaction_4_k = 0.1;
  NFkB26_IkBa_Degradation: IkBa => $sink; compartment_1*NFkB26_IkBa_Degradation_k1*IkBa; NFkB26_IkBa_Degradation is "NFkB26) IkBa Degradation";
    NFkB26_IkBa_Degradation_k1 = 0.000113;
  reaction_41: IkBa -> IkBa_nuc; compartment_1*(reaction_41_k1*IkBa - reaction_41_k2*IkBa_nuc); reaction_41 is "NFkB27) IkBa Nuclear Import/Export";
    reaction_41_k2 = 0.0002; reaction_41_k1 = 0.0003;
  NFkB28_IKK_IkBb_Binding: IkBb + IKK_P -> IKK_P_IkBb; compartment_1*(NFkB28_IKK_IkBb_Binding_k1*IKK_P*IkBb - NFkB28_IKK_IkBb_Binding_k2*IKK_P_IkBb); NFkB28_IKK_IkBb_Binding is "NFkB28) IKK:IkBb Binding";
    NFkB28_IKK_IkBb_Binding_k2 = 0.00175; NFkB28_IKK_IkBb_Binding_k1 = 0.006;
  NFkB29_IkBb_Translation: IkBb_mRNA => IkBb_mRNA + IkBb; compartment_1*NFkB29_IkBb_Translation_k1*IkBb_mRNA; NFkB29_IkBb_Translation is "NFkB29) IkBb Translation";
    NFkB29_IkBb_Translation_k1 = 0.00408;
  NFkB30_IkBb_Degradation: IkBb => $sink; compartment_1*NFkB30_IkBb_Degradation_k1*IkBb; NFkB30_IkBb_Degradation is "NFkB30) IkBb Degradation";
    NFkB30_IkBb_Degradation_k1 = 0.000113;
  reaction_45: IkBb -> IkBb_nuc; compartment_1*(reaction_45_k1*IkBb - reaction_45_k2*IkBb_nuc); reaction_45 is "NFkB31) IkBb Nuclear Import/Export";
    reaction_45_k2 = 0.0001; reaction_45_k1 = 0.00015;
  NFkB32_IKK_IkBe_Binding: IkBe + IKK_P -> IKK_P_IkBe; compartment_1*(NFkB32_IKK_IkBe_Binding_k1*IKK_P*IkBe - NFkB32_IKK_IkBe_Binding_k2*IKK_P_IkBe); NFkB32_IKK_IkBe_Binding is "NFkB32) IKK:IkBe Binding";
    NFkB32_IKK_IkBe_Binding_k2 = 0.00175; NFkB32_IKK_IkBe_Binding_k1 = 0.009;
  NFkB33_IkBe_Translation: IkBe_mRNA => IkBe_mRNA + IkBe; compartment_1*NFkB33_IkBe_Translation_k1*IkBe_mRNA; NFkB33_IkBe_Translation is "NFkB33) IkBe Translation";
    NFkB33_IkBe_Translation_k1 = 0.00408;
  NFkB34_IkBe_Degradation: IkBe => $sink; compartment_1*NFkB34_IkBe_Degradation_k1*IkBe; NFkB34_IkBe_Degradation is "NFkB34) IkBe Degradation";
    NFkB34_IkBe_Degradation_k1 = 0.000113;
  reaction_49: IkBe -> IkBe_nuc; compartment_1*(reaction_49_k1*IkBe - reaction_49_k2*IkBe_nuc); reaction_49 is "NFkB35) IkBe Nuclear Import/Export";
    reaction_49_k2 = 0.0001; reaction_49_k1 = 0.00015;
  MYD885_IKK_P_Dephosphorylation: IKK_P => IKK; compartment_1*MYD885_IKK_P_Dephosphorylation_k1*IKK_P; MYD885_IKK_P_Dephosphorylation is "MYD885) IKK[P] Dephosphorylation";
    MYD885_IKK_P_Dephosphorylation_k1 = 0.1;
  NFkB36_IKK_IkBa_NFkB_Binding_2: NFkB + IKK_P_IkBa -> IKK_P_IkBa_NFkB; compartment_1*(NFkB36_IKK_IkBa_NFkB_Binding_2_k1*IKK_P_IkBa*NFkB - NFkB36_IKK_IkBa_NFkB_Binding_2_k2*IKK_P_IkBa_NFkB); NFkB36_IKK_IkBa_NFkB_Binding_2 is "NFkB36) IKK:IkBa:NFkB Binding (2)";
    NFkB36_IKK_IkBa_NFkB_Binding_2_k2 = 0.0005; NFkB36_IKK_IkBa_NFkB_Binding_2_k1 = 0.5;
  NFkB37_IkBa_NFkB_Nuclear_Export: IkBa_NFkB_nuc => IkBa_NFkB; compartment_1*NFkB37_IkBa_NFkB_Nuclear_Export_k1*IkBa_NFkB_nuc; NFkB37_IkBa_NFkB_Nuclear_Export is "NFkB37) IkBa:NFkB Nuclear Export";
    NFkB37_IkBa_NFkB_Nuclear_Export_k1 = 0.0138;
  NFkB38_IKK_IkBb_NFkB_Binding_2: NFkB + IKK_P_IkBb -> IKK_P_IkBb_NFkB; compartment_1*(NFkB38_IKK_IkBb_NFkB_Binding_2_k1*IKK_P_IkBb*NFkB - NFkB38_IKK_IkBb_NFkB_Binding_2_k2*IKK_P_IkBb_NFkB); NFkB38_IKK_IkBb_NFkB_Binding_2 is "NFkB38) IKK:IkBb:NFkB Binding (2)";
    NFkB38_IKK_IkBb_NFkB_Binding_2_k2 = 0.0005; NFkB38_IKK_IkBb_NFkB_Binding_2_k1 = 0.5;
  NFkB39_IkBb_NFkB_Nuclear_Export: IkBb_NFkB_nuc => IkBb_NFkB; compartment_1*NFkB39_IkBb_NFkB_Nuclear_Export_k1*IkBb_NFkB_nuc; NFkB39_IkBb_NFkB_Nuclear_Export is "NFkB39) IkBb:NFkB Nuclear Export";
    NFkB39_IkBb_NFkB_Nuclear_Export_k1 = 0.0052;
  NFkB40_IKK_IkBe_NFkB_Binding_2: NFkB + IKK_P_IkBe -> IKK_P_IkBe_NFkB; compartment_1*(NFkB40_IKK_IkBe_NFkB_Binding_2_k1*IKK_P_IkBe*NFkB - NFkB40_IKK_IkBe_NFkB_Binding_2_k2*IKK_P_IkBe_NFkB); NFkB40_IKK_IkBe_NFkB_Binding_2 is "NFkB40) IKK:IkBe:NFkB Binding (2)";
    NFkB40_IKK_IkBe_NFkB_Binding_2_k2 = 0.0005; NFkB40_IKK_IkBe_NFkB_Binding_2_k1 = 0.5;
  NFkB41_IkBe_NFkB_Nuclear_Export: IkBe_NFkB_nuc => IkBe_NFkB; compartment_1*NFkB41_IkBe_NFkB_Nuclear_Export_k1*IkBe_NFkB_nuc; NFkB41_IkBe_NFkB_Nuclear_Export is "NFkB41) IkBe:NFkB Nuclear Export";
    NFkB41_IkBe_NFkB_Nuclear_Export_k1 = 0.0052;
  NFkB42_IKK_IkBa_Catalysis: IKK_P_IkBa => IKK_P; compartment_1*NFkB42_IKK_IkBa_Catalysis_k1*IKK_P_IkBa; NFkB42_IKK_IkBa_Catalysis is "NFkB42) IKK:IkBa Catalysis";
    NFkB42_IKK_IkBa_Catalysis_k1 = 0.00407;
  NFkB43_IKK_IkBb_Catalysis: IKK_P_IkBb => IKK_P; compartment_1*NFkB43_IKK_IkBb_Catalysis_k1*IKK_P_IkBb; NFkB43_IKK_IkBb_Catalysis is "NFkB43) IKK:IkBb Catalysis";
    NFkB43_IKK_IkBb_Catalysis_k1 = 0.0015;
  NFkB44_IKK_IkBe_Catalysis: IKK_P_IkBe => IKK_P; compartment_1*NFkB44_IKK_IkBe_Catalysis_k1*IKK_P_IkBe; NFkB44_IKK_IkBe_Catalysis is "NFkB44) IKK:IkBe Catalysis";
    NFkB44_IKK_IkBe_Catalysis_k1 = 0.0022;
  reaction_59: 2 NFkB_nuc => 2 NFkB_nuc + TNFa; compartment_1*reaction_59_k1*NFkB_nuc^2; reaction_59 is "TRIF06a)Inducible TNFa Synthesis by NFkB";
    reaction_59_k1 = 0.001;
  reaction_6: $TBK1_IKKe + $RIP1 + $TRAM + $TRIF + $TLR4 + $CD14 + $LBP + $LPS -> species_52; compartment_1*(reaction_6_k1*LPS*LBP*CD14*TLR4*TRIF*TRAM*RIP1*TBK1_IKKe - reaction_6_k2*species_52); reaction_6 is "TRIF01) Receptor Complex Formation";
    reaction_6_k2 = 0.0001; reaction_6_k1 = 0.0001;
  TRIF02_IRF3_Phosphorylation: IRF3 => IRF3_P; compartment_1*Modified_Michaelis_Menten(TRIF02_IRF3_Phosphorylation_k, species_52, IRF3, TRIF02_IRF3_Phosphorylation_Km); TRIF02_IRF3_Phosphorylation is "TRIF02) IRF3 Phosphorylation";  // modifiers: species_52
    TRIF02_IRF3_Phosphorylation_Km = 0.1; TRIF02_IRF3_Phosphorylation_k = 0.1;
  TRIF03_IRF3_Dephosphorylation: IRF3_P => IRF3; compartment_1*TRIF03_IRF3_Dephosphorylation_k1*IRF3_P; TRIF03_IRF3_Dephosphorylation is "TRIF03) IRF3 Dephosphorylation";
    TRIF03_IRF3_Dephosphorylation_k1 = 0.1;
  reaction_9: IRF3_P -> IRF3_P_nuc; compartment_1*(reaction_9_k1*IRF3_P - reaction_9_k2*IRF3_P_nuc); reaction_9 is "TRIF04) IRF3 Nuclear Import/Export";
    reaction_9_k2 = 0.1; reaction_9_k1 = 0.1;

  // Unit definitions:
  unit substance = 1e-6 mole;
  unit volume = 1e-3 litre;
end
