// SBML level 3 version 1

model shen2()

  // Compartments:
  compartment default = 1;

  // Species:
  species KDX in default = 0;  // kegg.compound:C03826 CHEBI:1060
  species KG in default = 0;  // CHEBI:30915 kegg.compound:C00026
  species KGSA in default = 0;  // CHEBI:17415 kegg.compound:C00433
  species LAC in default = 0;  // kegg.compound:C01432 CHEBI:28358
  species NAD in default = 8;  // CHEBI:15846 kegg.compound:C00003
  species PYR in default = 0;  // kegg.compound:C00022 CHEBI:32816
  species XA in default = 0;  // kegg.compound:C00502 CHEBI:48093
  species XLAC in default = 0;  // kegg.compound:C02266 CHEBI:15867
  species XYL in default = 5;  // kegg.compound:C00181 CHEBI:15936

  // Parameters:
  Ea = 10;
  Eb = 2.5;
  Ec = 0.8;
  Ed = 8.67;
  Ex = 0.5;
  KiKDXDLAC = 27.9762;
  KiKDXDPYR = 17.9168;
  KiKDXDakg = 14.7919;
  KiKDXDxylonate = 18.3001;
  KiXADNADH = 10.4629;
  KmKDXDKDX = 0.207656;
  KmKDXDKGSA = 0.288658;
  KmKGSADHKDX = 0.2136;
  KmKGSADHKG = 0.279059;
  KmKGSADHKGSA = 0.0217501;
  KmKGSADHNAD = 0.596286;
  KmKGSADHNADH = 0.2674;
  KmKGSADHNADH2 = 0.0241;
  KmXADKDX = 0.862428;
  KmXADXA = 0.793955;
  KmXDHNAD = 0.161239;
  KmXDHNADH = 0.0297091;
  KmXDHXLAC = 0.535734;
  KmXDHXYL = 0.19851;
  KmXLAXA = 0.0381004;
  KmXLAXLAC = 0.445269;
  Ntot = 8;
  VmKDXD = 107.075;
  VmKGSADH = 49.3374;
  VmXAD = 42.359;
  VmXDH = 119.743;
  VmXLA = 944.406;
  fracX = 0.251104;
  kLDH = 10;
  kXLA = 0.00718272;

  // Reactions:
  v1: XYL + NAD -> XLAC; Eb*VmXDH*NAD*XYL/(1000*KmXDHNAD*KmXDHXYL*(1 + (Ntot - NAD)/KmXDHNADH + NAD/KmXDHNAD)*(1 + XYL/KmXDHXYL + XLAC/KmXDHXLAC));
  v2: XLAC -> XA; kXLA*XLAC;
  v3: XLAC -> XA; Ec*VmXLA*XLAC/(1000*KmXLAXLAC*(1 + XLAC/KmXLAXLAC + XA/KmXLAXA));
  v4: XA -> KDX; Ed*VmXAD*XA/(1000*KmXADXA*(1 + (Ntot - NAD)/KiXADNADH)*(1 + KDX/KmXADKDX + XA/KmXADXA));  // modifiers: NAD
  v5: KDX -> KGSA; Ex*fracX*VmKDXD*KDX/(1000*KmKDXDKDX*(1 + KGSA/KmKDXDKGSA + KDX/KmKDXDKDX)*(1 + KG/KiKDXDakg + LAC/KiKDXDLAC + PYR/KiKDXDPYR + XA/KiKDXDxylonate));  // modifiers: LAC, PYR, KG, XA
  v6: KGSA + NAD -> KG; Ea/1000*(VmKGSADH*KGSA*NAD/(KmKGSADHKGSA*KmKGSADHNAD))/((1 + KGSA/KmKGSADHKGSA + KG/KmKGSADHKG)*(1 + NAD/KmKGSADHNAD + (Ntot - NAD)/KmKGSADHNADH) + KDX/KmKGSADHKDX*(1 + NAD/KmKGSADHNAD + (Ntot - NAD)/KmKGSADHNADH2));  // modifiers: KDX
  v7: PYR -> LAC + NAD; kLDH*(Ntot - NAD)*PYR;
end
