// SBML level 3 version 1

model silva()
  // model units - substance: mM, time: min, extent: mM

  // Compartments:
  compartment default_compartment = 1;

  // Species:
  species $DHAP in default_compartment = 0.16;
  species $GAP in default_compartment = 0.0072;
  species HTA in default_compartment = 0.14;
  species MG in default_compartment = 0;
  species SDLTSH in default_compartment = 0;
  species TSH2 in default_compartment = 0.9;

  // Parameters:
  Km5 = 0.506;
  Km6 = 0.196;
  V5 = 6.084;
  V6 = 5.306;
  k1 = 0.0064;
  k2 = 0.00066;
  k3 = 0.34;
  k4 = 1.01;

  // Reactions:
  v_1: $DHAP -> MG; k1*DHAP;
  v_2: $GAP -> MG; k2*GAP;
  v_3: MG + TSH2 -> HTA; k3*MG*TSH2;
  v_4: HTA -> MG + TSH2; k4*HTA;
  v_5: HTA -> SDLTSH; V5*HTA/(Km5 + HTA);
  v_6: SDLTSH -> TSH2; V6*SDLTSH/(Km6 + SDLTSH);

  // Unit definitions:
  unit mM = 1e-3 mole / litre;
  unit min = 60 second;
end
