// SBML level 3 version 1

function ima(S, k)
  k*S;
end

function max(a, b)
  (a + b + abs(a - b))/2;
end

function rma(S, P, k, Keq)
  k*(-(P/Keq) + S);
end

function hill(S, Vmax, KS, nH)
  (S/KS)^nH*Vmax/(1 + (S/KS)^nH);
end

function fd(S, P, V, K, Ki)
  (-P + S)*V/(K*(1 + P/K + S/K + Ki*P*S/K^2));
end

function rmmub(S, P1, P2, V, KS, KP1, KP2, KiP2, Keq)
  (-(P1*P2/(Keq*KS)) + S/KS)*V/(1 + P1/KP1 + P2/KP2 + P1*P2/(KP1*KP2) + S/KS + P2*S/(KiP2*KS));
end

function rmm2(S1, S2, P1, P2, V, KS1, KS2, KP1, KP2, Keq)
  (-(P1*P2/(Keq*KS1*KS2)) + S1*S2/(KS1*KS2))*V/((1 + P1/KP1 + S1/KS1)*(1 + P2/KP2 + S2/KS2));
end

function rmm1(S, P, V, KS, KP, Keq)
  (-(P/(Keq*KS)) + S/KS)*V/(1 + P/KP + S/KS);
end

function pfkfun(ATP, F6P, F16bP, AMP, F26bP, Vmax, gR, Kf6p, Katp, L0, Ciatp, Kiatp, Camp, Kamp, Cf26, Kf26, Cf16, Kf16, Catp)
  ATP*F6P*gR*(1 + ATP/Katp + F6P/Kf6p + ATP*F6P*gR/(Katp*Kf6p))*Vmax/(Katp*Kf6p*((1 + ATP/Katp + F6P/Kf6p + ATP*F6P*gR/(Katp*Kf6p))^2 + (1 + AMP*Camp/Kamp)^2*(1 + ATP*Catp/Katp)^2*(1 + Cf16*F16bP/Kf16 + Cf26*F26bP/Kf26)^2*(1 + ATP*Ciatp/Kiatp)^2*L0/((1 + AMP/Kamp)^2*(1 + F16bP/Kf16 + F26bP/Kf26)^2*(1 + ATP/Kiatp)^2)));
end

function rmmbb(S1, S2, P1, P2, V, KS1, KiS1, KS2, KiS2, KP1, KiP1, KP2, KiP2, Keq)
  (-(P1*P2/(Keq*KiS2*KS1)) + S1*S2/(KiS2*KS1))*V/(1 + KP2*P1/(KiP2*KP1) + P2/KiP2 + P1*P2/(KiP2*KP1) + KS2*S1/(KiS2*KS1) + KS2*P2*S1/(KiP2*KiS2*KS1) + P1*P2*S1/(KiP2*KiS1*KP1) + S2/KiS2 + KP2*P1*S2/(KiP2*KiS2*KP1) + S1*S2/(KiS2*KS1) + P1*S1*S2/(KiP1*KiS2*KS1));
end

model smallbone0()

  // Compartments:
  compartment default_compartment = 1;

  // Species:
  species ADP in default_compartment = 1.29;
  species AMP in default_compartment = 0.44;
  species ATP in default_compartment = 4.29;
  species AcAld in default_compartment = 0.1781406;
  species BPG in default_compartment = 0.0007368735;
  species DHAP in default_compartment = 0.2903442;
  species $EtOH in default_compartment = 55.47258;
  species F16bP in default_compartment = 1.145805;
  species F6P in default_compartment = 0.05886031;
  species G6P in default_compartment = 0.1931208;
  species GAP in default_compartment = 0.07897276;
  species GLC in default_compartment = 1.57;
  species $GLCx in default_compartment = 74;
  species $GLY in default_compartment = 0.15;
  species NAD in default_compartment = 1.50329;
  species NADH in default_compartment = 0.0867097;
  species P2G in default_compartment = 0.01693448;
  species P3G in default_compartment = 0.1174563;
  species PEP in default_compartment = 0.1525014;
  species PYR in default_compartment = 0.5271179;
  species $SUC in default_compartment = 0;
  species $TRH in default_compartment = 0.003846971;
  species $glycogen in default_compartment = 0;

  // Parameters:
  ADH1 = 0.04097713;
  ADH5 = 0.001062496;
  ADHKacald = 1.11;
  ADHKeq = 14492.75;
  ADHKetoh = 17;
  ADHKiacald = 1.1;
  ADHKietoh = 90;
  ADHKinad = 0.92;
  ADHKinadh = 0.031;
  ADHKnad = 0.17;
  ADHKnadh = 0.11;
  ADHVmax = 111.335;
  AKKeq = 0.45;
  AKk = 0.75;
  ATPasek = 0.6583333;
  CDC19 = 0.5120975;
  ENO1 = 0.171593;
  ENO2 = 0.4936116;
  ENOKeq = 6.7;
  ENOKp2g = 0.04;
  ENOKpep = 0.5;
  ENOVmax = 3.36;
  EXTERNAL = 0;
  F26bP = 0.003;
  FBA1 = 0.03670182;
  FBAKdhap = 2;
  FBAKeq = 0.069;
  FBAKf16bp = 0.3;
  FBAKgap = 2.4;
  FBAKigap = 10;
  FBAVmax = 1.578167;
  GLK1 = 0.01127174;
  GPM1 = 0.1825001;
  GPMKeq = 0.19;
  GPMKp2g = 0.08;
  GPMKp3g = 1.2;
  GPMVmax = 43.08333;
  HXK1 = 0.004195186;
  HXK2 = 0.01533284;
  HXKKadp = 0.23;
  HXKKatp = 0.15;
  HXKKeq = 2000;
  HXKKg6p = 30;
  HXKKglc = 0.08;
  HXKVmax = 3.945;
  HXTKglc = 1.1918;
  HXTKi = 0.91;
  HXTVmax = 1.620667;
  NA = 6.02214e20;
  PDC1 = 0.2669527;
  PDC5 = 0.003088686;
  PDC6 = 0.001635216;
  PDCKpyr = 4.33;
  PDCVmax = 14.29667;
  PDCnH = 1.9;
  PFK1 = 0.01169626;
  PFK2 = 0.009759155;
  PFKCamp = 0.0845;
  PFKCatp = 3;
  PFKCf16 = 0.397;
  PFKCf26 = 0.0174;
  PFKCiatp = 100;
  PFKKamp = 0.0995;
  PFKKatp = 0.71;
  PFKKf16 = 0.111;
  PFKKf26 = 0.000682;
  PFKKf6p = 0.1;
  PFKKiatp = 0.65;
  PFKL0 = 0.66;
  PFKVmax = 1.833333;
  PFKgR = 5.12;
  PGI1 = 0.03457268;
  PGIKeq = 0.29;
  PGIKf6p = 0.3;
  PGIKg6p = 1.4;
  PGIVmax = 17.6;
  PGK1 = 0.06441423;
  PGKKadp = 0.2;
  PGKKatp = 0.3;
  PGKKbpg = 0.003;
  PGKKeq = 3200;
  PGKKp3g = 0.53;
  PGKVmax = 259.2201;
  PYK2 = 0.001517484;
  PYKKadp = 0.53;
  PYKKatp = 1.5;
  PYKKeq = 6500;
  PYKKpep = 0.14;
  PYKKpyr = 21;
  PYKVmax = 16.66667;
  TDH1 = 0.08771616;
  TDH2 = 0;
  TDH3 = 1.051101;
  TDHKbpg = 0.0098;
  TDHKeq = 0.005334127;
  TDHKgap = 0.21;
  TDHKnad = 0.09;
  TDHKnadh = 0.06;
  TDHVmax = 19.2;
  TPI1 = 0.07358945;
  TPIKeq = 0.045;
  TPIk = 7500;
  cell = 1;
  extracellular = 1;
  glycerolbranchKdhap = 0.4;
  glycerolbranchKeq = 4300;
  glycerolbranchKgly = 1;
  glycerolbranchKnad = 0.93;
  glycerolbranchKnadh = 0.023;
  glycerolbranchVmax = 0.7851667;
  glycogenbranchk = 0.01480425;
  succinatebranchk = 0.2372573;
  sumAXP = 6.02;
  sumNAD = 1.59;
  trehalosebranchk = 0.0059217;
  volume = 2e-14;

  // Assignment rules:
  energycharge := (ADP/2 + ATP)/sumAXP;
  sumPXG := P2G + P3G;
  fitconc := sqrt((1 - NA*sumPXG*volume/1618640)^2 + (1 - NA*volume*DHAP/3496987)^2 + (1 - NA*volume*F16bP/13800392)^2 + (1 - NA*volume*F6P/708930)^2 + (1 - NA*volume*G6P/2326001)^2 + (1 - NA*volume*GAP/951170)^2 + (1 - NA*volume*GLC/18909525)^2 + (1 - NA*volume*PEP/1836769)^2 + (1 - NA*volume*PYR/6348755)^2)/3;

  // Reactions:
  ADH: AcAld + NADH -> NAD + $EtOH; ADHVmax*(-(EtOH*NAD/(ADHKacald*ADHKeq*ADHKinadh)) + AcAld*NADH/(ADHKacald*ADHKinadh))/(1 + ADHKnad*EtOH/(ADHKetoh*ADHKinad) + ADHKnadh*AcAld/(ADHKacald*ADHKinadh) + NAD/ADHKinad + EtOH*NAD/(ADHKetoh*ADHKinad) + ADHKnadh*AcAld*NAD/(ADHKacald*ADHKinad*ADHKinadh) + EtOH*AcAld*NAD/(ADHKetoh*ADHKiacald*ADHKinad) + NADH/ADHKinadh + ADHKnad*EtOH*NADH/(ADHKetoh*ADHKinad*ADHKinadh) + AcAld*NADH/(ADHKacald*ADHKinadh) + EtOH*AcAld*NADH/(ADHKacald*ADHKietoh*ADHKinadh));
  AK: 2 ADP -> ATP + AMP; AKk*(ADP^2 - AMP*ATP/AKKeq);
  ATPase: ATP -> ADP; ATPasek*ATP;
  ENO: P2G -> PEP; ENOVmax*(P2G/ENOKp2g - PEP/(ENOKeq*ENOKp2g))/(1 + P2G/ENOKp2g + PEP/ENOKpep);
  FBA: F16bP -> DHAP + GAP; FBAVmax*(F16bP/FBAKf16bp - DHAP*GAP/(FBAKeq*FBAKf16bp))/(1 + DHAP/FBAKdhap + F16bP/FBAKf16bp + GAP/FBAKgap + DHAP*GAP/(FBAKdhap*FBAKgap) + F16bP*GAP/(FBAKf16bp*FBAKigap));
  GPM: P3G -> P2G; GPMVmax*(-(P2G/(GPMKeq*GPMKp3g)) + P3G/GPMKp3g)/(1 + P2G/GPMKp2g + P3G/GPMKp3g);
  HXK: ATP + GLC -> ADP + G6P; HXKVmax*(-(ADP*G6P/(HXKKatp*HXKKeq*HXKKglc)) + ATP*GLC/(HXKKatp*HXKKglc))/((1 + ADP/HXKKadp + ATP/HXKKatp)*(1 + G6P/HXKKg6p + GLC/HXKKglc));
  HXT: $GLCx -> GLC; HXTVmax*(GLCx - GLC)/(HXTKglc*(1 + GLCx/HXTKglc + GLC/HXTKglc + GLCx*HXTKi*GLC/HXTKglc^2));
  PDC: PYR -> AcAld; PDCVmax*(PYR/PDCKpyr)^PDCnH/(1 + (PYR/PDCKpyr)^PDCnH);
  PFK: ATP + F6P -> ADP + F16bP; PFKgR*PFKVmax*ATP*F6P*(1 + ATP/PFKKatp + F6P/PFKKf6p + PFKgR*ATP*F6P/(PFKKatp*PFKKf6p))/(PFKKatp*PFKKf6p*(PFKL0*(1 + PFKCamp*AMP/PFKKamp)^2*(1 + PFKCatp*ATP/PFKKatp)^2*(1 + PFKCiatp*ATP/PFKKiatp)^2*(1 + F26bP*PFKCf26/PFKKf26 + PFKCf16*F16bP/PFKKf16)^2/((1 + AMP/PFKKamp)^2*(1 + ATP/PFKKiatp)^2*(1 + F26bP/PFKKf26 + F16bP/PFKKf16)^2) + (1 + ATP/PFKKatp + F6P/PFKKf6p + PFKgR*ATP*F6P/(PFKKatp*PFKKf6p))^2));  // modifiers: AMP
  PGI: G6P -> F6P; PGIVmax*(-(F6P/(PGIKeq*PGIKg6p)) + G6P/PGIKg6p)/(1 + F6P/PGIKf6p + G6P/PGIKg6p);
  PGK: ADP + BPG -> ATP + P3G; PGKVmax*(ADP*BPG/(PGKKadp*PGKKbpg) - ATP*P3G/(PGKKadp*PGKKbpg*PGKKeq))/((1 + ADP/PGKKadp + ATP/PGKKatp)*(1 + BPG/PGKKbpg + P3G/PGKKp3g));
  PYK: ADP + PEP -> ATP + PYR; PYKVmax*(ADP*PEP/(PYKKadp*PYKKpep) - ATP*PYR/(PYKKadp*PYKKeq*PYKKpep))/((1 + ADP/PYKKadp + ATP/PYKKatp)*(1 + PEP/PYKKpep + PYR/PYKKpyr));
  TDH: GAP + NAD -> BPG + NADH; TDHVmax*(GAP*NAD/(TDHKgap*TDHKnad) - BPG*NADH/(TDHKeq*TDHKgap*TDHKnad))/((1 + BPG/TDHKbpg + GAP/TDHKgap)*(1 + NAD/TDHKnad + NADH/TDHKnadh));
  TPI: DHAP -> GAP; TPIk*(DHAP - GAP/TPIKeq);
  glycerolbranch: DHAP + NADH -> NAD + $GLY; glycerolbranchVmax*(-(GLY*NAD/(glycerolbranchKdhap*glycerolbranchKeq*glycerolbranchKnadh)) + DHAP*NADH/(glycerolbranchKdhap*glycerolbranchKnadh))/((1 + GLY/glycerolbranchKgly + DHAP/glycerolbranchKdhap)*(1 + NAD/glycerolbranchKnad + NADH/glycerolbranchKnadh));
  glycogenbranch: ATP + G6P -> ADP + $glycogen; glycogenbranchk*ATP*G6P;
  succinatebranch: 2 AcAld + 3 NAD -> $SUC + 3 NADH; succinatebranchk*AcAld*NAD;
  trehalosebranch: ATP + 2 G6P -> ADP + $TRH; trehalosebranchk*ATP*G6P;
end
