// SBML level 3 version 1

model smallbone17()

  // Compartments:
  compartment default_compartment = 1;

  // Species:
  species $ACE in default_compartment = 55.75006;
  species ADP in default_compartment = 1.29;
  species AMP in default_compartment = 0.44;
  species ATP in default_compartment = 4.29;
  species AcAld in default_compartment = 0.1781406;
  species BPG in default_compartment = 0.0007368735;
  species DHAP in default_compartment = 0.2903442;
  species $EtOH in default_compartment = 55.47258;
  species F16bP in default_compartment = 1.145805;
  species F6P in default_compartment = 0.05886031;
  species G1P in default_compartment = 0.1348121;
  species G3P in default_compartment = 0.06850073;
  species G6P in default_compartment = 0.1931208;
  species GAP in default_compartment = 0.07897276;
  species GLC in default_compartment = 1.57;
  species $GLCx in default_compartment = 74;
  species $GLY in default_compartment = 0.15;
  species NAD in default_compartment = 1.50329;
  species NADH in default_compartment = 0.0867097;
  species P2G in default_compartment = 0.01693448;
  species P3G in default_compartment = 0.1174563;
  species PEP in default_compartment = 0.1525014;
  species PYR in default_compartment = 0.5271179;
  species $SUC in default_compartment = 0;
  species T6P in default_compartment = 0.02;
  species $TRH in default_compartment = 0.003846971;
  species UDG in default_compartment = 0.4672462;
  species UDP in default_compartment = 0.2815;
  species UTP in default_compartment = 0.6491;

  // Parameters:
  ADH1 = 0.04097713;
  ADH5 = 0.001062496;
  ADHADH1Kacald = 0.4622;
  ADHADH1Ketoh = 17;
  ADHADH1Kiacald = 1.1;
  ADHADH1Kietoh = 90;
  ADHADH1Kinad = 0.92;
  ADHADH1Kinadh = 0.031;
  ADHADH1Knad = 0.17;
  ADHADH1Knadh = 0.11;
  ADHADH1kcat = 176;
  ADHADH5Kacald = 1.11;
  ADHADH5Ketoh = 17;
  ADHADH5Kiacald = 1.1;
  ADHADH5Kietoh = 90;
  ADHADH5Kinad = 0.92;
  ADHADH5Kinadh = 0.031;
  ADHADH5Knad = 0.17;
  ADHADH5Knadh = 0.11;
  ADHADH5kcat = 0;
  AKKeq = 0.45;
  AKk = 0.75;
  ATPaseKatp = 3;
  ATPaseVmax = 1.133333;
  CDC19 = 0.5120975;
  ENO1 = 0.171593;
  ENO2 = 0.4936116;
  ENOENO1Kp2g = 0.043;
  ENOENO1Kpep = 0.5;
  ENOENO1kcat = 7.6;
  ENOENO2Kp2g = 0.104;
  ENOENO2Kpep = 0.5;
  ENOENO2kcat = 19.87;
  EXTERNAL = 0;
  F26bP = 0.003;
  FBA1 = 0.3345987;
  FBAKdhap = 2;
  FBAKeq = 0.069;
  FBAKf16bp = 0.4507;
  FBAKgap = 2.4;
  FBAKigap = 10;
  FBAkcat = 4.139;
  GLK1 = 0.01127174;
  GPD1 = 0.001708778;
  GPD2 = 0.0001983514;
  GPDKadp = 2;
  GPDKatp = 0.73;
  GPDKdhap = 0.54;
  GPDKeq = 10000;
  GPDKfbp = 4.8;
  GPDKg3p = 1.2;
  GPDKnad = 0.93;
  GPDKnadh = 0.023;
  GPDVmax = 0.7833333;
  GPM1 = 0.1825001;
  GPMKeq = 0.19;
  GPMKp2g = 1.41;
  GPMKp3g = 1.2;
  GPMkcat = 400;
  GPPKg3p = 3.5;
  GPPVmax = 0.8833333;
  HOR2 = 0.001368367;
  HXK1 = 0.004195186;
  HXK2 = 0.01533284;
  HXKGLK1Kadp = 0.23;
  HXKGLK1Katp = 0.865;
  HXKGLK1Kg6p = 30;
  HXKGLK1Kglc = 0.0106;
  HXKGLK1kcat = 0.0721;
  HXKHXK1Kadp = 0.23;
  HXKHXK1Katp = 0.293;
  HXKHXK1Kg6p = 30;
  HXKHXK1Kglc = 0.15;
  HXKHXK1Kit6p = 0.2;
  HXKHXK1kcat = 10.2;
  HXKHXK2Kadp = 0.23;
  HXKHXK2Katp = 0.195;
  HXKHXK2Kg6p = 30;
  HXKHXK2Kglc = 0.2;
  HXKHXK2Kit6p = 0.04;
  HXKHXK2kcat = 63.1;
  HXTKglc = 0.9;
  HXTKi = 0.91;
  HXTVmax = 3.35;
  KeqADH = 14492.75;
  KeqENO = 6.7;
  KeqHXK = 2000;
  KeqPYK = 6500;
  KeqTDH = 0.005334127;
  NA = 6.02214e20;
  PDC1 = 0.2669527;
  PDC5 = 0.003088686;
  PDC6 = 0.001635216;
  PDCPDC1Kpyr = 8.5;
  PDCPDC1kcat = 12.14;
  PDCPDC5Kpyr = 7.08;
  PDCPDC5kcat = 10.32;
  PDCPDC6Kpyr = 2.92;
  PDCPDC6kcat = 9.21;
  PFK1 = 0.01169626;
  PFK2 = 0.009759155;
  PFKCamp = 0.0845;
  PFKCatp = 3;
  PFKCf16 = 0.397;
  PFKCf26 = 0.0174;
  PFKCiatp = 100;
  PFKKadp = 1;
  PFKKamp = 0.0995;
  PFKKatp = 0.71;
  PFKKeq = 800;
  PFKKf16 = 0.111;
  PFKKf26 = 0.000682;
  PFKKf6p = 0.1;
  PFKKiatp = 0.65;
  PFKL0 = 0.66;
  PFKgR = 5.12;
  PFKkcat = 209.6;
  PGI1 = 0.03457268;
  PGIKeq = 0.29;
  PGIKf6p = 0.307;
  PGIKg6p = 1.0257;
  PGIkcat = 487.36;
  PGK1 = 0.06441423;
  PGKKadp = 0.2;
  PGKKatp = 1.99;
  PGKKbpg = 0.003;
  PGKKeq = 3200;
  PGKKp3g = 4.58;
  PGKkcat = 58.6;
  PGKnHadp = 2;
  PGM1 = 0.0008155739;
  PGM2 = 0.0003146722;
  PGMKeq = 0.1667;
  PGMKg1p = 0.023;
  PGMKg6p = 0.05;
  PGMVmax = 0.12762;
  PYK2 = 0.001517484;
  PYKCDC19Kadp = 0.243;
  PYKCDC19Katp = 1.5;
  PYKCDC19Kf16p = 0.2;
  PYKCDC19Kiatp = 9.3;
  PYKCDC19Kpep = 0.281;
  PYKCDC19Kpyr = 21;
  PYKCDC19L0 = 100;
  PYKCDC19kcat = 20.146;
  PYKPYK2Kadp = 0.3;
  PYKPYK2Katp = 1.5;
  PYKPYK2Kf16p = 0.2;
  PYKPYK2Kiatp = 9.3;
  PYKPYK2Kpep = 0.19;
  PYKPYK2Kpyr = 21;
  PYKPYK2L0 = 100;
  PYKPYK2kcat = 0;
  RHR2 = 0.01279512;
  TDH1 = 0.08771616;
  TDH2 = 0;
  TDH3 = 1.051101;
  TDHTDH1Kbpg = 0.0098;
  TDHTDH1Kgap = 0.495;
  TDHTDH1Knad = 0.09;
  TDHTDH1Knadh = 0.06;
  TDHTDH1kcat = 19.12;
  TDHTDH2Kbpg = 0.0098;
  TDHTDH2Kgap = 0.77;
  TDHTDH2Knad = 0.09;
  TDHTDH2Knadh = 0.06;
  TDHTDH2kcat = 8.633;
  TDHTDH3Kbpg = 0.909;
  TDHTDH3Kgap = 0.423;
  TDHTDH3Knad = 0.09;
  TDHTDH3Knadh = 0.06;
  TDHTDH3kcat = 18.162;
  TPI1 = 0.07358945;
  TPIKdhap = 6.454;
  TPIKeq = 0.045;
  TPIKgap = 5.25;
  TPIKigap = 35.1;
  TPIkcat = 564.38;
  TPPKt6p = 0.5;
  TPPVmax = 2.34;
  TPS1 = 0.0008481204;
  TPS2 = 0.000664963;
  TPSKg6p = 3.8;
  TPSKudg = 0.886;
  TPSVmax = 0.49356;
  UGP1 = 0.001550529;
  UGPKg1p = 0.32;
  UGPKiudg = 0.0035;
  UGPKiutp = 0.11;
  UGPKutp = 0.11;
  UGPVmax = 13.2552;
  acetatebranchk = 0.005543396;
  cell = 1;
  extracellular = 1;
  succinatebranchk = 0.005496636;
  sumAXP = 6.02;
  sumNAD = 1.59;
  sumUXP = 1.397846;
  udptoutpk = 0.07452583;
  volume = 2e-14;

  // Assignment rules:
  sumPXG := P2G + P3G;
  energycharge := (ADP/2 + ATP)/sumAXP;
  fitconc := sqrt((1 - NA*sumPXG*volume/1618640)^2 + (1 - NA*volume*DHAP/3496987)^2 + (1 - NA*volume*F16bP/13800392)^2 + (1 - NA*volume*F6P/708930)^2 + (1 - NA*volume*G6P/2326001)^2 + (1 - NA*volume*GAP/951170)^2 + (1 - NA*volume*GLC/18909525)^2 + (1 - NA*volume*PEP/1836769)^2 + (1 - NA*volume*PYR/6348755)^2)/3;

  // Reactions:
  ADHADH1: AcAld + NADH -> NAD + $EtOH; ADH1*ADHADH1kcat*(-(EtOH*NAD/(ADHADH1Kacald*ADHADH1Kinadh*KeqADH)) + AcAld*NADH/(ADHADH1Kacald*ADHADH1Kinadh))/(1 + ADHADH1Knad*EtOH/(ADHADH1Ketoh*ADHADH1Kinad) + ADHADH1Knadh*AcAld/(ADHADH1Kacald*ADHADH1Kinadh) + NAD/ADHADH1Kinad + EtOH*NAD/(ADHADH1Ketoh*ADHADH1Kinad) + ADHADH1Knadh*AcAld*NAD/(ADHADH1Kacald*ADHADH1Kinad*ADHADH1Kinadh) + EtOH*AcAld*NAD/(ADHADH1Ketoh*ADHADH1Kiacald*ADHADH1Kinad) + NADH/ADHADH1Kinadh + ADHADH1Knad*EtOH*NADH/(ADHADH1Ketoh*ADHADH1Kinad*ADHADH1Kinadh) + AcAld*NADH/(ADHADH1Kacald*ADHADH1Kinadh) + EtOH*AcAld*NADH/(ADHADH1Kacald*ADHADH1Kietoh*ADHADH1Kinadh));
  ADHADH5: AcAld + NADH -> NAD + $EtOH; ADH5*ADHADH5kcat*(-(EtOH*NAD/(ADHADH5Kacald*ADHADH5Kinadh*KeqADH)) + AcAld*NADH/(ADHADH5Kacald*ADHADH5Kinadh))/(1 + ADHADH5Knad*EtOH/(ADHADH5Ketoh*ADHADH5Kinad) + ADHADH5Knadh*AcAld/(ADHADH5Kacald*ADHADH5Kinadh) + NAD/ADHADH5Kinad + EtOH*NAD/(ADHADH5Ketoh*ADHADH5Kinad) + ADHADH5Knadh*AcAld*NAD/(ADHADH5Kacald*ADHADH5Kinad*ADHADH5Kinadh) + EtOH*AcAld*NAD/(ADHADH5Ketoh*ADHADH5Kiacald*ADHADH5Kinad) + NADH/ADHADH5Kinadh + ADHADH5Knad*EtOH*NADH/(ADHADH5Ketoh*ADHADH5Kinad*ADHADH5Kinadh) + AcAld*NADH/(ADHADH5Kacald*ADHADH5Kinadh) + EtOH*AcAld*NADH/(ADHADH5Kacald*ADHADH5Kietoh*ADHADH5Kinadh));
  AK: 2 ADP -> AMP + ATP; AKk*(ADP^2 - AMP*ATP/AKKeq);
  ATPase: ATP -> ADP; ATPaseVmax*ATP/(ATPaseKatp*(1 + ATP/ATPaseKatp));
  ENOENO1: P2G -> PEP; ENO1*ENOENO1kcat*(P2G/ENOENO1Kp2g - PEP/(ENOENO1Kp2g*KeqENO))/(1 + P2G/ENOENO1Kp2g + PEP/ENOENO1Kpep);
  ENOENO2: P2G -> PEP; ENO2*ENOENO2kcat*(P2G/ENOENO2Kp2g - PEP/(ENOENO2Kp2g*KeqENO))/(1 + P2G/ENOENO2Kp2g + PEP/ENOENO2Kpep);
  FBA: F16bP -> DHAP + GAP; FBA1*FBAkcat*(F16bP/FBAKf16bp - DHAP*GAP/(FBAKeq*FBAKf16bp))/(1 + DHAP/FBAKdhap + F16bP/FBAKf16bp + GAP/FBAKgap + DHAP*GAP/(FBAKdhap*FBAKgap) + F16bP*GAP/(FBAKf16bp*FBAKigap));
  GPD: DHAP + NADH -> G3P + NAD; GPDVmax*(-(G3P*NAD/GPDKeq) + DHAP*NADH)/(GPDKdhap*GPDKnadh*(1 + ADP/GPDKadp + ATP/GPDKatp + F16bP/GPDKfbp)*(1 + DHAP/GPDKdhap + G3P/GPDKg3p)*(1 + NAD/GPDKnad + NADH/GPDKnadh));  // modifiers: ADP, ATP, F16bP
  GPM: P3G -> P2G; GPM1*GPMkcat*(-(P2G/(GPMKeq*GPMKp3g)) + P3G/GPMKp3g)/(1 + P2G/GPMKp2g + P3G/GPMKp3g);
  GPP: G3P -> $GLY; GPPVmax*G3P/(GPPKg3p*(1 + G3P/GPPKg3p));
  HXKGLK1: ATP + GLC -> ADP + G6P; GLK1*HXKGLK1kcat*(-(ADP*G6P/(HXKGLK1Katp*HXKGLK1Kglc*KeqHXK)) + ATP*GLC/(HXKGLK1Katp*HXKGLK1Kglc))/((1 + ADP/HXKGLK1Kadp + ATP/HXKGLK1Katp)*(1 + G6P/HXKGLK1Kg6p + GLC/HXKGLK1Kglc));
  HXKHXK1: ATP + GLC -> ADP + G6P; HXK1*HXKHXK1kcat*(-(ADP*G6P/(HXKHXK1Katp*HXKHXK1Kglc*KeqHXK)) + ATP*GLC/(HXKHXK1Katp*HXKHXK1Kglc))/((1 + ADP/HXKHXK1Kadp + ATP/HXKHXK1Katp)*(1 + G6P/HXKHXK1Kg6p + GLC/HXKHXK1Kglc + T6P/HXKHXK1Kit6p));  // modifiers: T6P
  HXKHXK2: ATP + GLC -> ADP + G6P; HXK2*HXKHXK2kcat*(-(ADP*G6P/(HXKHXK2Katp*HXKHXK2Kglc*KeqHXK)) + ATP*GLC/(HXKHXK2Katp*HXKHXK2Kglc))/((1 + ADP/HXKHXK2Kadp + ATP/HXKHXK2Katp)*(1 + G6P/HXKHXK2Kg6p + GLC/HXKHXK2Kglc + T6P/HXKHXK2Kit6p));  // modifiers: T6P
  HXT: $GLCx -> GLC; HXTVmax*(GLCx - GLC)/(HXTKglc*(1 + GLCx/HXTKglc + GLC/HXTKglc + GLCx*HXTKi*GLC/HXTKglc^2));
  PDCPDC1: PYR -> AcAld; PDC1*PDCPDC1kcat*PYR/(PDCPDC1Kpyr*(1 + PYR/PDCPDC1Kpyr));
  PDCPDC5: PYR -> AcAld; PDC5*PDCPDC5kcat*PYR/(PDCPDC5Kpyr*(1 + PYR/PDCPDC5Kpyr));
  PDCPDC6: PYR -> AcAld; PDC6*PDCPDC6kcat*PYR/(PDCPDC6Kpyr*(1 + PYR/PDCPDC6Kpyr));
  PFK: ATP + F6P -> ADP + F16bP; PFKgR*PFKkcat*(PFK1 + PFK2 - abs(PFK1 - PFK2))*ATP*(1 - ADP*F16bP/(PFKKeq*ATP*F6P))*F6P*(1 + ADP/PFKKadp + ATP/PFKKatp + F16bP/PFKKf16 + PFKgR*ADP*F16bP/(PFKKadp*PFKKf16) + F6P/PFKKf6p + PFKgR*ATP*F6P/(PFKKatp*PFKKf6p))/(2*PFKKatp*PFKKf6p*(PFKL0*(1 + PFKCamp*AMP/PFKKamp)^2*(1 + PFKCatp*ATP/PFKKatp)^2*(1 + PFKCiatp*ATP/PFKKiatp)^2*(1 + F26bP*PFKCf26/PFKKf26 + PFKCf16*F16bP/PFKKf16)^2/((1 + AMP/PFKKamp)^2*(1 + ATP/PFKKiatp)^2*(1 + F26bP/PFKKf26 + F16bP/PFKKf16)^2) + (1 + ADP/PFKKadp + ATP/PFKKatp + F16bP/PFKKf16 + PFKgR*ADP*F16bP/(PFKKadp*PFKKf16) + F6P/PFKKf6p + PFKgR*ATP*F6P/(PFKKatp*PFKKf6p))^2));  // modifiers: AMP
  PGI: G6P -> F6P; PGI1*PGIkcat*(-(F6P/(PGIKeq*PGIKg6p)) + G6P/PGIKg6p)/(1 + F6P/PGIKf6p + G6P/PGIKg6p);
  PGK: ADP + BPG -> ATP + P3G; PGK1*PGKkcat*(ADP/PGKKadp)^(-1 + PGKnHadp)*(ADP*BPG/(PGKKadp*PGKKbpg) - ATP*P3G/(PGKKadp*PGKKbpg*PGKKeq))/((1 + (ADP/PGKKadp)^PGKnHadp + ATP/PGKKatp)*(1 + BPG/PGKKbpg + P3G/PGKKp3g));
  PGM: G6P -> G1P; PGMVmax*(-(G1P/(PGMKeq*PGMKg6p)) + G6P/PGMKg6p)/(1 + G1P/PGMKg1p + G6P/PGMKg6p);
  PYKCDC19: ADP + PEP -> ATP + PYR; CDC19*PYKCDC19kcat*(ADP*PEP - ATP*PYR/KeqPYK)/(PYKCDC19Kadp*PYKCDC19Kpep*(1 + ADP/PYKCDC19Kadp + ATP/PYKCDC19Katp)*(1 + PYKCDC19L0*(1 + ATP/PYKCDC19Kiatp)/(1 + F16bP/PYKCDC19Kf16p) + PEP/PYKCDC19Kpep + PYR/PYKCDC19Kpyr));  // modifiers: F16bP
  PYKPYK2: ADP + PEP -> ATP + PYR; PYK2*PYKPYK2kcat*(ADP*PEP - ATP*PYR/KeqPYK)/(PYKPYK2Kadp*PYKPYK2Kpep*(1 + ADP/PYKPYK2Kadp + ATP/PYKPYK2Katp)*(1 + PYKPYK2L0*(1 + ATP/PYKPYK2Kiatp)/(1 + F16bP/PYKPYK2Kf16p) + PEP/PYKPYK2Kpep + PYR/PYKPYK2Kpyr));  // modifiers: F16bP
  TDHTDH1: GAP + NAD -> BPG + NADH; TDH1*TDHTDH1kcat*(GAP*NAD/(TDHTDH1Kgap*TDHTDH1Knad) - BPG*NADH/(KeqTDH*TDHTDH1Kgap*TDHTDH1Knad))/((1 + BPG/TDHTDH1Kbpg + GAP/TDHTDH1Kgap)*(1 + NAD/TDHTDH1Knad + NADH/TDHTDH1Knadh));
  TDHTDH2: GAP + NAD -> BPG + NADH; TDH2*TDHTDH2kcat*(GAP*NAD/(TDHTDH2Kgap*TDHTDH2Knad) - BPG*NADH/(KeqTDH*TDHTDH2Kgap*TDHTDH2Knad))/((1 + BPG/TDHTDH2Kbpg + GAP/TDHTDH2Kgap)*(1 + NAD/TDHTDH2Knad + NADH/TDHTDH2Knadh));
  TDHTDH3: GAP + NAD -> BPG + NADH; TDH3*TDHTDH3kcat*(GAP*NAD/(TDHTDH3Kgap*TDHTDH3Knad) - BPG*NADH/(KeqTDH*TDHTDH3Kgap*TDHTDH3Knad))/((1 + BPG/TDHTDH3Kbpg + GAP/TDHTDH3Kgap)*(1 + NAD/TDHTDH3Knad + NADH/TDHTDH3Knadh));
  TPI: DHAP -> GAP; TPI1*TPIkcat*(DHAP - GAP/TPIKeq)/(TPIKdhap*(1 + DHAP/TPIKdhap + GAP*(1 + GAP^4/TPIKigap^4)/TPIKgap));
  TPP: T6P -> $TRH; TPPVmax*T6P/(TPPKt6p*(1 + T6P/TPPKt6p));
  TPS: G6P + UDG -> T6P + UDP; TPSVmax*G6P*UDG/(TPSKg6p*TPSKudg*(1 + G6P/TPSKg6p)*(1 + UDG/TPSKudg));
  UGP: G1P + UTP -> UDG; UGPVmax*G1P*UTP/(UGPKg1p*UGPKutp*(UGPKiutp/UGPKutp + G1P/UGPKg1p + UGPKiutp*UDG/(UGPKiudg*UGPKutp) + G1P*UDG/(UGPKg1p*UGPKiudg) + UTP/UGPKutp + G1P*UTP/(UGPKg1p*UGPKutp)));
  acetatebranch: AcAld + NAD -> NADH + $ACE; acetatebranchk*AcAld*NAD;
  succinatebranch: PYR + 3 NAD -> 0.75 $SUC + 3 NADH; succinatebranchk*NAD*PYR;
  udptoutp: ATP + UDP -> ADP + UTP; udptoutpk*ATP*UDP;
end
