// SBML level 2 version 4

model smallbone19()

  // Compartments:
  compartment cell = 1;  // GO:0005622
  compartment medium = 1;  // GO:0005576

  // Species:
  species $adp in cell = 1.282; adp is "ADP";  // CHEBI:16761
  species $atp in cell = 2.525; atp is "ATP";  // CHEBI:15422
  species $f6p in cell = 0.625; f6p is "fructose 6-phosphate";  // CHEBI:16084
  species g1p in cell = g1p_0; g1p is "glucose 1-phosphate";  // CHEBI:16077
  species g6p in cell = g6p_0; g6p is "glucose 6-phosphate";  // CHEBI:17665
  species glc in cell = glc_0; glc is "glucose";  // CHEBI:17925
  species $glx in medium = 100; glx is "glucose";  // CHEBI:17925
  species $h in cell = 0; h is "H+";  // CHEBI:24636
  species $h2o in cell = 0; h2o is "water";  // CHEBI:15377
  species $pho in cell = 0; pho is "phosphate";  // CHEBI:43474
  species $ppi in cell = 0; ppi is "diphosphate";  // CHEBI:18361
  species t6p in cell = t6p_0; t6p is "trehalose 6-phosphate";  // CHEBI:18283
  species trh in cell = trh_0; trh is "trehalose";  // CHEBI:16551
  species udg in cell = udg_0; udg is "UDP glucose";  // CHEBI:18066
  species $udp in cell = 0.2815; udp is "UDP";  // CHEBI:17659
  species $utp in cell = 0.6491; utp is "UTP";  // CHEBI:46398

  // Parameters:
  g1p_0 = 0.1 mM;
  g1p_change has dimensionless; g1p_change is "log10 change in glucose 1-phosphate";
  g6p_0 = 2.675 mM;
  g6p_change has dimensionless; g6p_change is "log10 change in glucose 6-phosphate";
  glc_0 = 0.09765 mM;
  glc_change has dimensionless; glc_change is "log10 change in glucose";
  heat = 0 dimensionless;
  t6p_0 = 0.02 mM;
  t6p_change has dimensionless; t6p_change is "log10 change in trehalose 6-phosphate";
  trh_0 = 0.05 mM;
  trh_change has dimensionless; trh_change is "log10 change in trehalose";
  udg_0 = 0.7 mM;
  udg_change has dimensionless; udg_change is "log10 change in UDP glucose";

  // Assignment rules:
  udg_change := log10(udg/udg_0);
  t6p_change := log10(t6p/t6p_0);
  trh_change := log10(trh/trh_0);
  g6p_change := log10(g6p/g6p_0);
  g1p_change := log10(g1p/g1p_0);
  glc_change := log10(glc/glc_0);

  // Reactions:
  hxk: $atp + glc => $h + $adp + g6p; cell*hxk_shock^heat*hxk_Vmax/(hxk_Kglc*Katp)*(glc*atp - g6p*adp/hxk_Keq)/((1 + glc/hxk_Kglc + g6p/hxk_Kg6p + t6p/Kit6p)*(1 + atp/Katp + adp/Kadp)); hxk is "hexokinase";  // modifiers: t6p; isVersionOf ec-code:2.7.1.1
    hxk_shock = 8 dimensionless; Kit6p = 0.04 mM; hxk_Keq = 2000 dimensionless; Kadp = 0.23 mM; hxk_Kg6p = 30 mM; Katp = 0.15 mM; hxk_Kglc = 0.08 mM; hxk_Vmax = 289.6 mM_per_min;
  hxt: $glx -> glc; cell*hxt_shock^heat*hxt_Vmax*(glx - glc)/hxt_Kglc/(1 + (glx + glc)/hxt_Kglc + Ki*glx*glc/hxt_Kglc^2); hxt is "glucose transport";
    hxt_shock = 8 dimensionless; Ki = 0.91 dimensionless; hxt_Kglc = 1.1918 mM; hxt_Vmax = 97.24 mM_per_min;
  nth: $h2o + trh => 2 glc; cell*nth_shock^heat*nth_Vmax*trh/Ktrh/(1 + trh/Ktrh); nth is "trehalase";  // isVersionOf ec-code:3.2.1.28
    nth_shock = 6 dimensionless; Ktrh = 2.99 mM; nth_Vmax = 15.2 mM_per_min;
  pgi: g6p -> $f6p; cell*pgi_shock^heat*pgi_Vmax/pgi_Kg6p*(g6p - f6p/pgi_Keq)/(1 + g6p/pgi_Kg6p + f6p/Kf6p); pgi is "G6P isomerase";  // isVersionOf ec-code:5.3.1.9
    pgi_shock = 1 dimensionless; pgi_Keq = 0.3 dimensionless; Kf6p = 0.29 mM; pgi_Kg6p = 1.4 mM; pgi_Vmax = 1071 mM_per_min;
  pgm: g6p -> g1p; cell*pgm_shock^heat*pgm_Vmax/pgm_Kg6p*(g6p - g1p/pgm_Keq)/(1 + g6p/pgm_Kg6p + g1p/pgm_Kg1p); pgm is "phosphoglucomutase";  // isVersionOf ec-code:5.4.2.2
    pgm_shock = 16 dimensionless; pgm_Keq = 0.1667 dimensionless; pgm_Kg1p = 0.023 mM; pgm_Kg6p = 0.05 mM; pgm_Vmax = 0.3545 mM_per_min;
  tpp: $h2o + t6p => $pho + trh; cell*tpp_shock^heat*tpp_Vmax*t6p/Kt6p/(1 + t6p/Kt6p); tpp is "T6P phosphatase";  // isVersionOf ec-code:3.1.3.12
    tpp_shock = 18 dimensionless; Kt6p = 0.5 mM; tpp_Vmax = 6.5 mM_per_min;
  tps: udg + g6p => $h + $udp + t6p; cell*activity*tps_shock^heat*tps_Vmax*g6p*udg/(tps_Kg6p*Kudg)/((1 + g6p/tps_Kg6p)*(1 + udg/Kudg)); tps is "T6P synthase";  // isVersionOf ec-code:2.4.1.15
    activity = 1 dimensionless; tps_shock = 12 dimensionless; Kudg = 0.886 mM; tps_Kg6p = 3.8 mM; tps_Vmax = 1.371 mM_per_min;
  ugp: $h + $utp + g1p => $ppi + udg; cell*ugp_shock^heat*ugp_Vmax*utp*g1p/(Kutp*ugp_Kg1p)/(Kiutp/Kutp + utp/Kutp + g1p/ugp_Kg1p + utp*g1p/(Kutp*ugp_Kg1p) + Kiutp/Kutp*udg/Kiudg + g1p*udg/(ugp_Kg1p*Kiudg)); ugp is "UDP glucose phosphorylase";  // isVersionOf ec-code:2.7.7.9
    ugp_shock = 16 dimensionless; Kiudg = 0.0035 mM; ugp_Kg1p = 0.32 mM; Kiutp = 0.11 mM; Kutp = 0.11 mM; ugp_Vmax = 36.82 mM_per_min;

  // Unit definitions:
  unit mM_per_min = 1e-3 mole / (60 second * litre);
  unit per_min = 1 / (60 second);
  unit mM = 1e-3 mole / litre;
  unit min = 60 second;
  unit mmol = 1e-3 mole;
end
