// SBML level 2 version 4

model smallbone22()

  // Compartments:
  compartment cell = 1;  // GO:0005623

  // Species:
  species x1 in cell = 0.05625738;
  species x2 in cell = 0.7687615;
  species x3 in cell = 4.231238;
  species x4 in cell = 1;
  species $y1 in cell = 10;
  species $y2 in cell = 0;
  species $y3 in cell = 0;
  species $y4 in cell = 1;
  species $y5 in cell = 1;
  species $y7 in cell = 1;
  species $y8 in cell = 0;

  // Reactions:
  v1: x2 + $y1 -> x3 + x1; e1*(p1*y1*x2 - x1*x3)/(1 + y1 + x2 + x1 + x3 + y1*x2 + x1*x3);
    p1 = 10 dimensionless; e1 = 1 dimensionless;
  v2: x3 + $y4 -> x2 + $y5; e2*(p2*y4*x3 - y5*x2)/(1 + x3 + x2 + y4 + y5 + x3*y4 + x2*y5);
    p2 = 10 dimensionless; e2 = 1 dimensionless;
  v3: x1 -> $y2; e3*(p3*x1 - y2)/(1 + x1 + y2);
    p3 = 50 dimensionless; e3 = 1 dimensionless;
  v4: x1 -> $y3; e4*(p4*x1 - y3)/(1 + x1 + y3);
    p4 = 10 dimensionless; e4 = 1 dimensionless;
  v6: $y7 -> x4; e6*p6*y7;
    p6 = 1 dimensionless; e6 = 1 dimensionless;
  v7: x4 -> $y8; e7*p7;
    p7 = 1 dimensionless; e7 = 1 dimensionless;

  // Unit definitions:
  unit volume = dimensionless;
  unit time = dimensionless;
  unit substance = dimensionless;
end
