// SBML level 2 version 4

model smallbone23()

  // Compartments:
  compartment cell = 1;  // GO:0005622

  // Species:
  species $p3g in cell = 2.36; p3g is "3-phosphoglycerate";  // CHEBI:58272
  species php in cell = 0.6; php is "phosphohydroxypyruvate";  // CHEBI:18110
  species pser in cell = 0.09; pser is "phosphoserine";  // CHEBI:57524
  species $ser in cell = 4.9; ser is "serine";  // CHEBI:17115
  species $serA in cell = 1.15;  // uniprot:P0A9T0
  species $serB in cell = 0.25;  // uniprot:P0AGB0
  species $serC in cell = 0.1;  // uniprot:P23721

  // Reactions:
  PDH: $p3g -> php; cell*serA*kcatA*(p3g/KAp3g)/(1 + p3g/KAp3g + php/KAphp)/(1 + ser/KiAser); PDH is "phosphoglycerate dehydrogenase";  // modifiers: ser, serA; ec-code:1.1.1.95
    KiAser = 0.0038 mM; KAphp = 0.0032 mM; KAp3g = 1.2 mM; kcatA = 0.55 per_s;
  PSA: php -> pser; cell*serC*kcatC*(php/KCphp)/(1 + php/KCphp + pser/KCpser); PSA is "phosphoserine aminotransferase";  // modifiers: serC; ec-code:2.6.1.52
    KCpser = 0.0017 mM; KCphp = 0.0015 mM; kcatC = 1.75 per_s;
  PSP: pser -> $ser; cell*serB*kcatB*(pser/KBpser)/(1 + pser/KBpser + ser/KBser); PSP is "phosphoserine phosphatase";  // modifiers: serB; ec-code:3.1.3.3
    KBser = 0.15 mM; KBpser = 0.0015 mM; kcatB = 1.43 per_s;

  // Unit definitions:
  unit per_s = 1 / second;
  unit mM = 1e-3 mole / litre;
  unit mmol = 1e-3 mole;
end
