// SBML level 3 version 1

model snoep()

  // Compartments:
  compartment default_compartment = 1;

  // Species:
  species $mRNAp in default_compartment = 1;
  species mRNApribo in default_compartment = 0;
  species $mRNAribo in default_compartment = 1;
  species mRNAriboribo in default_compartment = 0;
  species p in default_compartment = 0.5;
  species ribo in default_compartment = 0.5;
  species $sink in default_compartment = 0;

  // Parameters:
  K2 = 1;
  K4 = 3;
  k11 = 1000;
  k12 = 1;
  k2 = 750;
  k31 = 200;
  k32 = 10;
  k4 = 12;
  k5 = 1;
  k6 = 0.1;
  k7 = 0.1;
  k8 = 0.1;

  // Reactions:
  v_1: $mRNAp + ribo -> mRNApribo; k11*mRNAp*ribo - k12*mRNApribo;
  v_2: mRNApribo -> ribo + p; k2*mRNApribo/(mRNApribo + K2);
  v_3: $mRNAribo + ribo -> mRNAriboribo; k31*mRNAribo*ribo - k32*mRNAriboribo;
  v_4: mRNAriboribo -> 2 ribo; k4*mRNAriboribo/(mRNAriboribo + K4);
  v_5: p -> $sink; k5*p;
  v_6: ribo -> $sink; k5*ribo;
  v_7: mRNApribo -> $sink; k5*mRNApribo;
  v_8: mRNAriboribo -> $sink; k5*mRNAriboribo;
end
