// SBML level 3 version 1

model snoep2()

  // Compartments:
  compartment default_compartment = 1;

  // Species:
  species Biom in default_compartment = 0.03;
  species Sext in default_compartment = 0;
  species Sint in default_compartment = 0;
  species $Sr in default_compartment = 20;
  species Xint in default_compartment = 0;
  species $p in default_compartment = 0;

  // Parameters:
  Dil = 0.1;
  K2S = 0.9;
  K2Sin = 0.9;
  K4Sint = 1;
  K4X = 1;
  K5X = 2;
  Keq2 = 1;
  Keq4 = 100;
  Vm2 = 9;
  Vm4 = 10;
  Vm5 = 0.52;

  // Reactions:
  v_1: $Sr -> Sext; Dil*Sr;
  v_2: Sext -> Sint; Biom*(Vm2/K2S*(Sext - Sint/(0.0001*Keq2))/(1 + Sext/K2S + Sint/(0.0001*K2Sin)));  // modifiers: Biom
  v_3: Sext -> $p; Dil*Sext;
  v_4: Sint -> Xint; Biom*(Vm4/K4Sint*(Sint/0.0001 - Xint/(0.0001*Keq4))/(1 + Sint/(0.0001*K4Sint) + Xint/(0.0001*K4X)));  // modifiers: Biom
  v_5: Xint -> Biom; Biom*(Vm5*Xint/(0.0001*K5X)/(1 + Xint/(0.0001*K5X)));
  v_6: Biom -> $p; Dil*Biom;
end
