// SBML level 2 version 1

model somogyi1()

  // Compartments:
  compartment ER = 1; ER is "endoplasmic reticulum";  // isVersionOf GO:0005783
  compartment cytoplasm = 1;  // isVersionOf GO:0005737
  compartment extracellular = 1;  // isVersionOf GO:0005576

  // Species:
  species x in ER = 1; x is "Ca_ER";  // kegg.compound:C00076 CHEBI:29108
  species y in cytoplasm = 1; y is "Ca_Cyt";  // kegg.compound:C00076 CHEBI:29108

  // Parameters:
  // Value of a is changed for different figures.
  a = 3;
  // Value of alpha is changed for different figures.
  alpha = 5;
  beta = 1;
  gamma = 1;
  k = 0.01;
  k1 = 2;
  n = 4;

  // Assignment rules:
  fy := y^n/(a^n + y^n);

  // Reactions:
  Ca_flux_into_the_cell: => y; gamma*cytoplasm;  // isVersionOf GO:0006816 GO:0007204
  reaction_0000002: x -> y; k*x*cytoplasm - k1*y*ER; reaction_0000002 is "Ca translocation between cytoplasm and ER";  // isVersionOf GO:0006816 GO:0007204 GO:0032471
  Ca_pumped_out_of_the_cell: y => ; beta*y*extracellular;  // isVersionOf GO:0006816 GO:0051481 GO:0005388
  InsP3_channel: x => y; alpha*fy*x*cytoplasm;  // isVersionOf GO:0051482 GO:0005220 GO:0006816
end
