// SBML level 2 version 1

model somogyi2()

  // Compartments:
  compartment Cytosol = 1;  // isVersionOf GO:0005829
  compartment ER = 1; ER is "Endoplasmic Reticulum";  // isVersionOf GO:0005783
  compartment Extracellular = 1;  // isVersionOf GO:0005576

  // Species:
  species x in ER = 1; x is "Ca_ER";  // kegg.compound:C00076 CHEBI:29108
  species y in Cytosol = 1; y is "Ca_Cyt";  // kegg.compound:C00076 CHEBI:29108

  // Parameters:
  a = 1.4;
  alpha = 10;
  beta = 1;
  gamma = 1;
  k = 0.01;
  k1 = 2;
  n = 4;

  // Assignment rules:
  // InsP3 induced calcium release channel.
  fy := y^n/(a^n + y^n);

  // Reactions:
  Ca_flux_into_the_cell: => y; gamma*Cytosol;  // isVersionOf GO:0007204 GO:0006816
  reaction_0000002: x => y; Cytosol*k*(x - y); reaction_0000002 is "Ca translocation from ER to Cytosol";  // isVersionOf GO:0006816 GO:0007204 GO:0032471
  Ca_transport_from_Cytosol_to_ER: y => x; k1*y*ER;  // isVersionOf GO:0051481 GO:0006816 GO:0032470
  InsP3_channel: x => y; alpha*fy*(x - y)*Cytosol;  // isVersionOf GO:0005220 GO:0051482 GO:0006816
  Ca_pumped_ouside_the_cell: y => ; beta*y*Extracellular;  // isVersionOf GO:0005388 GO:0006816 GO:0051481
end
