// SBML level 2 version 1

model thomsen1()

  // Compartments:
  compartment cell = 1;  // isVersionOf GO:0005623

  // Species:
  species DR in cell = 0;  // hasPart CHEBI:35569 uniprot:P18825 uniprot:P08913 uniprot:P18089
  species DRG in cell = 0;  // hasPart CHEBI:35569 uniprot:P18089 GO:0005834 uniprot:P08913
  species DRG_GDP in cell = 0;  // hasPart CHEBI:17552 CHEBI:35569 uniprot:P08913 GO:0005834
  species DRG_GTP in cell = 0;  // hasPart CHEBI:15996 CHEBI:35569 uniprot:P08913 GO:0005834
  species GDP in cell = 0;  // CHEBI:17552
  species GTP in cell = 1e-5;  // CHEBI:15996
  species G_GDP in cell = 1e-9;  // hasPart CHEBI:17552 GO:0005834
  species G_GTP in cell = 0;  // hasPart CHEBI:15996 GO:0005834
  species Recptor in cell = 1e-9;  // hasVersion uniprot:P08913 uniprot:P18089 uniprot:P18825
  species agonist in cell = 1e-8; agonist is "D";  // isVersionOf CHEBI:35569

  // Reactions:
  Forming: agonist + Recptor -> DR; cell*(k1*agonist*Recptor - k7*DR); Forming is "Forming DR";  // isVersionOf GO:0031690
    k7 = 0.5; k1 = 5000000;
  reaction_1: DR + G_GDP -> DRG_GDP; cell*(k2*DR*G_GDP - k8*DRG_GDP); reaction_1 is "DR binding with G_GDP produc DRG_GDP";  // isVersionOf GO:0001664
    k2 = 100000000; k8 = 0.1;
  GDP_releasing: DRG_GDP -> GDP + DRG; cell*(k3*DRG_GDP - k9*DRG*GDP);  // isVersionOf GO:0043241
    k3 = 0.1; k9 = 100000;
  GTP_binding_with_DRG: DRG + GTP -> DRG_GTP; cell*(k4*DRG*GTP - k10*DRG_GTP);  // isVersionOf GO:0005525 GO:0032403
    k4 = 10000000; k10 = 0.1;
  reaction_4: DRG_GTP => G_GTP + DR; cell*k5*DRG_GTP; reaction_4 is "DRG_GTP dissociates(G protein activation)";  // isVersionOf GO:0043241
    k5 = 0.05;
  G_protein_inactivated: G_GTP => G_GDP; cell*k6*G_GTP;  // isVersionOf GO:0003924
    k6 = 0.1;
end
