// SBML level 2 version 1

model thomsen2()

  // Compartments:
  compartment cell = 1;  // isVersionOf GO:0005623

  // Species:
  species D in cell = 3.1e-5;  // CHEBI:35569
  species DR in cell = 0;  // hasPart CHEBI:35569 uniprot:P08913 uniprot:P18089 uniprot:P18825
  species DRG in cell = 0;  // hasPart CHEBI:35569 uniprot:P08913 GO:0005834 uniprot:P18089
  species DRG_GDP in cell = 0;  // hasPart CHEBI:35569 CHEBI:17552 uniprot:P08913 GO:0005834
  species DRG_GTP in cell = 0;  // hasPart CHEBI:35569 CHEBI:15996 uniprot:P08913 GO:0005834
  species GDP in cell = 0;  // CHEBI:17552
  species GTP in cell = 1e-5;  // CHEBI:15996
  species G_GDP in cell = 1e-6;  // hasPart CHEBI:17552 GO:0005834
  species G_GTP in cell = 0;  // hasPart CHEBI:15996 GO:0005834
  species R in cell = 1e-10;  // hasVersion uniprot:P08913 uniprot:P18089 uniprot:P18825

  // Reactions:
  Forming_DR: D + R -> DR; cell*(k1*D*R - k7*DR);  // isVersionOf GO:0031690
    k1 = 5000000; k7 = 10;
  Reaction_2: DR + G_GDP -> DRG_GDP; cell*(k2*DR*G_GDP - k8*DRG_GDP); Reaction_2 is "DR Binding with G_GDP produce DRG_GDP";  // isVersionOf GO:0001664
    k2 = 100000000; k8 = 0.1;
  GDP_Releasing: DRG_GDP -> GDP + DRG; cell*(k3*DRG_GDP - k9*GDP*DRG);  // isVersionOf GO:0043241
    k3 = 5; k9 = 100000;
  GTP_binding_with_DRG: DRG + GTP -> DRG_GTP; cell*(k4*DRG*GTP - k10*DRG_GTP);  // isVersionOf GO:0005525 GO:0032403
    k4 = 5000000; k10 = 55;
  G_protein_activation: DRG_GTP => G_GTP + DR; cell*k5*DRG_GTP;  // isVersionOf GO:0043241
    k5 = 1;
  Hydrolysis_of_GTP_to_GDP: G_GTP => G_GDP; cell*k6*G_GTP;  // isVersionOf GO:0003924
    k6 = 2;
end
