// SBML level 3 version 1

model twoEnzymeCompInh1()
  // two enzyme pathway with inhibitor

  // Compartments:
  compartment default = 1;  // 0-D

  // Species:
  species $i1 in default = 0; i1 is "inhibitor";
  species $p in default = 0; p is "product";
  species $s in default = 5; s is "substrate";
  species x in default = 0; x is "intermediate";

  // Parameters:
  K1I1 = 1; K1I1 is "Affinity enzyme 1 for inhibitor I";
  Keq1 = 10; Keq1 is "Equilibrium constant reaction 1";
  Km1S1 = 1; Km1S1 is "Affinity enzyme 1 for S1";
  Km1X = 2; Km1X is "Affinity enzyme 1 for X";
  Km2X = 1; Km2X is "Affinity enzyme 2 for X";
  Vmax1 = 10; Vmax1 is "Max velocity enzyme 1";
  Vmax2 = 10; Vmax2 is "Max velocity enzyme 2";

  // Reactions:
  reaction_1: $s -> x; Vmax1*s/Km1S1*(1 - x/(s*Keq1))/(1 + s/Km1S1 + x/Km1X + i1/K1I1);  // modifiers: i1
  reaction_2: x -> $p; Vmax2*x/Km2X/(1 + x/Km2X);
end
