// SBML level 3 version 1

model twoEnzymeParCompInh1()
  // two enzyme pathway with inhibitor, host-parasite

  // Compartments:
  compartment default = 1;  // 0-D

  // Species:
  species $i1 in default = 0; i1 is "inhibitor";
  species $p in default = 0; p is "product";
  species $s in default = 5; s is "substrate";
  species xH in default = 0; xH is "intermediate host";
  species xP in default = 0; xP is "intermediate parasite";

  // Parameters:
  K1I1 = 1; K1I1 is "Affinity enzyme 1 for inhibitor I";
  Keq1 = 10; Keq1 is "Equilibrium constant reaction 1";
  Km1S1 = 1; Km1S1 is "Affinity enzyme 1 for S1";
  Km1X = 2; Km1X is "Affinity enzyme 1 for X";
  Km2X = 1; Km2X is "Affinity enzyme 2 for X";
  Vmax1H = 10; Vmax1H is "Max velocity enzyme 1";
  Vmax1P = 10;
  Vmax2 = 10; Vmax2 is "Max velocity enzyme 2";

  // Reactions:
  v1H: $s -> xH; Vmax1H*s/Km1S1*(1 - xH/(s*Keq1))/(1 + s/Km1S1 + xH/Km1X + i1/K1I1);  // modifiers: i1
  v1P: $s -> xP; Vmax1P*s/Km1S1*(1 - xP/(s*Keq1))/(1 + s/Km1S1 + xP/Km1X + i1/K1I1);  // modifiers: i1
  v2H: xH -> $p; Vmax2*xH/Km2X/(1 + xH/Km2X);
  v2P: xP -> $p; Vmax2*xP/Km2X/(1 + xP/Km2X);
end
