// SBML level 2 version 4

model tyson10()

  // Compartments:
  compartment env = 1;  // isVersionOf GO:0005623

  // Species:
  species $R in env;  // isVersionOf CHEBI:36080
  species Rp in env = 0;  // isVersionOf MOD:00696 kegg.compound:C00562
  species $S in env = 0;
  species X in env = 0;  // isVersionOf CHEBI:36080
  species $Y in env;  // isVersionOf CHEBI:36080
  species Yp in env = 0;  // isVersionOf GO:0016301 MOD:00696 kegg.compound:C00562

  // Parameters:
  Km3 = 0.01 M;
  Km4 = 0.01 M;
  Km5 = 0.01 M;
  Km6 = 0.01 M;
  Rt = 1 M;
  Yt = 1 M;
  k0 = 0 M_per_s;
  k1 = 1 per_s;
  k2 = 0.01 per_s;
  k2_prime = 10 per_M_per_s;
  k3 = 0.1 per_s;
  k4 = 0.2 M_per_s;
  k5 = 0.1 per_s;
  k6 = 0.05 M_per_s;

  // Assignment rules:
  R := Rt - Rp;
  Y := Yt - Yp;

  // Reactions:
  r1: => X; env*(k0 + k1*S);  // modifiers: S; isVersionOf GO:0009058
  r2: X => ; env*(k2 + k2_prime*Rp)*X;  // modifiers: Rp; isVersionOf GO:0009056
  r3: $Y => Yp; env*k3*X*(Yt - Yp)/(Km3 + (Yt - Yp));  // modifiers: X; isVersionOf GO:0006468
  r4: Yp => $Y; env*k4*Yp/(Km4 + Yp);  // isVersionOf GO:0006470
  r5: $R => Rp; env*k5*Yp*(Rt - Rp)/(Km5 + (Rt - Rp));  // modifiers: Yp; isVersionOf GO:0006468
  r6: Rp => $R; env*k6*Rp/(Km6 + Rp);  // isVersionOf GO:0006470

  // Unit definitions:
  unit per_M_per_s = litre / (second * mole);
  unit M = mole / litre;
  unit M_per_s = mole / (litre * second);
  unit per_s = 1 / second;
  unit s = second;
end
