// SBML level 2 version 4

function goldbeter_koshland(v1, v2, J1, J2)
  2*v1*J2/(v2 - v1 + J1*v2 + J2*v1 + ((v2 - v1 + J1*v2 + J2*v1)^2 - 4*(v2 - v1)*v1*J2)^(1/2));
end

model tyson12()

  // Compartments:
  compartment env = 1;  // isVersionOf GO:0005623

  // Species:
  species $E in env;  // isVersionOf CHEBI:36080
  species $Ep in env;  // isVersionOf MOD:00696 kegg.compound:C00562
  species R in env = 0;  // isVersionOf GO:0016301 CHEBI:36080
  species $S in env = 0;

  // Parameters:
  Et = 1 M;
  J3 = 0.05 dimensionless;
  J4 = 0.05 dimensionless;
  Km3 has M;
  Km4 has M;
  k0 = 0 M_per_s;
  k1 = 0.05 per_s;
  k2 = 0.1 per_s;
  k2_prime = 0.5 per_M_per_s;
  k3 = 0.2 M_per_s;
  k4 = 1 per_s;

  // Assignment rules:
  E := Et*goldbeter_koshland(k3, k4*R, J3, J4);
  Ep := Et - E;
  Km4 := J4*Et;
  Km3 := J3*Et;

  // Reactions:
  r0: => R; env*k0;  // isVersionOf GO:0009058
  r1: => R; env*k1*S;  // modifiers: S; isVersionOf GO:0009058
  r2: R => ; env*k2*R;  // isVersionOf GO:0009056
  r2_prime: R => ; env*k2_prime*R*E;  // modifiers: E; isVersionOf GO:0009056
  r3: $Ep => $E; env*k3*Ep/(Km3 + Ep);  // isVersionOf GO:0006470
  r4: $E => $Ep; env*k4*R*E/(Km4 + E);  // modifiers: R; isVersionOf GO:0006468

  // Unit definitions:
  unit per_M_per_s = litre / (second * mole);
  unit M = mole / litre;
  unit M_per_s = mole / (litre * second);
  unit per_s = 1 / second;
  unit s = second;
end
