// SBML level 2 version 4

function goldbeter_koshland(v1, v2, J1, J2)
  2*v1*J2/(v2 - v1 + J1*v2 + J2*v1 + ((v2 - v1 + J1*v2 + J2*v1)^2 - 4*(v2 - v1)*v1*J2)^(1/2));
end

model tyson13()

  // Compartments:
  compartment env = 1;  // isVersionOf GO:0005623

  // Species:
  species $E in env;  // isVersionOf CHEBI:36080
  species $Ep in env;  // hasVersion kegg.compound:C00562 MOD:00696
  species R in env = 0;  // hasProperty CHEBI:36080 GO:0016301
  species $S in env = 0;

  // Parameters:
  Et = 1 M;
  J3 = 0.05 M;
  J4 = 0.05 M;
  k0 = 0.4 per_s;
  k1 = 0.01 per_s;
  k2 = 1 per_s;
  k3 = 1 per_s;
  k4 = 0.2 M_per_s;

  // Assignment rules:
  Ep := goldbeter_koshland(k3*R, k4, J3, J4);
  E := Et - Ep;

  // Reactions:
  r1: => R; env*k0*Ep;  // modifiers: Ep; isVersionOf GO:0009058
  r2: => R; env*k1*S;  // modifiers: S; isVersionOf GO:0009058
  r3: R => ; env*k2*R;  // isVersionOf GO:0009056
  r4: $E => $Ep; env*k3*R*E/(J3 + E);  // modifiers: R; isVersionOf GO:0006470
  r5: $Ep => $E; env*k4*Ep/(J4 + Ep);  // isVersionOf GO:0006470

  // Unit definitions:
  unit per_M_per_s = litre / (second * mole);
  unit M = mole / litre;
  unit M_per_s = mole / (litre * second);
  unit per_s = 1 / second;
  unit s = second;
end
