// SBML level 2 version 4

model tyson14()

  // Compartments:
  compartment env = 1;  // isVersionOf GO:0005623

  // Species:
  species R in env = k1*k4/(k2*k3);  // isVersionOf CHEBI:36080
  species $S in env;
  species X in env = 0;  // isVersionOf CHEBI:36080

  // Parameters:
  k1 = 2 per_s;
  k2 = 2 per_M_per_s;
  k3 = 1 per_s;
  k4 = 1 per_s;
  tau = 4;

  // Assignment rules:
  S := 1*floor(time/tau);

  // Reactions:
  r1: => R; env*k1*S;  // modifiers: S; isVersionOf GO:0009058
  r2: R => ; env*k2*R*X;  // modifiers: X; isVersionOf GO:0009056
  r3: => X; env*k3*S;  // modifiers: S; isVersionOf GO:0009058
  r4: X => ; env*k4*X;  // isVersionOf GO:0009056

  // Unit definitions:
  unit per_M_per_s = litre / (second * mole);
  unit M = mole / litre;
  unit M_per_s = mole / (litre * second);
  unit per_s = 1 / second;
  unit s = second;
end
