// SBML level 3 version 1

model tyson3()

  // Compartments:
  compartment default_compartment = 1;

  // Species:
  species C2 in default_compartment = 0;
  species CP in default_compartment = 1;
  species M in default_compartment = 0;
  species $P in default_compartment = 1;
  species $S in default_compartment = 1;
  species Y in default_compartment = 0;
  species YP in default_compartment = 0;
  species pM in default_compartment = 0.3;

  // Parameters:
  k1aa = 0.015;
  k2 = 0;
  k3 = 200;
  k4 = 180;
  k4prime = 0.018;
  k5notP = 0;
  k6 = 1;
  k7 = 0.6;
  k8notP = 1000000;
  k9 = 1000;

  // Assignment rules:
  CT := C2 + CP + pM + M;
  YT_to_CT := YT/CT;
  YT := Y + YP + pM + M;
  M_to_CT := M/CT;

  // Reactions:
  v_1: M -> YP + C2; k6*M;
  v_2: C2 -> CP; C2*k8notP;
  v_3: CP -> C2; CP*k9;
  v_4: Y + CP -> pM; CP*k3*Y;
  v_5: M -> pM; k5notP*M;
  v_6: $S -> Y; k1aa;
  v_7: Y -> $P; k2*Y;
  v_8: YP -> $P; k7*YP;
  v_9: pM -> M; pM*(k4prime + k4*M^2);
end
