// SBML level 3 version 1

model tyson4()

  // Compartments:
  compartment default_compartment = 1;

  // Species:
  species Cdc20A in default_compartment = 0.9354691;
  species Cdc20T in default_compartment = 1.699385;
  species Cdh1 in default_compartment = 0.03924449;
  species CycB in default_compartment = 0.6373719;
  species IEP in default_compartment = 0.6638799;
  species m in default_compartment = 0.8992858;
  species $p in default_compartment = 1;
  species $s in default_compartment = 1;

  // Parameters:
  J3 = 0.04;
  J4 = 0.04;
  J5 = 0.3;
  J7 = 0.001;
  J8 = 0.001;
  MAD = 1;
  k1 = 0.04;
  k10 = 0.02;
  k21 = 0.04;
  k22 = 1;
  k31 = 1;
  k32 = 10;
  k4 = 35;
  k51 = 0.005;
  k52 = 0.2;
  k6 = 0.1;
  k7 = 1;
  k8 = 0.5;
  k9 = 0.1;
  mu = 0.01;
  n = 4;

  // Reactions:
  v_1: $s -> CycB; k1;
  v_10: $s -> IEP; k9*m*CycB*(1 - IEP);  // modifiers: CycB, m
  v_11: IEP -> $p; k10*IEP;
  v_12: $s -> m; mu*m;
  v_2: CycB -> $p; (k21 + k22*Cdh1)*CycB;  // modifiers: Cdh1
  v_3: $s -> Cdh1; (k31 + k32*Cdc20A)*(1 - Cdh1)/(J3 + 1 - Cdh1);  // modifiers: Cdc20A
  v_4: Cdh1 -> $p; k4*m*CycB*Cdh1/(J4 + Cdh1);  // modifiers: m, CycB
  v_5: $s -> Cdc20T; k51 + k52*(CycB*m/J5)^n/(1 + (CycB*m/J5)^n);  // modifiers: CycB, m
  v_6: Cdc20T -> $p; k6*Cdc20T;
  v_7: $s -> Cdc20A; k7*IEP*(Cdc20T - Cdc20A)/(J7 + Cdc20T - Cdc20A);  // modifiers: IEP, Cdc20T
  v_8: Cdc20A -> $p; k8*MAD*Cdc20A/(J8 + Cdc20A);
  v_9: Cdc20A -> $p; k6*Cdc20A;
end
