// SBML level 3 version 1

function GK(a, b, c, d)
  2*a*d/(b - a + b*c + a*d + ((b - a + b*c + a*d)^2 - 4*a*d*(b - a))^0.5);
end

model tyson5()

  // Compartments:
  compartment default_compartment = 1;

  // Species:
  species Cdc20A in default_compartment = 0.001;
  species Cdc20T in default_compartment = 0.001;
  species Cdh1 in default_compartment = 0.001;
  species CycBT in default_compartment = 0.001;
  species IEP in default_compartment = 0.001;
  species SK in default_compartment = 0.001;
  species $ext in default_compartment = 0;
  species m in default_compartment = 0.5;

  // Parameters:
  J3 = 0.04;
  J4 = 0.04;
  J5 = 0.3;
  J7 = 0.001;
  J8 = 0.001;
  MAD = 1;
  k0 = 0;
  k1 = 0.04;
  k10 = 0.02;
  k21 = 0.04;
  k22 = 1;
  k31 = 1;
  k32 = 10;
  k4 = 35;
  k51 = 0.005;
  k52 = 0.2;
  k6 = 0.1;
  k7 = 1;
  k8 = 0.5;
  k9 = 0.1;
  mu = 0.01;
  n = 4;

  // Assignment rules:
  CycB := CycBT;
  TF := GK(1.5*m + 0.05*SK, 1 + 3*m*CycB, 0.01, 0.01);

  // Reactions:
  v_1: $ext -> CycBT; k1 + k0*SK;  // modifiers: SK
  v_10: $ext -> IEP; k9*m*CycB*(1 - IEP);  // modifiers: m
  v_11: IEP -> $ext; k10*IEP;
  v_12: $ext -> m; 0.005*m*(1 - m/10);
  v_13: $ext -> SK; 1*TF + k0*SK;
  v_14: SK -> $ext; 1*SK;
  v_2: CycBT -> $ext; (k21 + k22*Cdh1 + 1*Cdc20A)*CycBT;  // modifiers: Cdh1, Cdc20A
  v_3: $ext -> Cdh1; (k31 + k32*Cdc20A)*(1 - Cdh1)/(J3 + 1 - Cdh1);  // modifiers: Cdc20A
  v_4: Cdh1 -> $ext; (2*SK + k4*m*CycB)*Cdh1/(J4 + Cdh1);  // modifiers: m, SK
  v_5: -> Cdc20T; k51 + k52*(CycB*m/J5)^n/(1 + (CycB*m/J5)^n);  // modifiers: m
  v_6: Cdc20T -> $ext; k6*(Cdc20T - Cdc20A);  // modifiers: Cdc20A
  v_7: $ext -> Cdc20A; k7*IEP*(Cdc20T - Cdc20A)/(J7 + Cdc20T - Cdc20A);  // modifiers: Cdc20T, IEP
  v_8: Cdc20A -> $ext; k8*MAD*Cdc20A/(J8 + Cdc20A);
  v_9: Cdc20A + Cdc20T -> $ext; k6*Cdc20A;
end
