// SBML level 2 version 1

model tyson6()

  // Compartments:
  compartment CYTOPLASM = 1;  // isVersionOf GO:0005737
  compartment default = 1;

  // Species:
  species $EmptySet in default = 0;
  species M in CYTOPLASM = 0;
  species P in CYTOPLASM = 0; P is "Pt";  // uniprot:P07663

  // Parameters:
  N_A = 6.0221367e23;

  // Reactions:
  DBT: P => $EmptySet; CYTOPLASM*((k1*P*(2/(1 + (1 + 8*DBT_Keq*P)^0.5)) + k2*P)/(J + P)); DBT is "Per phosphorylation and degradation";  // isVersionOf ec-code:2.7.1.37 GO:0006468 GO:0030163
    k1 = 10; k2 = 0.03; J = 0.05; DBT_Keq = 200;
  ProteinD: P => $EmptySet; ProteinD_D*P*CYTOPLASM; ProteinD is "protein degradation";  // isVersionOf GO:0030163
    ProteinD_D = 0.1;
  TC: $EmptySet => M; CYTOPLASM*(Vm/(1 + (P*(1 - 2/(1 + (1 + 8*TC_Keq*P)^0.5))/(2*Pcrit))^2)); TC is "transcription";  // modifiers: P; isVersionOf GO:0006355 GO:0009299
    Vm = 1; Pcrit = 0.1; TC_Keq = 200;
  TL: $EmptySet => P; V*M*CYTOPLASM; TL is "translation";  // modifiers: M; isVersionOf GO:0006412
    V = 0.5;
  mRNAD: M => $EmptySet; mRNAD_D*M*CYTOPLASM; mRNAD is "mRNA degradation";  // isVersionOf GO:0006402
    mRNAD_D = 0.1;

  // Unit definitions:
  unit hour = 3600 second;
end
