// SBML level 2 version 3

function GK(A1, A2, A3, A4)
  2*A4*A1/(A2 - A1 + A3*A2 + A4*A1 + sqrt((A2 - A1 + A3*A2 + A4*A1)^2 - 4*(A2 - A1)*A4*A1));
end
GK is "Goldbeter Koshland Function";

model tyson7()

  // Compartments:
  compartment cell = 1;  // GO:0005623

  // Species:
  substanceOnly species CKIt in cell = 0.001;  // isVersionOf uniprot:P38634
  substanceOnly species Cdc20a in cell = 0.001;  // isVersionOf uniprot:P26309
  substanceOnly species Cdc20t in cell = 0.001;  // isVersionOf uniprot:P26309
  substanceOnly species Cdh1 in cell = 0.001;  // isVersionOf uniprot:P53197
  substanceOnly species CycB in cell;  // hasPart interpro:IPR015454 uniprot:P00546
  substanceOnly species CycBt in cell = 0.001;  // hasPart uniprot:P24868 uniprot:P24869 uniprot:P24870 uniprot:P24871
  substanceOnly species IEP in cell = 0.001;
  substanceOnly species Mad in cell;  // isVersionOf uniprot:P40957
  substanceOnly species SK in cell = 0.001;  // isVersionOf interpro:IPR014399 uniprot:P20438 uniprot:P20437
  substanceOnly species Trimer in cell;  // hasPart interpro:IPR015454 uniprot:P38634 uniprot:P00546
  substanceOnly species m in cell = 0.5;  // isVersionOf GO:0016049

  // Parameters:
  J15 = 0.01;
  J16 = 0.01;
  J3 = 0.04;
  J4 = 0.04;
  J5 = 0.3;
  J7 = 0.001;
  J8 = 0.001;
  Keq = 1000;
  k1 = 0.04;
  k10 = 0.02;
  k11 = 1;
  k12p = 0.2;
  k12pp = 50;
  k12ppp = 100;
  k13 = 1;
  k14 = 1;
  k15p = 1.5;
  k15pp = 0.05;
  k16p = 1;
  k16pp = 3;
  k2p = 0.04;
  k2pp = 1;
  k2ppp = 1;
  k3p = 1;
  k3pp = 10;
  k4 = 35;
  k4p = 2;
  k5p = 0.005;
  k5pp = 0.2;
  k6 = 0.1;
  k7 = 1;
  k8 = 0.5;
  k9 = 0.1;
  mmax = 10;
  mu = 0.005;
  n = 4;

  // Assignment rules:
  Mad := 1;
  TF := GK(k15p*m + k15pp*SK, k16p + k16pp*m*CycB, J15, J16);
  Trimer := 2*CycBt*CKIt/(CycBt + CKIt + 1/Keq + ((CycBt + CKIt + 1/Keq)^2 - 4*CycBt*CKIt)^(1/2));
  CycB := CycBt - 2*CycBt*CKIt/(CycBt + CKIt + 1/Keq + ((CycBt + CKIt + 1/Keq)^2 - 4*CycBt*CKIt)^(1/2));

  // Reactions:
  CKIdegradation: CKIt => ; k12p*CKIt; CKIdegradation is "CKIt degradation";
  CKItphosphorilationviaSK: CKIt => ; k12pp*SK*CKIt; CKItphosphorilationviaSK is "CKIt phosphorilation via SK";  // modifiers: SK
  CKItsynthesis: => CKIt; k11; CKItsynthesis is "CKIt synthesis";
  Cdc20activation: => Cdc20a; k7*IEP*(Cdc20t - Cdc20a)/(J7 + Cdc20t - Cdc20a); Cdc20activation is "Cdc20 activation";  // modifiers: IEP, Cdc20t
  Cdc20adegradation: Cdc20a => ; k6*Cdc20a; Cdc20adegradation is "Cdc20a degradation";
  Cdc20ainhibition: Cdc20a => ; k8*Mad*Cdc20a/(J8 + Cdc20a); Cdc20ainhibition is "Cdc20a inhibition";  // modifiers: Mad
  Cdc20t_deg: Cdc20t => ; k6*Cdc20t; Cdc20t_deg is "Cdc20t degradation";
  Cdc20tsynthesis: => Cdc20t; k5p + k5pp*(CycB*m/J5)^n/(1 + (CycB*m/J5)^n); Cdc20tsynthesis is "Cdc20t synthesis";  // modifiers: m, CycB
  Cdh1degradation: Cdh1 => ; (k4p*SK*Cdh1 + k4*m*CycB*Cdh1)/(J4 + Cdh1); Cdh1degradation is "Cdh1 degradation";  // modifiers: CycB, m, SK
  Cdh1synthesis: => Cdh1; (k3p + k3pp*Cdc20a)*(1 - Cdh1)/(J3 + 1 - Cdh1); Cdh1synthesis is "Cdh1 synthesis";  // modifiers: Cdc20a
  CycBdegradation: CycBt => ; k2p*CycBt; CycBdegradation is "CycBt degradation";
  CycBdegradationviaCdh1: CycBt => ; k2pp*Cdh1*CycBt; CycBdegradationviaCdh1 is "CycBt degradation via Cdh1";  // modifiers: Cdh1
  CycBt_synthesis: => CycBt; k1;
  CycBtdegradationviaCdc20a: CycBt => ; k2ppp*Cdc20a*CycBt; CycBtdegradationviaCdc20a is "CycBt degradation via Cdc20a";  // modifiers: Cdc20a
  IEPdegradation: IEP => ; k10*IEP; IEPdegradation is "IEP degradation";
  IEPsynthesis: => IEP; k9*m*CycB*(1 - IEP); IEPsynthesis is "IEP synthesis";  // modifiers: CycB, m
  SKdegradation: SK => ; k14*SK; SKdegradation is "SK degradation";
  SKsynthesis: => SK; k13*TF; SKsynthesis is "SK synthesis";
  eq_7: CKIt => ; k12ppp*m*CycB*CKIt; eq_7 is "CKIt Trimer sequestred";  // modifiers: CycB, m
  growth: => m; mu*m*(1 - m/mmax);

  // Events:
  at (CycB < 0.1): m = m/2;  // Cell division; GO:0000910

  // Unit definitions:
  unit minutes = 60 second;
  unit normalized = dimensionless;
end
