// SBML level 2 version 4

function goldbeter_koshland(v1, v2, J1, J2)
  2*v1*J2/(v2 - v1 + J1*v2 + J2*v1 + ((v2 - v1 + J1*v2 + J2*v1)^2 - 4*(v2 - v1)*v1*J2)^(1/2));
end

model tyson9()

  // Compartments:
  compartment env = 1;  // isVersionOf GO:0005623

  // Species:
  species $E in env;  // isVersionOf CHEBI:36080
  species $Ep in env;  // isVersionOf MOD:00696 kegg.compound:C00562
  species R in env = 0;
  species $S in env = 0;
  species X in env = 0;

  // Parameters:
  Et = 1 M;
  J3 = 0.05 dimensionless;
  J4 = 0.05 dimensionless;
  Km3 has M;
  Km4 has M;
  k0 = 0.4 per_M_per_s;
  k0_prime = 0.01 per_s;
  k1 = 1 per_s;
  k2 = 1 per_s;
  k3 = 1 per_s;
  k4 = 0.3 M_per_s;

  // Assignment rules:
  Km3 := J3*Et;
  Km4 := J4*Et;
  E := Et - Ep;
  Ep := goldbeter_koshland(k3*R, k4, J3, J4)*Et;

  // Reactions:
  r0: X => R; env*(k0_prime + k0*Ep)*X;  // modifiers: Ep
  r1: => X; env*k1*S;  // modifiers: S; isVersionOf GO:0009058
  r2: R => ; env*k2*R;  // isVersionOf GO:0009056
  r3: $E => $Ep; env*k3*R*E/(Km3 + E);  // modifiers: R; isVersionOf GO:0006468
  r4: $Ep => $E; env*k4*Ep/(Km4 + Ep);  // isVersionOf GO:0006470

  // Unit definitions:
  unit per_M_per_s = litre / (second * mole);
  unit M = mole / litre;
  unit M_per_s = mole / (litre * second);
  unit per_s = 1 / second;
  unit s = second;
end
