// SBML level 3 version 1

model vanEunen5()

  // Compartments:
  compartment default_compartment = 1;

  // Species:
  species ACALD in default_compartment = 0.04;
  species BPG in default_compartment = 1e-5;
  species F16P in default_compartment = 0.25;
  species F6P in default_compartment = 0.2;
  species G6P in default_compartment = 1.2;
  species GLCi in default_compartment = 0.1;
  species NADH in default_compartment = 0.29;
  species P2G in default_compartment = 0.06;
  species P3G in default_compartment = 0.54;
  species PEP in default_compartment = 0.5;
  species PYR in default_compartment = 0.14;
  species TRIO in default_compartment = 1;

  // Parameters:
  ACE = 10;
  ADP = 1;
  AMP = 0.3;
  CGAPDH = 1;
  CO2 = 1;
  CPFKAMP = 0.0845;
  CPFKATP = 3;
  CPFKF16BP = 0.397;
  CPFKF26BP = 0.0174;
  CiPFKATP = 100;
  ETOH = 25;
  EXTERNAL = 1;
  F26BP = 0.014;
  GLY = 10;
  KACE = 0.5;
  KEQADH = 6.9e-5;
  KEQALD = 0.069;
  KEQENO = 6.7;
  KEQGLT = 1;
  KEQHK = 3800;
  KEQPGI = 0.314;
  KEQPGK = 3200;
  KEQPGM = 0.19;
  KEQTPI = 0.045;
  KGLY = 17.5;
  KIADHACALD = 1.1;
  KIADHETOH = 90;
  KIADHNAD = 0.92;
  KIADHNADH = 0.031;
  KIHKT6P = 0.04;
  KMADHACALD = 1.11;
  KMADHETOH = 17;
  KMADHNAD = 0.17;
  KMADHNADH = 0.11;
  KMALDDHAP = 2.4;
  KMALDF16P = 0.3;
  KMALDGAP = 2;
  KMALDGAPi = 10;
  KMENOP2G = 0.04;
  KMENOPEP = 0.5;
  KMGAPDHBPG = 0.51;
  KMGAPDHGAP = 0.39;
  KMGAPDHNAD = 2.85;
  KMGAPDHNADH = 0.007;
  KMGLTGLCi = 1;
  KMGLTGLCo = 1;
  KMHKADP = 0.23;
  KMHKATP = 0.15;
  KMHKG6P = 30;
  KMHKGLCi = 0.08;
  KMPDCPYR = 6.36;
  KMPFKATP = 0.71;
  KMPFKF6P = 0.1;
  KMPGIF6P = 0.3;
  KMPGIG6P = 1.4;
  KMPGKADP = 0.2;
  KMPGKATP = 0.3;
  KMPGKBPG = 0.003;
  KMPGKP3G = 0.53;
  KMPGMP2G = 0.08;
  KMPGMP3G = 1.2;
  KMPYKADP = 0.3;
  KMPYKATP = 9.3;
  KMPYKF16P = 0.2;
  KMPYKPEP = 0.19;
  KPFKAMP = 0.0995;
  KPFKF16BP = 0.111;
  KPFKF26BP = 0.000682;
  KSUC = 0.9;
  KTRE1 = 0;
  KTRE2 = 0;
  KiPFKATP = 0.65;
  L0 = 0.66;
  L10 = 60000;
  NADt = 1.59;
  NHPDC = 1.9;
  T6P = 0.2;
  TREH = 2;
  VMAXADH = 932;
  VMAXALD = 310;
  VMAXENO = 357;
  VMAXGAPDHf = 1487;
  VMAXGAPDHr = 853;
  VMAXGLT = 160;
  VMAXHK = 213;
  VMAXPDC = 395;
  VMAXPFK = 213;
  VMAXPGI = 787;
  VMAXPGK = 2512;
  VMAXPGM = 856;
  VMAXPYK = 820;
  atp1 = 3;
  atp2 = 1.5;
  gR = 5.12;
  glc1 = 0.2;
  glc2 = 5;
  n10 = 4;
  tswitch = 10;

  // Reactions:
  v_1: -> GLCi; VMAXGLT*(piecewise(glc1, time < tswitch, glc2)/KMGLTGLCo - GLCi/(KMGLTGLCo*KEQGLT))/(1 + piecewise(glc1, time < tswitch, glc2)/KMGLTGLCo + GLCi/KMGLTGLCi + 0.91*piecewise(glc1, time < tswitch, glc2)*GLCi/(KMGLTGLCo*KMGLTGLCi));
  v_10: BPG -> P3G; VMAXPGK*(KEQPGK*BPG*ADP/(KMPGKP3G*KMPGKATP) - P3G*piecewise(atp1, time < tswitch, atp2)/(KMPGKP3G*KMPGKATP))/((1 + BPG/KMPGKBPG + P3G/KMPGKP3G)*(1 + piecewise(atp1, time < tswitch, atp2)/KMPGKATP + ADP/KMPGKADP));
  v_11: P3G -> P2G; VMAXPGM*(P3G/KMPGMP3G - P2G/(KMPGMP3G*KEQPGM))/(1 + P3G/KMPGMP3G + P2G/KMPGMP2G);
  v_12: P2G -> PEP; VMAXENO*(P2G/KMENOP2G - PEP/(KMENOP2G*KEQENO))/(1 + P2G/KMENOP2G + PEP/KMENOPEP);
  v_13: PEP -> PYR; VMAXPYK*PEP/KMPYKPEP*(1 + PEP/KMPYKPEP)^(n10 - 1)/(L10*((piecewise(atp1, time < tswitch, atp2)/KMPYKATP + 1)/(F16P/KMPYKF16P + 1))^n10 + (1 + PEP/KMPYKPEP)^n10)*ADP/(ADP + KMPYKADP);  // modifiers: F16P
  v_14: PYR -> ACALD; VMAXPDC*PYR^NHPDC/(KMPDCPYR^NHPDC*(1 + PYR^NHPDC/KMPDCPYR^NHPDC));
  v_15: 2 PYR -> 3 NADH; KSUC;
  v_16: ACALD + NADH -> ; -(VMAXADH*((NADt - NADH)*ETOH/(KIADHNAD*KMADHETOH) - NADH*ACALD/(KIADHNAD*KMADHETOH*KEQADH)))/(1 + (NADt - NADH)/KIADHNAD + KMADHNAD*ETOH/(KIADHNAD*KMADHETOH) + KMADHNADH*ACALD/(KIADHNADH*KMADHACALD) + NADH/KIADHNADH + (NADt - NADH)*ETOH/(KIADHNAD*KMADHETOH) + KMADHNADH*(NADt - NADH)*ACALD/(KIADHNAD*KIADHNADH*KMADHACALD) + KMADHNAD*ETOH*NADH/(KIADHNAD*KMADHETOH*KIADHNADH) + NADH*ACALD/(KIADHNADH*KMADHACALD) + (NADt - NADH)*ETOH*ACALD/(KIADHNAD*KMADHETOH*KIADHACALD) + ETOH*NADH*ACALD/(KIADHETOH*KIADHNADH*KMADHACALD));
  v_17: ACALD -> NADH; KACE*ACALD;
  v_2: GLCi -> G6P; VMAXHK*(GLCi/KMHKGLCi*piecewise(atp1, time < tswitch, atp2)/KMHKATP - G6P*ADP/(KMHKGLCi*KMHKATP*KEQHK))/((1 + GLCi/KMHKGLCi + G6P/KMHKG6P + T6P/KIHKT6P)*(1 + piecewise(atp1, time < tswitch, atp2)/KMHKATP + ADP/KMHKADP));
  v_3: -> 2 GLCi; KTRE1;
  v_4: G6P -> F6P; VMAXPGI*(G6P/KMPGIG6P - F6P/(KMPGIG6P*KEQPGI))/(1 + G6P/KMPGIG6P + F6P/KMPGIF6P);
  v_5: 2 G6P -> ; KTRE2;
  v_6: F6P -> F16P; VMAXPFK*gR*F6P*piecewise(atp1, time < tswitch, atp2)*(1 + F6P/KMPFKF6P*piecewise(atp1, time < tswitch, atp2)/KMPFKATP + gR*F6P*piecewise(atp1, time < tswitch, atp2)/(KMPFKF6P*KMPFKATP))/(KMPFKF6P*KMPFKATP*((1 + F6P/KMPFKF6P*piecewise(atp1, time < tswitch, atp2)/KMPFKATP + gR*F6P*piecewise(atp1, time < tswitch, atp2)/(KMPFKF6P*KMPFKATP))^2 + L0*(1 + CiPFKATP*piecewise(atp1, time < tswitch, atp2)/KiPFKATP)^2*(1 + CPFKAMP*AMP/KPFKAMP)^2*(1 + CPFKF26BP*F26BP/KPFKF26BP + CPFKF16BP*F16P/KPFKF16BP)^2/((1 + piecewise(atp1, time < tswitch, atp2)/KiPFKATP)^2*(1 + AMP/KPFKAMP)^2*(1 + F26BP/KPFKF26BP + F16P/KPFKF16BP)^2)*(1 + CPFKATP*piecewise(atp1, time < tswitch, atp2)/KMPFKATP)^2));
  v_7: F16P -> 2 TRIO; VMAXALD*(F16P/KMALDF16P - KEQTPI/(1 + KEQTPI)*TRIO*1/(1 + KEQTPI)*TRIO/(KMALDF16P*KEQALD))/(1 + F16P/KMALDF16P + KEQTPI/(1 + KEQTPI)*TRIO/KMALDGAP + 1/(1 + KEQTPI)*TRIO/KMALDDHAP + KEQTPI/(1 + KEQTPI)*TRIO*1/(1 + KEQTPI)*TRIO/(KMALDGAP*KMALDDHAP) + F16P*KEQTPI/(1 + KEQTPI)*TRIO/(KMALDGAPi*KMALDF16P));
  v_8: NADH + TRIO -> ; KGLY;
  v_9: TRIO -> BPG + NADH; CGAPDH*(VMAXGAPDHf*KEQTPI/(1 + KEQTPI)*TRIO*(NADt - NADH)/(KMGAPDHGAP*KMGAPDHNAD) - VMAXGAPDHr*BPG*NADH/(KMGAPDHBPG*KMGAPDHNADH))/((1 + KEQTPI/(1 + KEQTPI)*TRIO/KMGAPDHGAP + BPG/KMGAPDHBPG)*(1 + (NADt - NADH)/KMGAPDHNAD + NADH/KMGAPDHNADH));
end
