// SBML level 2 version 4

model veening1()

  // Compartments:
  compartment univ = 1;  // isVersionOf GO:0005623

  // Species:
  species AprE in univ = 0;  // isVersionOf uniprot:P04189
  species DegU in univ = 0;  // isVersionOf uniprot:P13800
  species DegUP in univ = 0;  // isVersionOf uniprot:P13800
  species Dim in univ = 0;  // isVersionOf GO:0042803
  species mAprE in univ = 0;  // encodes uniprot:P04189
  species mDegU in univ = 0;  // encodes uniprot:P13800

  // Parameters:
  Imax = 0.048;
  Io = 0.004;
  Irmax = 0.4;
  Iro = 0.02;
  K = 7;
  Kdim = 12;
  Kr = 7;
  Kr1 = 7;
  R = 7;
  V = 1;
  ka = 0.025;
  kd = 0.1;
  kdeg = 0.0004;
  kdegA = 0.0001;
  kdegm = 0.01;
  ksyn = 0.04;
  ksyn1 = 0.04;
  p = 0.15;
  q = 0.004;
  ratio = 0.026666667; ratio is "kphosratiokdephos";

  // Assignment rules:
  DegU_Total := DegU + DegUP + 2*Dim;
  kdephos := q/ratio;
  kphos := ratio*p;

  // Reactions:
  AprEdeg: AprE => ; kdeg*AprE;  // isVersionOf GO:0030163
  AprEsyn: => AprE; ksyn*mAprE*univ;  // modifiers: mAprE; isVersionOf GO:0006412
  DimerAss: 2 DegUP => Dim; ka*DegUP^2;  // isVersionOf GO:0042803
  DimerDis: Dim => 2 DegUP; kd*Dim;  // isVersionOf GO:0043241
  degradation1: DegU => ; kdeg*DegU*univ;  // isVersionOf GO:0030163
  degradation2: DegUP => ; kdeg*DegUP*univ;  // isVersionOf GO:0030163
  degradation3: Dim => ; kdeg*Dim*univ;  // isVersionOf GO:0030163
  degradationmRNA: mDegU => ; kdegm*mDegU;  // isVersionOf GO:0006402
  dephosphorylation: DegUP => DegU; kdephos*DegUP;  // isVersionOf GO:0006470
  mRNAAprEdeg: mAprE => ; kdegm*mAprE;  // isVersionOf GO:0006402
  mRNAAprEsyn: => mAprE; Kr1/(R + Kr1)*(Iro*(Dim*univ/Kdim + 1)/(1 + Dim*univ/Kdim + (Dim*univ)^2/Kdim^2 + R/Kr) + Irmax*(Dim*univ)^2/(Kdim^2*(1 + Dim*univ/Kdim + (Dim*univ)^2/Kdim^2 + R/Kr)));  // modifiers: Dim; isVersionOf GO:0009299
  phosphorylation: DegU => DegUP; kphos*DegU;  // isVersionOf GO:0006468
  synthesisDegU: => DegU; ksyn1*mDegU*univ;  // modifiers: mDegU; isVersionOf GO:0006412
  synthesismRNA: => mDegU; Io*K/(Dim*univ + K) + Imax*Dim*univ/(Dim*univ + K);  // modifiers: Dim; isVersionOf GO:0006412

  // Unit definitions:
  unit molecules = item;
  unit femtolitre = 1e-15 litre;
end
