// SBML level 2 version 4

model vernoux2()

  // Compartments:
  compartment c_1 = 1;  // isVersionOf GO:0005623

  // Species:
  species A in c_1 = 10; A is "ARF";  // isVersionOf uniprot:Q94JM3
  species D_IA in c_1 = 10; D_IA is "Aux/IAA:ARF";  // hasPart uniprot:Q94JM3 uniprot:P49677
  species D_II in c_1 = 10; D_II is "Aux/IAA:Aux/IAA";  // hasPart uniprot:P49677
  species I in c_1 = 10; I is "Aux/IAA";  // isVersionOf uniprot:P49677
  species R in c_1 = 1; R is "mRNA";  // isVersionOf CHEBI:33699
  species aux in c_1; aux is "auxin";  // isVersionOf uniprot:Q96247

  // Parameters:
  B_d = 100;
  K_IA = 10;
  K_II = 10;
  K_aux = 1;
  // ARF degradation rate, based on the value for ARF1, cf. Salmon et al. The Plant Journal (2008)
  d_A = 0.003;
  // Aux/IAA basal degradation rate (without auxin), based on half-lifes measured in Dreher et al. The Plant Cell 2006.
  d_I = 0.05;
  d_IA = 0.003;
  d_II = 0.003;
  // Auxin target gene mRNA degradation rate. Computed from the mean half life of Aux/IAA mRNA in Narsai et al. The Plant Cell 2007.
  d_r = 0.007;
  f_A = 10;
  f_c = 10;
  gamma_I = 10;
  k_Am = 10;
  k_IA = 1;
  k_II = 1;
  pi_A = 1;
  pi_I = 1;
  w_A = 10;
  w_D = 10;
  w_I = 10;

  // Assignment rules:
  aux_basal := 1/(K_aux*(gamma_I - 1));
  kprime_II := K_II*k_II;
  kprime_IA := K_IA*k_IA;
  aux := 1.11*sin(2*3.1416/800*(time - 200)) + 1.11;

  // Reactions:
  reac_DIA: I + A -> D_IA; k_IA*I*A - kprime_IA*D_IA;  // isVersionOf GO:0006461
  reac_DIAxA: D_IA => A; gamma_I*d_I*K_aux*aux/(K_aux*aux + 1)*D_IA;  // modifiers: aux; isVersionOf GO:0043241
  reac_DII: I + I -> D_II; k_II*I*I - kprime_II*D_II;  // isVersionOf GO:0006461
  reac_DIIxI: D_II => I; gamma_I*d_I*K_aux*aux/(K_aux*aux + 1)*D_II;  // modifiers: aux; isVersionOf GO:0043241
  reac_degrA: A => ; d_A*A;  // isVersionOf GO:0009056
  reac_degrDIA: D_IA => ; d_IA*D_IA;  // isVersionOf GO:0009056
  reac_degrDII: D_II => ; d_II*D_II;  // isVersionOf GO:0009056
  reac_degrI: I => ; gamma_I*d_I*K_aux*aux/(K_aux*aux + 1)*I;  // modifiers: aux; isVersionOf GO:0009056
  reac_degrR: R => ; d_r*R;  // isVersionOf GO:0009056
  reac_prodA: => A; pi_A;  // isVersionOf GO:0009058
  reac_prodI: => I; pi_I*R;  // modifiers: R; isVersionOf GO:0009058
  reac_prodR: => R; (1 + f_c/B_d*A*(1 + w_A*f_A*A/B_d))/(1 + A/B_d*(1 + w_A*A/B_d) + w_I*A*I/(K_IA*B_d) + w_D*D_IA/B_d + k_Am);  // modifiers: I, D_IA, A; isVersionOf GO:0009299
end
