// SBML level 2 version 3

model vilar1()

  // Compartments:
  compartment deterministicOscillator = 1;

  // Species:
  substanceOnly species A in deterministicOscillator = 0;  // isVersionOf CHEBI:36080
  substanceOnly species C in deterministicOscillator = 0;  // isVersionOf CHEBI:36080
  substanceOnly species DA in deterministicOscillator = 1;
  substanceOnly species DAp in deterministicOscillator = 0;
  substanceOnly species DR in deterministicOscillator = 1;
  substanceOnly species DRp in deterministicOscillator = 0;
  substanceOnly species $EmptySet in deterministicOscillator = 0;
  substanceOnly species MA in deterministicOscillator = 0;  // isVersionOf CHEBI:33699
  substanceOnly species MR in deterministicOscillator = 0;  // isVersionOf CHEBI:33699
  substanceOnly species R in deterministicOscillator = 0;  // isVersionOf CHEBI:36080

  // Reactions:
  Reaction1: R + A => C; A*R*gammaC;  // isVersionOf GO:0006461
    gammaC = 2;
  Reaction10: MA => MA + A; MA*betaA;  // isVersionOf GO:0006412
    betaA = 50;
  Reaction11: DR + A => DRp; A*DR*gammaR;  // isVersionOf GO:0010843 GO:0016563
    gammaR = 1;
  Reaction12: DRp => DR + A; DRp*thetaR;  // isVersionOf GO:0032986
    thetaR = 100;
  Reaction13: DR => MR + DR; DR*alphaR;  // isVersionOf GO:0006351
    alphaR = 0.01;
  Reaction14: DRp => MR + DRp; DRp*alphaRp;  // isVersionOf GO:0006351
    alphaRp = 50;
  Reaction15: MR => $EmptySet; MR*deltaMR;  // isVersionOf GO:0006402
    deltaMR = 0.5;
  Reaction16: MR => R + MR; MR*betaR;  // isVersionOf GO:0006412
    betaR = 5;
  Reaction2: A => $EmptySet; A*Reaction2_deltaA;  // isVersionOf GO:0030163
    Reaction2_deltaA = 1;
  Reaction3: C => R; C*Reaction3_deltaA;  // isVersionOf GO:0030163
    Reaction3_deltaA = 1;
  Reaction4: R => $EmptySet; R*deltaR;  // isVersionOf GO:0030163
    deltaR = 0.2;
  Reaction5: DA + A => DAp; A*DA*gammaA;  // isVersionOf GO:0016563
    gammaA = 1;
  Reaction6: DAp => DA + A; DAp*thetaA;  // isVersionOf GO:0032986
    thetaA = 50;
  Reaction7: DA => MA + DA; DA*alphaA;  // isVersionOf GO:0006351
    alphaA = 50;
  Reaction8: DAp => MA + DAp; DAp*alphaAp;  // isVersionOf GO:0006351
    alphaAp = 500;
  Reaction9: MA => $EmptySet; MA*deltaMA;  // isVersionOf GO:0006402
    deltaMA = 10;

  // Unit definitions:
  unit hour = 3600 second;
end
