// SBML level 2 version 1

model vilar2()

  // Compartments:
  compartment Endosome = 1;  // GO:0005768
  compartment PM = 1; PM is "Plasma membrane";  // GO:0005886

  // Species:
  substanceOnly species RI in PM = 20; RI is "Receptor 1";  // isVersionOf uniprot:P36897
  substanceOnly species RII in PM = 20; RII is "Receptor 2";  // isVersionOf uniprot:P37173
  substanceOnly species RII_endo in Endosome = 0; RII_endo is "Receptor 2 endosome";  // isVersionOf uniprot:P37173
  substanceOnly species RI_endo in Endosome = 0; RI_endo is "Receptor 1-endosome";  // isVersionOf uniprot:P36897
  substanceOnly species lRIRII in PM = 0; lRIRII is "ligand receptor complex-plasma membrane";  // hasPart uniprot:P37173 uniprot:P36897 uniprot:P01137
  substanceOnly species lRIRII_endo in Endosome = 40; lRIRII_endo is "ligand receptor complex-endosome";  // hasPart uniprot:P37173 uniprot:P36897 uniprot:P01137

  // Parameters:
  alpha = 1;
  ka = 1;
  kcd = 0.0277777778;
  ki = 0.3333333;
  klid = 0.25;
  kr = 0.03333333;
  ligand = 3e-5;
  pRI = 8;
  pRII = 4;

  // Reactions:
  v1: RI + RII => lRIRII; ka*ligand*RI*RII; v1 is "Ligand receptor complex formation";  // GO:0007181 GO:0050431
  RII_synthesis: => RII; pRII;  // isVersionOf GO:0006412
  RII_constitutive_degradation: RII => ; kcd*RII;  // isVersionOf GO:0032801
  RII_internalization: RII => RII_endo; ki*RII;  // isVersionOf GO:0031623
  RII_recycling: RII_endo => RII; kr*RII_endo;  // isVersionOf GO:0001881
  v2: lRIRII => ; kcd*lRIRII; v2 is "Ligand receptor complex constitutive degradation";  // isVersionOf GO:0030512
  v3: lRIRII => ; klid*lRIRII; v3 is "Ligand independent complex degradation";  // isVersionOf GO:0030512
  v4: lRIRII => lRIRII_endo; ki*lRIRII; v4 is "Ligand receptor complex internalization";  // isVersionOf GO:0030511
  RI_synthesis: => RI; pRI;  // isVersionOf GO:0006412
  RI_constitutive_degradation: RI => ; kcd*RI;  // isVersionOf GO:0032801
  RI_internalization: RI => RI_endo; ki*RI;  // isVersionOf GO:0031623
  RI_recycling: RI_endo => RI; kr*RI_endo;  // isVersionOf GO:0001881
  v9: lRIRII_endo => RII + RI; kr*lRIRII_endo; v9 is "Ligand Receptor complex recycling";  // isVersionOf GO:0001881

  // Events:
  event_0000001: at (t >= 2500): ligand = 0.01;

  // Unit definitions:
  unit min_inv = 1 / (3600 second);
  unit minutes = 3600 second;
  unit substance = item;
end
