// SBML level 2 version 4

model voit1()

  // Compartments:
  compartment cell = 1;  // GO:0005622
  compartment external = 1;  // GO:0005576

  // Species:
  species $glucose_external in external = 1;  // CHEBI:17925
  species $glucose_cell in cell = 0.03;  // CHEBI:17925
  species $G6P in cell = 1;  // CHEBI:17665
  species $G1P in cell = 0.1;  // CHEBI:16077
  species $UDPG in cell = 0.7;  // CHEBI:18066
  species $glycogen in cell = 1;  // CHEBI:28087
  species $T6P in cell = 0.02;  // CHEBI:18283
  species $trehalose in cell = 0.05;  // CHEBI:16551

  // Parameters:
  phosphofructokinase has dimensionless;
  G6P_dehydrogenase has dimensionless;  // ec-code:1.1.1.49
  X12f has dimensionless; X12f is "phoshpoglucomutase";  // isVersionOf ec-code:5.4.2.2
  X12r has dimensionless; X12r is "phoshpoglucomutase";  // isVersionOf ec-code:5.4.2.2
  UDPG_pyrophosphorylase has dimensionless;  // ec-code:2.7.7.9
  glycogen_synthase has dimensionless;  // ec-code:2.4.1.11
  X15f has dimensionless; X15f is "glycogen phosphorylase";  // isVersionOf ec-code:2.4.1.1
  X15r has dimensionless; X15r is "glycogen phosphorylase";  // isVersionOf ec-code:2.4.1.1
  glycogen_use has dimensionless;  // isVersionOf GO:0005980
  alpha_alpha_T6P_synthase has dimensionless; alpha_alpha_T6P_synthase is "alpha,alpha-T6P synthase";  // ec-code:2.4.1.15
  alpha_alpha_T6P_phosphatase has dimensionless; alpha_alpha_T6P_phosphatase is "alpha,alpha--T6P phosphatase";  // ec-code:3.1.3.12
  trehalase has dimensionless;  // ec-code:3.2.1.28
  glucose_transport_into_cell has dimensionless;  // isVersionOf GO:0046323
  hexokinase_glucokinase has dimensionless; hexokinase_glucokinase is "hexokinase/glucokinase";
  var flux_X1_in; flux_X1_in is "flux_to_glucose";
  var flux_X1_out; flux_X1_out is "flux_from_glucose";
  var flux_X2_in; flux_X2_in is "flux_to_G6P";
  var flux_X2_out; flux_X2_out is "flux_from_G6P";
  var flux_X3_in; flux_X3_in is "flux_to_G1P";
  var flux_X3_out; flux_X3_out is "flux_from_G1P";
  var flux_X4_in; flux_X4_in is "flux_to_UDPG";
  var flux_X4_out; flux_X4_out is "flux_from_UDPG";
  var flux_X5_in; flux_X5_in is "flux_to_glycogen";
  var flux_X5_out; flux_X5_out is "flux_from_glucogen";
  var flux_X6_in; flux_X6_in is "flux_to_T6P";
  var flux_X6_out; flux_X6_out is "flux_from_T6P";
  var flux_X7_in; flux_X7_in is "flux_to_trehalose";
  var flux_X7_out; flux_X7_out is "flux_from_trehalose";
  heat_shock = 0 dimensionless;  // isVersionOf GO:0009408

  // Assignment rules:
  flux_X2_out := 30.12*glucose_cell^(-0.00333)*G6P^0.575*G1P^(-0.17)*UDPG^0.00333*phosphofructokinase^0.5111*G6P_dehydrogenase^0.0667*X12f^0.411*alpha_alpha_T6P_synthase^0.0111;
  flux_X3_out := 76.434*G6P^(-0.412)*G1P^0.593*X12r^0.718*UDPG_pyrophosphorylase^0.18*X15f^0.103;
  flux_X5_in := 11.06*G6P^0.04*G1P^0.32*UDPG^0.16*glycogen_synthase^0.6*X15f^0.4;
  trehalase := piecewise(1, heat_shock == 6, 1);
  alpha_alpha_T6P_phosphatase := piecewise(18, heat_shock == 1, 1);
  alpha_alpha_T6P_synthase := piecewise(1, heat_shock == 12, 1);
  glycogen_use := piecewise(16, heat_shock == 1, 1);
  X15r := piecewise(50, heat_shock == 1, 1);
  X15f := piecewise(1, heat_shock == 50, 1);
  glycogen_synthase := piecewise(1, heat_shock == 16, 1);
  UDPG_pyrophosphorylase := piecewise(16, heat_shock == 1, 1);
  X12r := piecewise(16, heat_shock == 1, 1);
  X12f := piecewise(1, heat_shock == 16, 1);
  G6P_dehydrogenase := piecewise(1, heat_shock == 6, 1);
  phosphofructokinase := piecewise(1, heat_shock == 1, 1);
  hexokinase_glucokinase := piecewise(1, heat_shock == 8, 1);
  glucose_transport_into_cell := piecewise(8, heat_shock == 1, 1);
  flux_X7_out := 1.2288*trehalose^0.3*trehalase;
  flux_X7_in := 1.0939*T6P^0.2*alpha_alpha_T6P_phosphatase;
  flux_X6_out := 1.0939*T6P^0.2*alpha_alpha_T6P_phosphatase;
  flux_X6_in := 0.19424*glucose_cell^(-0.3)*G6P^0.3*UDPG^0.3*alpha_alpha_T6P_synthase;
  flux_X5_out := 4.929*G6P^(-0.04)*UDPG^(-0.04)*glycogen^0.25*X15r^0.2*glycogen_use^0.8;
  flux_X4_out := 3.4556*glucose_cell^(-0.0429)*G6P^0.214*UDPG^0.386*glycogen_synthase^0.857*alpha_alpha_T6P_synthase^0.143;
  flux_X4_in := 11.07*G1P^0.5*UDPG_pyrophosphorylase;
  flux_X3_in := 7.8819*G6P^0.394*G1P^(-0.392)*UDPG^(-0.01)*glycogen^0.0128*X12f^0.949*X15r^0.0513;
  flux_X2_in := 142.72*glucose_cell^0.517*G6P^(-0.179)*G1P^0.183*T6P^(-0.276)*hexokinase_glucokinase^0.689*X12r^0.311;
  flux_X1_out := 89.935*glucose_cell^0.75*T6P^(-0.4)*hexokinase_glucokinase;
  flux_X1_in := 31.912*glucose_external^0.968*G6P^(-0.194)*trehalose^0.00968*glucose_transport_into_cell^0.968*trehalase^0.0323;

  // Rate rules:
  G6P' = flux_X2_in - flux_X2_out;
  UDPG' = flux_X4_in - flux_X4_out;
  T6P' = flux_X6_in - flux_X6_out;
  trehalose' = flux_X7_in - flux_X7_out;
  glycogen' = flux_X5_in - flux_X5_out;
  G1P' = flux_X3_in - flux_X3_out;
  glucose_cell' = flux_X1_in - flux_X1_out;

  // Unit definitions:
  unit mM = 1e-3 mole / litre;
  unit mM_per_minute = 1e-3 mole / (litre * 60 second);
  unit minutes = 60 second;
  unit milimole = 1e-3 mole;
end
