// SBML level 2 version 1

model wang()

  // Compartments:
  compartment Cytosol = 1;  // GO:0005829
  compartment ER = 1;  // GO:0005783

  // Species:
  species APLC in Cytosol = 9;  // isVersionOf uniprot:Q9NQ66
  species Ca_Cyt in Cytosol = 200; Ca_Cyt is "Calcium";  // CHEBI:29108
  species Ca_ER in ER = 1000; Ca_ER is "Calcium";  // CHEBI:29108
  species DG in Cytosol = 1; DG is "Diacylglycerol";  // CHEBI:18035
  species Galpha_GTP in Cytosol = 1;  // hasPart CHEBI:15996 uniprot:P29992
  species IP3 in Cytosol = 1;  // CHEBI:16595
  species PLC in Cytosol = 1;  // isVersionOf uniprot:Q9NQ66

  // Parameters:
  Cplc_total = 10;
  Kc1 = 1000;
  Kc2 = 2000;
  Kd = 10;
  Ker = 75;
  Kg = 25;
  Kp = 4;
  Kr = 200;
  Ks = 25;
  k0 = 0.1;
  k1 = 3.4;
  k10 = 3000;
  k11 = 260;
  k2 = 4;
  k3 = 4.5;
  k4 = 1.2;
  k5 = 0.12;
  k6 = 14;
  k7 = 2;
  k8 = 10500;
  k9 = 600;
  m = 2;
  n = 4;
  w = 3;

  // Assignment rules:
  Rer := Ca_ER^w/(Ker^w + Ca_ER^w);
  Rcyt2 := Ca_Cyt/(Kc2 + Ca_Cyt);
  Rcyt1 := Ca_Cyt/(Kc1 + Ca_Cyt);
  Raplc := APLC/(Kp + APLC);
  Rpkc := DG/(Kd + DG)*Ca_Cyt/(Kr + Ca_Cyt);
  Rgalpha_gtp := Galpha_GTP^n/(Kg^n + Galpha_GTP^n);
  Rdg := DG^m/(Kd^m + DG^m);
  Rip3 := IP3^3/(Ks^3 + IP3^3);

  // Reactions:
  R1: => Galpha_GTP; Cytosol*k0;  // isVersionOf GO:0006417
  R10: 0.05 Ca_Cyt => ; Cytosol*k10*Rcyt2;  // isVersionOf GO:0006816
  R11: => 0.05 Ca_Cyt; Cytosol*k11;  // isVersionOf GO:0006816
  R2: => Galpha_GTP; Cytosol*k1*Galpha_GTP;  // isVersionOf GO:0045745
  R3: Galpha_GTP => ; Cytosol*k2*Raplc*Galpha_GTP;  // isVersionOf GO:0003924
  R4: Galpha_GTP => ; Cytosol*k3*Rpkc*Galpha_GTP;  // isVersionOf GO:0045744
  R5: => APLC; Cytosol*k4*Rgalpha_gtp*Rdg*PLC;  // modifiers: PLC; isVersionOf GO:0016004
  R6: APLC => ; Cytosol*k5*APLC;  // isVersionOf GO:0004859
  R7: => IP3; Cytosol*k6*APLC;  // modifiers: APLC; isVersionOf GO:0007200 GO:0004435 ec-code:3.1.4.11
  R8: IP3 => ; Cytosol*k7*IP3;  // isVersionOf GO:0032961
  R9: 0.001 Ca_ER -> 0.01 Ca_Cyt; ER*(k8*Rip3*Rer - k9*Rcyt1);  // isVersionOf GO:0006816

  // Unit definitions:
  unit nano_mole = 1e-9 mole;
end
