// SBML level 2 version 4

model wang3()

  // Compartments:
  compartment cell = 1;  // isVersionOf GO:0005623

  // Species:
  species c1 in cell;  // hasPart uniprot:P04085 uniprot:P01127 uniprot:Q9NRA1 uniprot:Q15198
  species c2 in cell = 0;  // isVersionOf uniprot:Q15198
  species eGEF in cell;  // isHomologTo uniprot:P70392
  species ePI3K in cell;  // isVersionOf uniprot:O00750
  species eph in cell = 1;  // isVersionOf GO:0016791
  species fGEF in cell = 1;  // isVersionOf uniprot:P70392
  species m3PI in cell = 0;  // isVersionOf GO:0005811
  species mRas in cell = 0;  // isVersionOf uniprot:O14807
  species r in cell;  // isVersionOf uniprot:Q15198
  species sumrc1 in cell = 1;  // isVersionOf uniprot:P04085 uniprot:P01127 uniprot:Q9GZP0 uniprot:Q9NRA1
  species w in cell = 0;  // isVersionOf GO:0016563
  species x1 in cell = 0;  // isPartOf uniprot:P04049
  species x2 in cell = 0;  // isVersionOf uniprot:Q13153
  species y in cell = 1;  // isVersionOf uniprot:P36507
  species yp in cell;  // isVersionOf uniprot:P36507
  species ypp in cell = 0;  // isVersionOf uniprot:P36507
  species z in cell = 1;  // isVersionOf uniprot:P27361
  species zp in cell;  // isVersionOf uniprot:P27361
  species zpp in cell = 0;  // isVersionOf uniprot:P27361

  // Parameters:
  Gamma = 0.1;
  KDL = 1.5;
  KGP = 5.09;
  KGR = 495;
  KMx11 = 30.3;
  KMx12 = 18.6;
  KMx21 = 13.7;
  KMx22 = 9.59;
  KMy1 = 9.91;
  KMy2 = 8.81;
  KMyph1 = 23;
  KMyph2 = 7.99;
  KMzph1 = 8.27;
  KMzph2 = 31.5;
  Kf = 3.76;
  Kph = 4.64;
  Kx2 = 6.77;
  L = 1;
  VmaxOVERKMx11 = 1.18;
  VmaxOVERKMx12 = 3.45;
  VmaxOVERKMx21 = 0.405;
  VmaxOVERKMx22 = 1.09;
  VmaxOVERKMy1 = 6.57;
  VmaxOVERKMy2 = 31.9;
  VmaxOVERKMyph1 = 1.65;
  VmaxOVERKMyph2 = 4.2;
  VmaxOVERKMzph1 = 0.167;
  VmaxOVERKMzph2 = 0.228;
  Wph = 0.385;
  Zf = 0.272;
  alphaPI3K = 80;
  k3PI = 1;
  kFBf = 0.976;
  kFBph = 2.34;
  kRas = 1;
  kappaPI3K = 0.3;
  kdw = 0.0333;
  kdx1 = 0.745;
  kdx2 = 2.85;
  ke = 0.2;
  kminusx = 0.007;
  kt = 0.005;
  kxR0 = 0.3;
  n = 1.03;
  p = 1.98;

  // Assignment rules:
  zp := 1 - z - zpp;
  yp := 1 - y - ypp;
  eGEF := (KGR*c2 + KGP*m3PI)/(1 + KGR*c2 + KGP*m3PI)*fGEF;
  ePI3K := (1 + kappaPI3K + 2*alphaPI3K*c2 - ((1 + kappaPI3K + 2*alphaPI3K*c2)^2 - 8*alphaPI3K*c2)^0.5)/2;
  c1 := L*sumrc1/(KDL + L);
  r := KDL*sumrc1/(KDL + L);

  // Reactions:
  c2ODE: -> c2; kxR0*c1^2 - (kminusx + ke)*c2;  // modifiers: c1
  ephODE: -> eph; kFBph*(w^p/(Wph^p + w^p) - (eph - 1)/Kph);  // modifiers: w
  fGEFODE: -> fGEF; kFBf*((1 - fGEF)/Kf - zpp^n/(Zf^n + zpp^n)*fGEF);  // modifiers: zpp
  m3PIODE: -> m3PI; k3PI*(ePI3K - m3PI);  // modifiers: ePI3K
  mRasODE: -> mRas; kRas*((1 + Gamma)*eGEF - (1 + Gamma*eGEF)*mRas);  // modifiers: eGEF
  sumrc1ODE: -> sumrc1; kt*(1 - sumrc1) + 2*(kminusx*c2 - kxR0*c1^2);  // modifiers: c1, c2
  wODE: -> w; kdw*(zpp - w);  // modifiers: zpp
  x1ODE: -> x1; kdx1*(mRas - x1/(1 + y/KMx11 + yp/KMx12));  // modifiers: yp, y, mRas
  x2ODE: -> x2; kdx2*((1 + Kx2)*m3PI/(1 + Kx2*m3PI) - x2/(1 + y/KMx21 + yp/KMx22));  // modifiers: yp, y, m3PI
  yODE: -> y; VmaxOVERKMyph1*yp/(1 + yp/KMyph1 + ypp/KMyph2) - VmaxOVERKMx11*x1*y/(1 + y/KMx11 + yp/KMx12) - VmaxOVERKMx21*x2*y/(1 + y/KMx21 + yp/KMx22);  // modifiers: x2, x1, ypp, yp
  yppODE: -> ypp; VmaxOVERKMx12*x1*yp/(1 + y/KMx11 + yp/KMx12) + VmaxOVERKMx22*x2*yp/(1 + y/KMx21 + yp/KMx22) - VmaxOVERKMyph2*ypp/((1 + z/KMy1 + zp/KMy2)*(1 + yp/KMyph1) + ypp/KMyph2);  // modifiers: zp, z, x2, y, yp, x1
  zODE: -> z; VmaxOVERKMzph1*eph*zp/(1 + zp/KMzph1 + zpp/KMzph2) - VmaxOVERKMy1*ypp*z/(1 + z/KMy1 + zp/KMy2);  // modifiers: ypp, zpp, zp, eph
  zppODE: -> zpp; VmaxOVERKMy2*ypp*zp/(1 + z/KMy1 + zp/KMy2) - VmaxOVERKMzph2*eph*zpp/(1 + zp/KMzph1 + zpp/KMzph2);  // modifiers: eph, z, zp, ypp
end
