// SBML level 2 version 1

model weimann1()

  // Compartments:
  compartment Cytoplasm = 1;
  compartment Nucleus = 1;

  // Species:
  species y1 in Cytoplasm = 0.2; y1 is "Per2 or Cry mRNA";  // encodes kegg.compound:C00046 CHEBI:33699 uniprot:Q16526 uniprot:O15055
  species y2 in Cytoplasm = 0; y2 is "PER2_CRY_complex_cytoplasm";  // hasPart uniprot:Q16526 uniprot:O15055
  species y3 in Nucleus = 1.1; y3 is "PER2_CRY_complex_nucleus";  // hasPart uniprot:Q16526 uniprot:O15055
  species y4 in Cytoplasm = 0.8; y4 is "Bmal1 mRNA";  // isVersionOf uniprot:Q8IUT4 kegg.compound:C00046 CHEBI:33699
  species y5 in Cytoplasm = 1; y5 is "BMAL1_cytoplasm";  // isVersionOf uniprot:Q8IUT4
  species y6 in Nucleus = 1; y6 is "BMAL1_nucleus";  // isVersionOf uniprot:Q8IUT4
  species y7 in Nucleus = 1.05; y7 is "Active BMAL1";  // isVersionOf uniprot:Q8IUT4

  // Parameters:
  c = 0.01 nM;
  hill_coeff = 8 dimensionless;
  k1b = 1 nM;
  k1d = 0.12;
  k1i = 0.56 nM;
  k2b = 0.3 nM_inv_hr_inv;
  k2d = 0.05;
  k2t = 0.24;
  k3d = 0.12;
  k3t = 0.02;
  k4b = 2.16 nM;
  k4d = 0.75;
  k5b = 0.24;
  k5d = 0.06;
  k5t = 0.45;
  k6a = 0.09;
  k6d = 0.12;
  k6t = 0.06;
  k7a = 0.003;
  k7d = 0.09;
  q = 2 dimensionless;
  r = 3 dimensionless;
  trans_Bmal1 has nM_per_hour;
  trans_per2_cry has nM_per_hour;
  v1b = 9 nM_per_hour;
  v4b = 3.6 nM_per_hour;
  y5_y6_y7 has nM;

  // Assignment rules:
  y5_y6_y7 := y5 + y6 + y7;
  trans_Bmal1 := v4b*y3^r/(k4b^r + y3^r);
  trans_per2_cry := v1b*(y7 + c)/(k1b*(1 + (y3/k1i)^hill_coeff) + y7 + c);

  // Reactions:
  Active_BMAL1_degradation: y7 => ; Nucleus*k7d*y7;  // isVersionOf GO:0044257
  BMAL1_activation: y6 => y7; Nucleus*k6a*y6;  // isVersionOf GO:0051091
  BMAL1_deactivation: y7 => y6; Nucleus*k7a*y7;  // isVersionOf GO:0043433
  BMAL1_nuclear_export: y6 => y5; Nucleus*k6t*y6;  // isVersionOf GO:0051168
  BMAL1_nuclear_import: y5 => y6; Cytoplasm*k5t*y5;  // isVersionOf GO:0051170
  BMAL1_translation: => y5; Cytoplasm*k5b*y4;  // modifiers: y4; isVersionOf GO:0006412
  Bmal1_mRNA_degradation: y4 => ; Cytoplasm*k4d*y4;  // isVersionOf GO:0006402
  Bmal1_transcription: => y4; Cytoplasm*trans_Bmal1;  // isVersionOf GO:0006351
  cytoplasmic_BMAL1_degradation: y5 => ; Cytoplasm*k5d*y5;  // isVersionOf GO:0044257
  cytoplasmic_per2_cry_complex_degradation: y2 => ; Cytoplasm*k2d*y2;  // isVersionOf GO:0044257
  nuclear_BMAL1_degradation: y6 => ; Nucleus*k6d*y6;  // isVersionOf GO:0044257
  nuclear_per2_cry_complex_degradation: y3 => ; Nucleus*k3d*y3;  // isVersionOf GO:0044257
  per2_cry_complex_formation: => y2; Cytoplasm*k2b*y1^q;  // modifiers: y1; isVersionOf GO:0046982
  per2_cry_mRNA_degradation: y1 => ; Cytoplasm*k1d*y1;  // isVersionOf GO:0006402
  per2_cry_nuclear_export: y3 => y2; Nucleus*k3t*y3;  // isVersionOf GO:0051168
  per2_cry_nuclear_import: y2 => y3; Cytoplasm*k2t*y2;  // isVersionOf GO:0051170
  per2_cry_transcription: => y1; Cytoplasm*trans_per2_cry;  // isVersionOf GO:0006351

  // Unit definitions:
  unit nM_inv_hr_inv = litre / (3600 second * 1e-9 mole);
  unit hr_inv = 1 / (3600 second);
  unit nM_per_hour = 1e-9 mole / (3600 second * litre);
  unit nM = 1e-9 mole / litre;
  unit hour = 3600 second;
  unit nano_mole = 1e-9 mole;
end
