// SBML level 3 version 1

function populationgrowth(S, T, k)
  k*S*T;
end

model westerhoff1()

  // Compartments:
  compartment default = 1;  // 0-D

  // Species:
  species Coronadeadnontested in default = 0; Coronadeadnontested is "Corona-dead-nontested";
  species Coronadeadtested in default = 0; Coronadeadtested is "Corona-dead-tested";
  species Coronaregistered in default; Coronaregistered is "Corona-registered";
  species coronadead in default; coronadead is "% corona dead";
  species coronadeadalldead in default; coronadeadalldead is "corona dead / all dead (%)";
  species coronarecovered in default; coronarecovered is "% corona recovered";
  species infectednontested in default = 2; infectednontested is "infected-nontested";
  species infectedtested in default = 1; infectedtested is "infected-tested";
  species noncoronadead in default = 0; noncoronadead is "non-corona-dead";
  species noncoronadeadperc in default; noncoronadeadperc is "% non corona dead";
  species recoverednontested in default = 0; recoverednontested is "recovered-nontested";
  species recoveredtested in default = 0; recoveredtested is "recovered-tested";
  species $s in default = 1; s is "S";
  species symptomsnontested in default = 0; symptomsnontested is "symptoms-nontested";
  species symptomstested in default = 0; symptomstested is "symptoms-tested";
  species totalpopulation in default; totalpopulation is "total population";
  species uninfectednontested in default = 630000; uninfectednontested is "uninfectednon-tested";
  species uninfectedtested in default = 0; uninfectedtested is "uninfected-tested";

  // Parameters:
  Birthrate = 3.29e-5;
  Coronadeathrateconstant = 0.002;
  Coronarecover = 0.067;
  Infectionfromnontesednosymptoms = 0.508;
  Infectionfromnontestedsymptoms = 0.25;
  Infectionfromtestednosymtoms = 0.025;
  Infectionfromtestedsymptoms = 0.025;
  ModelValue40 = 534700;
  ModelValue51 = 0;
  Normaldeath = 3.29e-5;
  SocialDistance = 534700;
  Symptomsappear = 0.30165;
  TestingRandome = 0.0008;
  TestingforSymptoms = 500;
  Timegovermentaction = 15;
  adjF = 1; adjF is "adjustmentFactor";
  epidemicextinguished = 0;
  governmentresponsefactortodiagnosedinfected = 0;
  lockdownduration = 730;
  lockdownpauseduration = 7;
  nlockdowns = 0;
  npauses = 0;
  numbercutoff = 0;
  symptomaticnumbertolerance = 141;
  timefractionlockdown = 0.5;

  // Assignment rules:
  totalpopulation := recoveredtested + recoverednontested + infectednontested + infectedtested + uninfectednontested + uninfectedtested + symptomstested + symptomsnontested;
  coronadead := 100*(Coronadeadtested + Coronadeadnontested)/totalpopulation;
  coronadeadalldead := 100*coronadead/(coronadead + noncoronadead);
  noncoronadeadperc := 100*noncoronadead/totalpopulation;
  coronarecovered := 100*(recoveredtested + recoverednontested)/totalpopulation;
  Coronaregistered := Coronadeadtested + recoveredtested + infectedtested + symptomstested;
  intermittenttime := time - lockdownduration*nlockdowns - nlockdowns*lockdownpauseduration;
  TotalInfectioncoefficient := (1 - epidemicextinguished)*(Infectionfromnontesednosymptoms*infectednontested + Infectionfromtestednosymtoms*infectedtested + Infectionfromtestedsymptoms*symptomstested + Infectionfromnontestedsymptoms*symptomsnontested)/SocialDistance;
  Governmentinducedisolation := adjF*(1 + 2.5*symptomaticnumbertolerance/symptomaticnumbertolerance*symptomstested/symptomaticnumbertolerance*governmentresponsefactortodiagnosedinfected);

  // Reactions:
  re1: uninfectednontested => infectednontested; uninfectednontested*TotalInfectioncoefficient;
  re10: symptomsnontested => recoverednontested; Coronarecover*symptomsnontested;
  re11: $s => uninfectednontested; populationgrowth(s, totalpopulation, Birthrate);  // modifiers: totalpopulation
  re12: uninfectednontested => noncoronadead; Normaldeath*uninfectednontested;
  re13: recoveredtested => noncoronadead; Normaldeath*recoveredtested;
  re14: recoverednontested => noncoronadead; Normaldeath*recoverednontested;
  re15: infectedtested => Coronadeadtested; Coronadeathrateconstant*infectedtested;
  re16: infectednontested => Coronadeadnontested; Coronadeathrateconstant*infectednontested;
  re17: uninfectedtested => noncoronadead; Normaldeath*uninfectedtested;
  re18: symptomsnontested => Coronadeadnontested; Coronadeathrateconstant*symptomsnontested;
  re2: uninfectednontested => uninfectedtested; TestingRandome*uninfectednontested;
  re3: uninfectedtested => infectednontested; uninfectedtested*TotalInfectioncoefficient;
  re4: infectednontested => infectedtested; TestingRandome*infectednontested;
  re5: infectednontested => symptomsnontested; Symptomsappear*infectednontested;
  re6: infectedtested => symptomstested; Symptomsappear*infectedtested;
  re7: symptomsnontested => symptomstested; TestingforSymptoms*symptomsnontested;
  re8: symptomstested => Coronadeadtested; Coronadeathrateconstant*symptomstested;
  re9: symptomstested => recoveredtested; Coronarecover*symptomstested;

  // Events:
  endofepidemic: at (infectednontested + infectedtested + symptomstested + symptomsnontested < numbercutoff), t0=false, persistent=false, fromTrigger=false: epidemicextinguished = 1;
  triggerrelaxationsoc: at (intermittenttime > Timegovermentaction - lockdownduration*(1 - timefractionlockdown)), t0=false, persistent=false, fromTrigger=false: SocialDistance = ModelValue40; triggerrelaxationsoc is "triggerrelaxationsocialisolation";
  triggerrepetitiveinc: at (intermittenttime > Timegovermentaction), t0=false, persistent=false, fromTrigger=false: nlockdowns = 1 + nlockdowns; triggerrepetitiveinc is "triggerrepetitiveincreasesocialisolation";
  triggergovernmentact: at (intermittenttime > Timegovermentaction), t0=false, persistent=false, fromTrigger=false: SocialDistance = ModelValue40*Governmentinducedisolation; triggergovernmentact is "triggergovernmentactivity";
  roundoffsymptomsnont: at (symptomsnontested < 0), t0=false, persistent=false, fromTrigger=false: symptomsnontested = 0; roundoffsymptomsnont is "roundoffsymptomsnontested";
  roundoffinfectednott: at (infectednontested < 0), t0=false, persistent=false, fromTrigger=false: infectednontested = 0; roundoffinfectednott is "roundoffinfectednottested";
end
