// SBML level 3 version 1

model westermark()

  // Compartments:
  compartment default_compartment = 1;

  // Species:
  species F6P in default_compartment = 0.004038138;  // kegg.compound:C00085 CHEBI:15946
  species FBP in default_compartment = 9.117237e-7;  // kegg.compound:C00354 CHEBI:16905
  species $g3P in default_compartment = 0;  // kegg.compound:C00093 CHEBI:15978
  species $glc in default_compartment = 0.01;  // kegg.compound:C00293 CHEBI:17234

  // Parameters:
  Vfba = 25;
  Vgk = 10;
  Vpfk = 100;
  alpha = 5;
  fac = 180000;
  hact = 1;
  hgk = 1.7;
  hpfk = 2.5;
  hx = 2.5;
  keqpgi = 0.3;
  ksfba = 5e-6;
  ksgk = 0.008;
  kspfk = 0.004;
  kxpfk = 1e-5;
  sigcorr = 1.5;

  // Reactions:
  v_1: $glc -> F6P; Vgk/fac*(glc/ksgk)^hgk/(1 + (glc/ksgk)^hgk);
  v_2: F6P -> FBP; Vpfk/fac*(keqpgi/(1 + keqpgi)*F6P/kspfk)^(hpfk - (hpfk - hact)*(FBP/ksfba/(1 + FBP/ksfba)))/((keqpgi/(1 + keqpgi)*F6P/kspfk)^(hpfk - (hpfk - hact)*(FBP/ksfba/(1 + FBP/ksfba))) + (1 + (FBP/kxpfk)^hx)/(1 + alpha^(hpfk - (hpfk - hact)*(FBP/ksfba/(1 + FBP/ksfba)))*(FBP/kxpfk)^hx));
  v_3: FBP -> $g3P; Vfba/fac*(FBP/ksfba)/(FBP/ksfba + 1);
end
