// SBML level 3 version 1

model whillier1()

  // Compartments:
  compartment default_compartment = 1;

  // Species:
  species ammi in default_compartment = 0;
  species glne in default_compartment = 1.36458e-6;
  species glni in default_compartment = 5.36717e-7;
  species glui in default_compartment = 3.81014e-7;

  // Parameters:
  Kmtransglne = 0.00025;
  Kmtransglni = 0.00025;
  vole = 0.00171;
  volhbn = 0.0003741;
  voli = 0.00129;
  voliw = 0.0009159;
  voltotalw = 0.0026259;

  // Assignment rules:
  gluic := glui/voli;
  Vmaxtransglne := 9.83e-8*voli;
  Vmaxtransglni := 9.83e-8*voli;
  glnec := glne/vole;
  glnic := glni/voli;
  Kdgln := 0.000878/60*voliw;

  // Reactions:
  v_1: glne -> glni; Vmaxtransglne*(glne/vole)/(glne/vole + Kmtransglne);
  v_2: glni -> glne; Vmaxtransglni*(glni/voliw)/(glni/voliw + Kmtransglni);
  v_3: glni -> ammi + glui; glni/voliw*Kdgln;
end
