// SBML level 3 version 1

model whillier2()

  // Compartments:
  compartment default_compartment = 1;

  // Species:
  species aketoe in default_compartment = 9.02664e-5;  // encodes kegg.compound:C00026 CHEBI:30915
  species aketoi in default_compartment = 2.3643e-7;  // encodes kegg.compound:C00026 CHEBI:30915
  species alae in default_compartment = 9.02664e-5;
  species alai in default_compartment = 1.39021e-5;
  species glui in default_compartment = 1.9671e-5;  // encodes kegg.compound:C00051 CHEBI:16856
  species pyri in default_compartment = 2.83716e-6;  // encodes kegg.compound:C00022 CHEBI:32816

  // Parameters:
  Kmtransaketoe = 0.00034;
  Kmtransaketoi = 0.00034;
  Kmtransalae = 0.00034;
  Kmtransalai = 0.00034;
  k13f1 = 17410;
  k13f2 = 17600;
  k13f3 = 3827;
  k13f4 = 84.34;
  k13r1 = 54.95;
  k13r2 = 68380000;
  k13r3 = 100000;
  k13r4 = 18190;
  vole = 0.1134;
  volhbn = 0.019314;
  voli = 0.0666;
  voliw = 0.047286;
  voltotalw = 0.160686;

  // Assignment rules:
  aketoic := aketoi*1000000/voliw;
  alaec := alae*1000000/vole;
  Vmaxtransalae := 7.93e-8*voli;
  alaic := alai*1000000/voliw;
  Vmaxtransaketoi := 7.93e-8*voli;
  Vmaxtransalai := 7.93e-8*voli;
  Vmaxtransaketoe := 7.93e-8*voli;
  Kdalai := 0.000119*voli;
  Kdalae := 0.000119*voli;
  ALATRASE := 7e-9*voliw;
  aketoec := aketoe*1000000/vole;
  pyric := pyri*1000000/voliw;
  gluic := glui*1000000/voli;

  // Reactions:
  v_1: alai -> alae; Vmaxtransalai*alai/voliw/(alai/voliw + Kmtransalai) + Kdalai*alai/voliw;
  v_2: alae -> alai; Vmaxtransalae*alae/vole/(alae/vole + Kmtransalae) + Kdalae*alai/voliw;
  v_3: aketoi -> aketoe; Vmaxtransaketoi*aketoi/voliw/(aketoi/voliw + Kmtransaketoi);
  v_4: aketoe -> aketoi; Vmaxtransaketoe*aketoe/vole/(aketoe/vole + Kmtransaketoe);
  v_5: alai + aketoi -> glui + pyri; ALATRASE*(alai/voliw*aketoi/voliw*k13r4*k13r3*k13r2*k13r1 - pyri/voliw*glui/voliw*k13f1*k13f2*k13f3*k13f4)/(alai/voliw*(k13r4*k13r3*k13r1 + aketoi/voliw*(k13r4*k13r3*k13r2 + k13r4*k13r2*k13r1) + k13r4*k13r3*k13f2 + pyri/voliw*(k13r4*k13r1*k13f3 + k13r4*k13f2*k13f3)) + aketoi/voliw*(k13r3*k13r2*k13r1 + k13r2*k13r1*k13f4) + pyri/voliw*(k13r1*k13f3*k13f4 + k13f2*k13f3*k13f4) + glui/voliw*(k13r3*k13f1*k13f2 + k13f1*k13f2*k13f4 + aketoi/voliw*(k13r3*k13r2*k13f1 + k13r2*k13f1*k13f4) + pyri/voliw*(k13f1*k13f2*k13f3 + k13f1*k13f3*k13f4)));
end
