// SBML level 3 version 1

model wolf()

  // Compartments:
  compartment default_compartment = 1;

  // Species:
  species at in default_compartment = 2; at is "ATP";  // pubchem.substance:3304 kegg.compound:C00002 CHEBI:15422 3dmet:B01125
  species na in default_compartment = 0.6; na is "NAD";  // pubchem.substance:3305 kegg.compound:C00003 CHEBI:15846 3dmet:B01126
  species glucose in default_compartment = 1;  // CHEBI:22390 pubchem.substance:3565 kegg.compound:C00267 CHEBI:17925
  species fructose_1_6_bisphosphate in default_compartment = 5; fructose_1_6_bisphosphate is "fructose-1,6-bisphosphate";  // pubchem.substance:3647 kegg.compound:C00354 CHEBI:16905 3dmet:B04673
  species triose_phosphates in default_compartment = 0.6;
  species triphosphoglycerate in default_compartment = 0.7;  // pubchem.substance:3497 kegg.compound:C00197 CHEBI:17794 3dmet:B01185
  species pyruvate in default_compartment = 8;  // pubchem.substance:3324 kegg.compound:C00022 CHEBI:32816 3dmet:B00006
  species acetaldehyde in default_compartment = 0.08;  // pubchem.substance:3384 kegg.compound:C00084 CHEBI:15343 3dmet:B01155
  species s6o in default_compartment = 0.02; s6o is "external acetaldehyde";  // pubchem.substance:3384 kegg.compound:C00084 CHEBI:15343 3dmet:B01155

  // Parameters:
  atot = 4;
  k0 = 50;
  k1 = 550;
  k10 = 375;
  k2 = 9.8;
  k31 = 323.8;
  k32 = 76411.1;
  k33 = 57823.1;
  k34 = 23.7;
  k4 = 80;
  k5 = 9.7;
  k6 = 2000;
  k7 = 28;
  k8 = 85.7;
  k9 = 80;
  ki = 1;
  n = 4;
  ntot = 1;

  // Reactions:
  glucose_transporter: -> glucose; k0;
  v_10: s6o -> ; k9*s6o;
  v_11: at -> ; k7*at;
  v_2: glucose + 2 at -> fructose_1_6_bisphosphate; k1*glucose*at/(1 + (at/ki)^n);
  v_3: fructose_1_6_bisphosphate -> 2 triose_phosphates; k2*fructose_1_6_bisphosphate;
  v_4: triose_phosphates -> na; k8*triose_phosphates*(ntot - na);
  v_5: triose_phosphates + na -> triphosphoglycerate + at; (k31*k32*triose_phosphates*na*(atot - at) - k33*k34*triphosphoglycerate*at*(ntot - na))/(k33*(ntot - na) + k32*(atot - at));
  v_6: triphosphoglycerate -> pyruvate + at; k4*triphosphoglycerate*(atot - at);
  v_7: pyruvate -> acetaldehyde; k5*pyruvate;
  v_8: acetaldehyde -> na; k6*acetaldehyde*(ntot - na);
  v_9: acetaldehyde -> 0.1 s6o; k10*(acetaldehyde - s6o);
end
