// SBML level 3 version 1

model wolf2()

  // Compartments:
  compartment default_compartment = 1;

  // Species:
  species ERKMEKPP in default_compartment = 0;
  species ERKP in default_compartment = 0;
  species ERKPMEKPP in default_compartment = 0;
  species ERKPP in default_compartment = 0;
  species ERKPPPase3 in default_compartment = 0;
  species ERKPPase3 in default_compartment = 0;
  species $GDP in default_compartment = 500;
  species GS in default_compartment = 27.0125;
  species $GTP in default_compartment = 10000;
  species MEKP in default_compartment = 0;
  species MEKPP in default_compartment = 0;
  species MEKPPPase2 in default_compartment = 0;
  species MEKPPase2 in default_compartment = 0;
  species MEKPRafa in default_compartment = 0;
  species MEKRafa in default_compartment = 0;
  species PLCgP in default_compartment = 0;
  species PLCgPI in default_compartment = 0;
  species R2 in default_compartment = 0;
  species R2P in default_compartment = 0;
  species RG in default_compartment = 0;
  species RGAP in default_compartment = 0;
  species RGS in default_compartment = 0;
  species RGSr in default_compartment = 0;
  species RGSrD in default_compartment = 0;
  species RGSrT in default_compartment = 0;
  species RGrT in default_compartment = 0;
  species RPL in default_compartment = 0;
  species RPLP in default_compartment = 0;
  species RSh in default_compartment = 0;
  species RShGSr in default_compartment = 0;
  species RShGSrD in default_compartment = 0;
  species RShGSrT in default_compartment = 0;
  species RShP in default_compartment = 0;
  species RShPG in default_compartment = 0;
  species RShPGS in default_compartment = 0;
  species Ra in default_compartment = 0;
  species Rafa in default_compartment = 0;
  species RafaPase1 in default_compartment = 0;
  species RafrT in default_compartment = 0;
  species ShP in default_compartment = 0;
  species ShPG in default_compartment = 0;
  species ShPGS in default_compartment = 0;
  species rasD in default_compartment = 77.3499;
  species rasT in default_compartment = 7.65;
  species $sink in default_compartment = 1;
  species $source in default_compartment = 1;

  // Parameters:
  Pase3 = 0;
  Pool1 = 680;
  Pool10 = 200;
  Pool11 = 200;
  Pool12 = 50;
  Pool13 = 50;
  Pool14 = 100;
  Pool2 = 100;
  Pool3 = 105;
  Pool4 = 34;
  Pool5 = 150;
  Pool6 = 85;
  Pool7 = 85;
  Pool8 = 12;
  Pool9 = 50;
  ka = 0.83;
  kii = 3;
  kmax23 = 340;
  kmax4 = 50;
  kmax8 = 100;
  kn = 1;
  koff1 = 0.06;
  koff10 = 0.2;
  koff11 = 0.06;
  koff12 = 0.0028;
  koff13 = 0.0001;
  koff14 = 0.6;
  koff15 = 0.06;
  koff16 = 0.0009;
  koff17 = 0.1;
  koff18 = 0.0009;
  koff19 = 0.0214;
  koff2 = 0.1;
  koff20 = 0.00024;
  koff21 = 0.064;
  koff22 = 0.1;
  koff24 = 0.021;
  koff25 = 0.0429;
  koff26 = 0.00027;
  koff27 = 0.00078;
  koff29 = 0.76;
  koff3 = 0.01;
  koff30 = 0.093;
  koff31 = 2.4;
  koff32 = 0.0063;
  koff33 = 0.001;
  koff34 = 1.2;
  koff35 = 0.1;
  koff36 = 80;
  koff37 = 0.005;
  koff38 = 0.0016;
  koff39 = 0.0053;
  koff40 = 0.0007;
  koff41 = 0.2;
  koff43 = 0.01833;
  koff45 = 0.01833;
  koff47 = 0.8;
  koff49 = 0.5;
  koff5 = 0.2;
  koff51 = 0.033;
  koff53 = 0.033;
  koff55 = 0.6;
  koff57 = 0.5;
  koff59 = 0;
  koff6 = 0.05;
  koff60 = 0;
  koff7 = 0.006;
  koff9 = 0.03;
  kon1 = 0.003;
  kon10 = 0.0015;
  kon11 = 0.01;
  kon12 = 0.15;
  kon13 = 0.0015;
  kon14 = 0.09;
  kon15 = 6;
  kon16 = 0.3;
  kon17 = 0.003;
  kon18 = 0.3;
  kon19 = 0.01;
  kon2 = 0.01;
  kon20 = 0.12;
  kon21 = 0.03;
  kon22 = 0.003;
  kon24 = 0.1;
  kon25 = 0.009;
  kon26 = 5.4e-6;
  kon27 = 0.078;
  kon28 = 0.015;
  kon29 = 1.9e-5;
  kon3 = 1;
  kon30 = 46.5;
  kon31 = 0.003;
  kon32 = 806.4;
  kon33 = 0.000625;
  kon34 = 3e-5;
  kon35 = 50;
  kon36 = 0.1;
  kon37 = 640;
  kon38 = 0.001;
  kon39 = 0.01;
  kon40 = 1;
  kon41 = 0.0717;
  kon42 = 1;
  kon43 = 0.0111;
  kon44 = 3.5;
  kon45 = 0.0111;
  kon46 = 2.9;
  kon47 = 0.0143;
  kon48 = 0.058;
  kon49 = 0.00025;
  kon5 = 0.06;
  kon50 = 0.058;
  kon51 = 0.01;
  kon52 = 16;
  kon53 = 0.01;
  kon54 = 5.7;
  kon55 = 0.0145;
  kon56 = 0.27;
  kon57 = 0.05;
  kon58 = 0.3;
  kon59 = 0;
  kon6 = 1;
  kon60 = 0;
  kon61 = 0;
  kon7 = 0.3;
  kon9 = 1;
  va = 250;
  vd = 1;
  vmax23 = 1.7;
  vmax4 = 450;
  vmax8 = 1;

  // Assignment rules:
  Shc := -(ShP + ShPG + RSh + RShP + RShPG + RShPGS + ShPGS + RShGSrD + RShGSr + RShGSrT) + Pool5;
  SOS := -(GS + RGS + ShPGS + RShPGS + RShGSrD + RShGSr + RShGSrT + RGSrD + RGSr + RGSrT) + Pool4;
  PLCg := -(RPL + RPLP + PLCgP + PLCgPI) + Pool3;
  Pase1 := -RafaPase1 + Pool12;
  Pase2 := -(MEKPPPase2 + MEKPPase2) + Pool13;
  ERK := -(ERKMEKPP + ERKP + ERKPMEKPP + ERKPP + ERKPPPase3 + ERKPPase3) + Pool11;
  GAP := -(RGAP + RGrT) + Pool8;
  R := -Ra - 2*(R2 + R2P + RPL + RPLP + RGAP + RG + RGS + RSh + RShP + RShPG + RShPGS + RShGSrD + RShGSr + RShGSrT + RGSrD + RGSr + RGSrT + RGrT) + Pool2;
  EGF := -Ra - 2*(R2 + R2P + RPL + RPLP + RGAP + RG + RGS + RSh + RShP + RShPG + RShPGS + RShGSrD + RShGSr + RShGSrT + RGSrD + RGSr + RGSrT + RGrT) + Pool1;
  Grb := -(GS + RG + RGS + ShPG + RShPG + ShPGS + RShPGS + RShGSrD + RShGSr + RShGSrT + RGSrD + RGSr + RGSrT) + Pool6;
  ras := -(rasD + rasT + RGrT + RShGSrD + RShGSr + RShGSrT + RGSrD + RGSr + RGSrT + RafrT) + Pool7;
  Raf := -(RafrT + Rafa + RafaPase1 + MEKRafa + MEKPRafa) + Pool9;
  MEK := -(MEKRafa + MEKP + MEKPRafa + MEKPP + MEKPPPase2 + MEKPPase2 + ERKMEKPP + ERKPMEKPP) + Pool10;

  // Reactions:
  v_1: $source -> Ra; kon1*R*EGF - koff1*Ra;
  v_10: R2P -> RG; kon10*R2P*Grb - koff10*RG;
  v_11: RG -> RGS; kon11*RG*SOS - koff11*RGS;
  v_12: RGS -> R2P + GS; kon12*RGS - koff12*R2P*GS;
  v_13: GS -> $sink; kon13*GS - koff13*Grb*SOS;
  v_14: R2P -> RSh; kon14*R2P*Shc - koff14*RSh;
  v_15: RSh -> RShP; kon15*RSh - koff15*RShP;
  v_16: RShP -> ShP + R2P; kon16*RShP - koff16*ShP*R2P;
  v_17: RShP -> RShPG; kon17*RShP*Grb - koff17*RShPG;
  v_18: RShPG -> R2P + ShPG; kon18*RShPG - koff18*R2P*ShPG;
  v_19: RShPG -> RShPGS; kon19*RShPG*SOS - koff19*RShPGS;
  v_2: 2 Ra -> R2; kon2*Ra*Ra - koff2*R2;
  v_20: RShPGS -> ShPGS + R2P; kon20*RShPGS - koff20*ShPGS*R2P;
  v_21: ShPG -> ShPGS; kon21*ShPG*SOS - koff21*ShPGS;
  v_22: ShP -> ShPG; kon22*ShP*Grb - koff22*ShPG;
  v_23: ShP -> $sink; vmax23*ShP/(kmax23 + ShP);
  v_24: ShPGS -> ShP + GS; kon24*ShPGS - koff24*ShP*GS;
  v_25: RShP + GS -> RShPGS; kon25*RShP*GS - koff25*RShPGS;
  v_26: rasD -> $GDP; kon26*rasD - koff26*GDP*ras;
  v_27: $GTP -> rasT; kon27*ras*GTP - koff27*rasT;
  v_28: rasT -> rasD; kon28*rasT;
  v_29: RShPGS + rasD -> RShGSrD; kon29*va*RShPGS*rasD/(1 + (ERKPP*kii)^kn) - koff29*vd*RShGSrD;  // modifiers: ERKPP
  v_3: R2 -> R2P; kon3*R2 - koff3*R2P;
  v_30: RShGSrD -> RShGSr + $GDP; kon30*RShGSrD - koff30*RShGSr*GDP;
  v_31: RShGSr + $GTP -> RShGSrT; kon31*RShGSr*GTP - koff31*RShGSrT;
  v_32: RShGSrT -> RShPGS + rasT; kon32*vd*RShGSrT - koff32*va*RShPGS*rasT;
  v_33: RShPGS -> RShGSr; kon33*va*RShPGS*ras/(1 + (ERKPP*kii)^kn) - koff33*vd*RShGSr;  // modifiers: ERKPP
  v_34: RGS + rasD -> RGSrD; kon34*va*RGS*rasD/(1 + (ERKPP*kii)^kn) - koff34*vd*RGSrD;  // modifiers: ERKPP
  v_35: RGSrD -> RGSr + $GDP; kon35*RGSrD - koff35*RGSr*GDP;
  v_36: RGSr + $GTP -> RGSrT; kon36*RGSr*GTP - koff36*RGSrT;
  v_37: RGSrT -> RGS + rasT; kon37*vd*RGSrT - koff37*va*RGS*rasT;
  v_38: RGS -> RGSr; kon38*va*RGS*ras/(1 + (ERKPP*kii)^kn) - koff38*vd*RGSr;  // modifiers: ERKPP
  v_39: rasT -> RafrT; kon39*Raf*rasT - koff39*RafrT;
  v_4: R2P -> R2; vmax4*R2P/(kmax4 + R2P);
  v_40: RafrT -> rasT + Rafa; kon40*RafrT - koff40*rasT*Rafa;
  v_41: Rafa -> RafaPase1; kon41*Rafa*Pase1 - koff41*RafaPase1;
  v_42: RafaPase1 -> $sink; kon42*RafaPase1;
  v_43: Rafa -> MEKRafa; kon43*MEK*Rafa - koff43*MEKRafa;
  v_44: MEKRafa -> MEKP + Rafa; kon44*MEKRafa;
  v_45: MEKP + Rafa -> MEKPRafa; kon45*MEKP*Rafa - koff45*MEKPRafa;
  v_46: MEKPRafa -> Rafa + MEKPP; kon46*MEKPRafa;
  v_47: MEKPP -> MEKPPPase2; kon47*MEKPP*Pase2 - koff47*MEKPPPase2;
  v_48: MEKPPPase2 -> MEKP; kon48*MEKPPPase2;
  v_49: MEKP -> MEKPPase2; kon49*MEKP*Pase2 - koff49*MEKPPase2;
  v_5: R2P -> RPL; kon5*R2P*PLCg - koff5*RPL;
  v_50: MEKPPase2 -> $sink; kon50*MEKPPase2;
  v_51: MEKPP -> ERKMEKPP; kon51*ERK*MEKPP - koff51*ERKMEKPP;
  v_52: ERKMEKPP -> ERKP + MEKPP; kon52*ERKMEKPP;
  v_53: ERKP + MEKPP -> ERKPMEKPP; kon53*ERKP*MEKPP - koff53*ERKPMEKPP;
  v_54: ERKPMEKPP -> ERKPP + MEKPP; kon54*ERKPMEKPP;
  v_55: ERKPP -> ERKPPPase3; kon55*ERKPP*Pase3 - koff55*ERKPPPase3;
  v_56: ERKPPPase3 -> ERKP; kon56*ERKPPPase3;
  v_57: ERKP -> ERKPPase3; kon57*ERKP*Pase3 - koff57*ERKPPase3;
  v_58: ERKPPase3 -> $sink; kon58*ERKPPase3;
  v_59: R2P -> RGAP; kon59*ka*GAP*R2P - koff59*RGAP;
  v_6: RPL -> RPLP; kon6*RPL - koff6*RPLP;
  v_60: rasT + RGAP -> RGrT; kon60*ka*va*rasT*RGAP - koff60*vd*RGrT;
  v_61: RGrT -> rasD + RGAP; kon61*ka*RGrT;
  v_7: RPLP -> R2P + PLCgP; kon7*RPLP - koff7*R2P*PLCgP;
  v_8: PLCgP -> $sink; vmax8*PLCgP/(kmax8 + PLCgP);
  v_9: PLCgP -> PLCgPI; kon9*PLCgP - koff9*PLCgPI;
end
