// SBML level 3 version 1

model wortel1()

  // Compartments:
  compartment default_compartment = 1;

  // Species:
  species a in default_compartment = 61.42749;
  species b in default_compartment = 25.04617;
  species c in default_compartment = 1;
  species d in default_compartment = 1;
  species e in default_compartment = 1;
  species p in default_compartment = 17.06634;
  species w in default_compartment = 1.76742;

  // Parameters:
  EXTERNAL = 1;
  aext = 100;
  e1 = 1.175337;
  e10 = 4.084683;
  e2 = 1.472817;
  e3 = 0;
  e4 = 0;
  e5 = 0;
  e6 = 0.7647274;
  e7 = 0;
  e8 = 0;
  e9 = 2.502436;
  fext = 2;
  kcat1 = 1;
  kcat10 = 1;
  kcat2 = 2;
  kcat3 = 6;
  kcat4 = 1;
  kcat5 = 15;
  kcat6 = 2;
  kcat7 = 1;
  kcat8 = 1;
  kcat9 = 1;
  kma1 = 1;
  kma2 = 1;
  kma3 = 0.1;
  kma4 = 1;
  kmaext1 = 1;
  kmb2 = 1;
  kmb5 = 10;
  kmb6 = 1;
  kmc3 = 10;
  kmc5 = 0.1;
  kmc7 = 1;
  kmd4 = 1;
  kmd7 = 1;
  kme7 = 1;
  kme8 = 1;
  kmfext9 = 1;
  kmp6 = 1;
  kmp8 = 1;
  kmp9 = 1;
  kmsext3 = 10;
  kmuext7 = 1;
  kmw10 = 1;
  kmw2 = 1;
  kmw8 = 1;
  kmw9 = 1;
  kmwext10 = 1;
  sext = 0;
  uext = 2;
  wext = 2;

  // Reactions:
  v_1: -> a; aext*e1*kcat1/(kmaext1*(1 + aext/kmaext1 + a/kma1));
  v_10: w -> ; e10*kcat10*w/(kmw10*(1 + wext/kmwext10 + w/kmw10));
  v_2: a -> b + w; e2*kcat2*a/(kma2*(1 + a/kma2 + b/kmb2)*(1 + w/kmw2));
  v_3: a -> c; e3*kcat3*a/(kma3*(1 + sext/kmsext3)^2*(1 + a/kma3 + c/kmc3));
  v_4: a -> d; e4*kcat4*a/(kma4*(1 + a/kma4 + d/kmd4));
  v_5: c -> b; e5*kcat5*c/(kmc5*(1 + b/kmb5 + c/kmc5));
  v_6: b -> p; e6*kcat6*b/(kmb6*(1 + b/kmb6 + p/kmp6));
  v_7: c + d -> e; e7*kcat7*c*d/(kmc7*kmd7*(1 + uext/kmuext7 + d/kmd7)*(1 + c/kmc7 + e/kme7));
  v_8: e -> p + 2 w; e8*kcat8*e/(kme8*(1 + e/kme8 + p/kmp8)*(1 + w/kmw8));
  v_9: p -> w; e9*kcat9*p/(kmp9*(1 + fext/kmfext9 + p/kmp9)*(1 + w/kmw9));
end
