// SBML level 3 version 1

model wortel4()

  // Compartments:
  compartment default_compartment = 1;

  // Species:
  species a in default_compartment = 43.60591;
  species b in default_compartment = 1;
  species c in default_compartment = 39.15264;
  species d in default_compartment = 875.7281;
  species fm in default_compartment = 0.06277692;
  species g in default_compartment = 1;
  species p in default_compartment = 1.071877;

  // Parameters:
  EXTERNAL = 1;
  aext = 2.321751;
  bext = 1.820976;
  e1 = 1.979724;
  e10 = 1e-6;
  e11 = 0.5484301;
  e2 = 1e-6;
  e3 = 1e-6;
  e4 = 1.876582;
  e5 = 0.1544699;
  e6 = 1e-6;
  e7 = 1e-6;
  e8 = 12.90708;
  e9 = 1e-6;
  ftot = 5;
  kaa2 = 0.5377241;
  kac5 = 0.4510918;
  kcat1 = 4.351283;
  kcat10 = 2.045832;
  kcat11 = 15.63085;
  kcat2 = 2.084707;
  kcat3 = 0.659202;
  kcat4 = 1.217405;
  kcat5 = 7.488824;
  kcat6 = 0.2642416;
  kcat7 = 0.515186;
  kcat8 = 0.1480318;
  kcat9 = 4.007136;
  keq2 = 2;
  keq4 = 2;
  keq6 = 2;
  kic7 = 1.015574;
  kma1 = 2.651038;
  kma3 = 0.1834201;
  kma4 = 6.893067;
  kma5 = 0.3293455;
  kmaext1 = 0.2321751;
  kmb2 = 0.190219;
  kmb3 = 0.9656242;
  kmb6 = 0.8903688;
  kmb7 = 5.536459;
  kmbext2 = 18.20976;
  kmc4 = 6.567796;
  kmc6 = 55.76115;
  kmc8 = 4.707711;
  kmd10 = 0.4172002;
  kmd5 = 33.06554;
  kmd8 = 1.796888;
  kmd9 = 0.1042809;
  kmfm11 = 0.1405107;
  kmfm2 = 8.420832;
  kmfm8 = 0.6607271;
  kmfp11 = 7.263914;
  kmfp2 = 1.277365;
  kmfp8 = 3.238387;
  kmg10 = 1.382935;
  kmg9 = 0.4329418;
  kmp11 = 0.5719564;
  kmp7 = 11.33985;
  kmp8 = 6.64007;
  kmpext11 = 1.328313;
  pext = 0.1328313;

  // Reactions:
  v_1: -> a; aext*e1*kcat1/(kmaext1*(1 + aext/kmaext1 + a/kma1));
  v_10: g -> d; e10*kcat10*g/(kmg10*(1 + d/kmd10 + g/kmg10));
  v_11: fm + p -> ; e11*kcat11*fm*p/(kmfm11*kmp11*(1 + (ftot - fm)/kmfp11 + fm/kmfm11)*(1 + pext/kmpext11 + p/kmp11));
  v_2: -> b + fm; bext*e2*kcat2*a*(ftot - fm)*(1 - b*fm/(bext*keq2*(ftot - fm)))/(kaa2*kmbext2*kmfp2*(1 + a/kaa2)*(1 + bext/kmbext2 + b/kmb2)*(1 + (ftot - fm)/kmfp2 + fm/kmfm2));  // modifiers: a
  v_3: a -> b; e3*kcat3*a/(kma3*(1 + a/kma3 + b/kmb3));
  v_4: a -> c; e4*kcat4*a*(1 - c/(keq4*a))/(kma4*(1 + a/kma4 + c/kmc4));
  v_5: a -> d; e5*kcat5*a*c/(kac5*kma5*(1 + c/kac5)*(1 + a/kma5 + d/kmd5));  // modifiers: c
  v_6: b -> c; e6*kcat6*b*(1 - c/(keq6*b))/(kmb6*(1 + b/kmb6 + c/kmc6));
  v_7: b -> p; e7*kcat7*b/(kmb7*(1 + c/kic7)*(1 + b/kmb7 + p/kmp7));  // modifiers: c
  v_8: c + d -> fm + p; e8*kcat8*c*d*(ftot - fm)/(kmc8*kmd8*kmfp8*(1 + d/kmd8)*(1 + (ftot - fm)/kmfp8 + fm/kmfm8)*(1 + c/kmc8 + p/kmp8));
  v_9: d -> g; e9*kcat9*d/(kmd9*(1 + d/kmd9 + g/kmg9));
end
