// SBML level 2 version 1

model wu1()

  // Compartments:
  compartment cell = 1; cell is "GH3 cell";  // isVersionOf GO:0005623

  // Species:
  species c in cell = 0.1; c is "cytosolic free ca concentration";  // kegg.compound:C00076 CHEBI:29108
  species cer in cell = 100; cer is "ER ca concentration";  // kegg.compound:C00076 CHEBI:29108

  // Parameters:
  V = -60;
  a = 0.46;
  alpha = 4.5e-6;
  cm = 5300; cm is "membrane capacitance";
  dact = 0.35;
  dinact = 0.4;
  dip3 = 0.5;
  fcyt = 0.01;
  fer = 0.01;
  gca = 1000; gca is "ca current conductance";
  gir = 5; gir is "erg k current conductance";
  gk = 1400; gk is "k current conductance";
  // gkatp = 500 if t < than tstim 530 otherwise
  gkatp = 500;
  gkca = 900; gkca is "ca activated k conductance";
  var ica; ica is "calcium current";
  var iir; iir is "erg like k current";
  var ik; ik is "delayed rectifier k current";
  var ikatp; ikatp is "nucleotide sensitive k current";
  var ikca; ikca is "ca dependent k current";
  ip3 = 0;
  kd = 0.3;
  kpmca = 0.2;
  kserca = 0.4;
  n = 0.01;
  nIR = 0.008;
  pleak = 0.0005;
  r = 0.14;
  rIR = 0.282;
  sa = 0.1;
  sm = 12;
  sn = 5;
  taua = 300000;
  taun = 16;
  vca = 50; vca is "ca reversal potential";
  vcytver = 5;
  vir = -75;
  vk = -75; vk is "k reversal potential";
  vm = -20;
  vn = -16;

  // Assignment rules:
  iir := gir*nIR*rIR*(V - vir);
  // net Ca2+ efflux from the ER
  jer := jleak + jip3 - jserca;
  // Ca2+ efflux through the IP3R
  jip3 := oinf*(cer - c);
  // fraction of open channels
  oinf := c/(dact + c)*(ip3/(dip3 + ip3))*(dinact/(dinact + c));
  // Ca2+ leak is proportional to gradient between Ca2+ and ER
  jleak := pleak*(cer - c);
  // Ca2+ flux into the ER via SERCA
  jserca := kserca*c;
  // Flux of Ca2+ through the membrane
  jmem := -(alpha*ica + kpmca*c);
  // Ca2+ dependent K+ current
  ikca := gkca*w*(V - vk);
  // activation function
  ainf := 1/(1 + exp((r - c)/sa));
  // activation function
  ninf := 1/(1 + exp((vn - V)/sn));
  // Ca ionic currents
  ica := gca*minf*(V - vca);
  // nucleotide-sensitive K+ current
  ikatp := gkatp*a*(V - vk);
  // Fraction of K(ca) channels activated by cytosolic Ca2+
  w := c^5/(c^5 + kd^5);
  // delayed rectifier K+ current
  ik := gk*n*(V - vk);
  // activation function
  minf := 1/(1 + exp((vm - V)/sm));
  tauIRr := 1/(alphaIRr + betaIRr);
  rIRinf := 1/(1 + betaIRr/alphaIRr);
  betaIRr := 0.15/(1 + exp(-0.05*(V + 120)));
  alphaIRr := 30/(1 + exp(0.04*(V + 230)));
  tauIRn := 1/(alphaIRn + betaIRn);
  nIRinf := 1/(1 + betaIRn/alphaIRn);
  betaIRn := 0.00035*exp(0.07*(V + 25));
  alphaIRn := 0.09/(1 + exp(0.11*(V + 100)));

  // Rate rules:
  V' = -(ica + ik + ikca + ikatp + iir)/cm;
  a' = (ainf - a)/taua;
  n' = (ninf - n)/taun;
  rIR' = (rIRinf - rIR)/tauIRr;
  nIR' = (nIRinf - nIR)/tauIRn;

  // Reactions:
  cytosolic_free_Ca2_concentration: => c; cell*fcyt*(jmem + jer); cytosolic_free_Ca2_concentration is "cytosolic free Ca2+ concentration";  // isVersionOf GO:0051924
  ER_Ca2_concentration: => cer; -fer*vcytver*jer*cell; ER_Ca2_concentration is "ER Ca2+ concentration";  // isVersionOf GO:0051924

  // Events:
  // Increase of maximal conductance of K_ATP channels from 500 to 530 at time=30000 ms
  event_0000001: at (time > 3e4): gkatp = 530;

  // Unit definitions:
  unit micromole = 1e-6 mole;
  unit millivolt = 1e-3 volt;
  unit millisecond = 1e-3 second;
end
