// SBML level 3 version 1

model xu()
  // model units - substance: mmol, time: min, volume: L, area: dimensionless, length: dimensionless, extent: mM

  // Compartments:
  compartment blood = 1;
  compartment fat = 1;
  compartment glycogen_regulation = 1;
  compartment liver = 1;
  compartment muscle = 1;

  // Species:
  species B_alan in blood = 0.1;
  species B_ffa in blood = 0.3;
  species B_gluc in blood = 4;
  species B_glucgn in liver = 0;
  species B_ins in liver = 0;
  species B_ket in blood = 0.08;
  species B_lac in blood = 0.2;
  species Cvar in glycogen_regulation = 0;
  species F_TG in fat = 0;
  species F_acyl in fat = 0;
  species $F_ffa in fat = 2;
  species F_g6p in fat = 0;
  species GPa in glycogen_regulation = pt/2;
  species GSa in glycogen_regulation = st/2;
  species $M_alan in muscle = 0.4;
  species M_g6p in muscle = 8;
  species M_glycgn in muscle = 100;
  species M_ket in muscle = 0.1;
  species M_lac in muscle = 0.2;
  species M_pyr in muscle = 0.2;
  species PKa in glycogen_regulation = 0;
  species $PKb in glycogen_regulation = kt;
  species PP1 in glycogen_regulation = 0.00025;
  species PP1_GPa in glycogen_regulation = 0;
  species R2C2 in glycogen_regulation = capkt;
  species R2_C_cAMP2 in glycogen_regulation = 0;
  species R2_cAMP4 in glycogen_regulation = 0;
  species aK in liver = 1;
  species acet_c in liver = 6;
  species acet_m in liver = 7;
  species alan in liver = 0.1;
  species cAMP in liver = 0;
  species citrate in liver = 0.5;
  species g6p in liver = 0.2;
  species gluc in liver = 5;
  species glutamate in liver = 0.1;
  species glycgn in liver = 10;
  species ket in liver = 0.08;
  species lac in liver = 1;
  species malate in liver = 3;
  species malonyl in liver = 0.3;
  species oa_c in liver = 0.0004;
  species oa_m in liver = 0.0002;
  species palm in liver = 0.3;
  species palmCoA in liver = 0.3;
  species pep in liver = 0.001;
  species pyr in liver = 3;

  // Parameters:
  Gmax = 5e-8 mM;
  Gmin = 3e-8 mM;
  Imax = 1.3e-6 mM;
  Imin = 7e-7 mM;
  PP1t = 0.00025 mM;
  c0 = 5;
  capkt = 0.00025 mM;
  cmax = 0.0032 mM;
  cmin = 2e-6;
  en1 = 10 dimensionless;
  en10 = 10 dimensionless;
  en11 = 10 dimensionless;
  en12 = 10 dimensionless;
  en2 = 10 dimensionless;
  en3 = 10 dimensionless;
  en4 = 10 dimensionless;
  en5 = 10 dimensionless;
  en6 = 10 dimensionless;
  en7 = 10 dimensionless;
  en8 = 10 dimensionless;
  en9 = 20 dimensionless;
  ep1 = 10 dimensionless;
  ep10 = 10 dimensionless;
  ep11 = 10 dimensionless;
  ep12 = 10 dimensionless;
  ep13 = 10 dimensionless;
  ep14 = 10 dimensionless;
  ep15 = 10 dimensionless;
  ep2 = 10 dimensionless;
  ep3 = 10 dimensionless;
  ep4 = 10 dimensionless;
  ep5 = 10 dimensionless;
  ep6 = 10 dimensionless;
  ep7 = 10 dimensionless;
  ep8 = 10 dimensionless;
  ep9 = 10 dimensionless;
  index = 5 dimensionless;
  k11 = 4.3e-5 mM;
  k1glucgn has mM_per_min;
  k1ins has mM_per_min;
  k22 = 0.0007 mM;
  k_Dglucgn = 4e-8 mM;
  k_Dins = 1e-6 mM;
  k_Dins2 = 7.5e-7 mM;
  k_L10 = 0.1 per_min;
  k_L11f = 0.6 per_min;
  k_L11r = 0.01 per_min;
  k_L12 = 0.6 per_min;
  k_L13 = 0.5 per_min;
  k_L14 = 0.01 per_min;
  k_L15 = 0.01 per_min;
  k_L16 = 0.01;
  k_L17 = 0.01 mM_per_min;
  k_L18 = 0.01 per_min;
  k_L19 = 0.01;
  k_L1f = 3 mM_per_min;
  k_L1r = 4 mM_per_min;
  k_L20 = 0.2 per_min;
  k_L21f = 0.001 mM_per_min;
  k_L21r = 0.2 per_min;
  k_L22 = 0.01 per_min;
  k_L2f = 200 per_min;
  k_L2r = 20 per_min;
  k_L3f = 0.1 mM_per_min;
  k_L3r = 0.3 mM_per_min;
  k_L4 = 2 mM_per_min;
  k_L5f = 0 per_min;
  k_L5r = 0.1 per_min;
  k_L6 = 1 mM_per_min;
  k_L7 = 1 mM_per_min;
  k_L8 = 0.1 mM_per_min;
  k_L9 = 0.1 per_min;
  k_a = 60;
  k_dcAMP = 3.16227e-6 mM;
  k_f1 = 0.1 per_min;
  k_f3 = 0.2 per_min;
  k_f4 = 0.1 per_min;
  k_f5 = 0.1;
  k_gc1 = 60000;
  k_gc2 = 60000;
  k_glucgn has mM_per_min;
  k_i1 = 0.1 mM;
  k_i13 = 2 mM;
  k_i2 = 1 mM;
  k_i4 = 3 mM;
  k_i5 = 1 mM;
  k_i8 = 2 mM;
  k_ins has mM_per_min;
  k_mGlgn = 8 mM;
  k_mIns = 8 mM;
  k_mL1f = 7.7 mM;
  k_mL1r = 1.3 mM;
  k_mL21a = 21 mM;
  k_mL21g = 4.3 mM;
  k_mL21k = 0.22 mM;
  k_mL21p = 0.4 mM;
  k_mL2f = 0.57 mM;
  k_mL2r = 1.4 mM;
  k_mL3f = 0.01 mM;
  k_mL3r = 0.0034 mM;
  k_mL4 = 0.18 mM;
  k_mL5f = 0.03 mM;
  k_mL5r = 0.8;
  k_mL6 = 0.22 mM;
  k_mL7 = 0.0204 mM;
  k_p1 = 0.5 mM;
  k_p2 = 2 mM;
  k_s1f = 0;
  k_s1r = 0;
  k_s2 = 0.02 per_min;
  k_s3f = 0.01 per_min;
  k_s3r = 0.01 per_min;
  k_s4f = 0.07 per_min;
  k_s4r = 0;
  k_tF1 = 0.01 per_min;
  k_tF3 = 0.008;
  k_tL1 = 100 per_min;
  k_tL2 = 0.1 per_min;
  k_tL3 = 0.1 per_min;
  k_tL5 = 0.1 per_min;
  k_tL6 = 1 per_min;
  k_tS1 = 0.01 per_min;
  k_tS2 = 1 per_min;
  k_tS3 = 0.01 per_min;
  k_tS4 = 3 per_min;
  ka has per_min;
  kc1 = 1 mM_per_min;
  kc2 has mM_per_min;
  kcm1 = 4e-8 mM;
  kcm2 = 1e-6 mM;
  kd has mM_1;
  kd_Balan = 0.015 per_min;
  kd_Bffa = 0.015 per_min;
  kd_Bgluc = 0.015 per_min;
  kd_Bglucgn = 0.015 per_min;
  kd_Bins = 0.015 per_min;
  kd_Bket = 0.015 per_min;
  kd_Blac = 0.015 per_min;
  kf = 0.5 mM_per_min;
  kg2 = 0.5 mM;
  kg3 = 1200 per_min;
  kg4 = 300 per_min;
  kg5 = 1200 per_min;
  kg6 = 300 per_min;
  kg7 = 1200 per_min;
  kg8 = 300 per_min;
  kgc1 has mM_2_min_1;
  kgc2 has mM_2_min_1;
  kgi = 10 mM;
  kmg3 = 0.0004 mM;
  kmg4 = 0.0011 mM;
  kmg5 = 0.01 mM;
  kmg5s has mM;
  kmg6 = 0.005 mM;
  kmg6s has mM;
  kmg7 = 0.015 mM;
  kmg7s has mM;
  kmg8 = 0.00012 mM;
  kmg8s has mM;
  kresume = 0.6;
  ks_dket = 0.01 per_min;
  kt = 0.0025 mM;
  ng = 10 dimensionless;
  ni = 10 dimensionless;
  p1 = 1 dimensionless;
  p2 = 1 dimensionless;
  pt = 0.07 mM;
  s1 = 100 dimensionless;
  s2 = 0.001 dimensionless;
  st = 0.003 mM;
  tresume = 20250;

  // Assignment rules:
  k1ins := kd_Bins*(Imax - Imin);
  kgc1 := k_gc1/k11;
  kgc2 := k_gc2/k22;
  kmg5s := kmg5*(1 + s1*g6p/kg2);
  kmg6s := kmg6/(1 + s2*gluc/kgi);
  kmg7s := kmg7*(1 + s1*g6p/kg2);
  kmg8s := kmg8/(1 + s1*g6p/kg2);
  kc2 := kc1*10^5.5;
  ka := k_a/kd;
  k_glucgn := kd_Bglucgn*Gmax;
  k1glucgn := kd_Bglucgn*(Gmax - Gmin);
  kd := (cmax - cmin)*c0^index/(c0^index + glycgn^index) + cmin;
  k_ins := kd_Bins*Imin;
  GPaPlot := GPa/0.07;
  GSaPlot := GSa/0.003;

  // Reactions:
  Jg10: R2C2 + 2 cAMP -> R2_C_cAMP2 + Cvar; kgc1*R2C2*cAMP^2 - k_gc1*R2_C_cAMP2*Cvar;
  Jg11: R2_C_cAMP2 + 2 cAMP -> R2_cAMP4 + Cvar; kgc2*R2_C_cAMP2*cAMP^2 - k_gc2*R2_cAMP4*Cvar;
  Jg3: -> PKa; kg3*Cvar*(kt - PKa)/(kmg3 + (kt - PKa));  // modifiers: Cvar
  Jg4: PKa -> ; kg4*(PP1 + PP1_GPa)*PKa/(kmg4 + PKa);  // modifiers: PP1, PP1_GPa
  Jg5: -> GPa; kg5*PKa*(pt - GPa)/(kmg5s + (pt - GPa));  // modifiers: PKa
  Jg6: GPa -> ; kg6*(PP1 + PP1_GPa)*GPa/(kmg6s + GPa);  // modifiers: PP1, PP1_GPa
  Jg7: GSa -> ; kg7*(PKa + Cvar)*GSa/(kmg7s + GSa);  // modifiers: Cvar, PKa
  Jg8: -> GSa; kg8*PP1*(st - GSa)/(kmg8s + (st - GSa));  // modifiers: PP1
  Jg9: PP1 + GPa -> PP1_GPa; ka*PP1*GPa - k_a*PP1_GPa;
  v_F1: F_g6p -> F_acyl; k_f1*F_g6p*(1 + B_ins^ep14/(k_Dins^ep14 + B_ins^ep14));  // modifiers: B_ins
  v_F3: F_acyl -> F_TG; k_f3*F_acyl*(1 + B_ins^ep15/(k_Dins^ep15 + B_ins^ep15));  // modifiers: B_ins
  v_F4: F_TG -> $F_ffa; k_f4*F_TG*k_Dins^en12/(k_Dins^en12 + B_ins^en12);  // modifiers: B_ins
  v_F5: $F_ffa -> F_acyl; k_f5*F_ffa^3;
  v_Ggluc: B_glucgn -> ; k1glucgn*B_gluc^ng/(k_mGlgn^ng + B_gluc^ng);  // modifiers: B_gluc
  v_Igluc: -> B_ins; k1ins*B_gluc^ni/(k_mIns^ni + B_gluc^ni);  // modifiers: B_gluc
  v_L10: aK -> malate; k_L10*aK;
  v_L11f: oa_m -> malate; k_L11f*oa_m*(1 + B_glucgn^ep5/(k_Dglucgn^ep5 + B_glucgn^ep5));  // modifiers: B_glucgn
  v_L11r: malate -> oa_m; k_L11r*malate;
  v_L12: malate -> oa_c; k_L12*malate*k_Dins^en4/(k_Dins^en4 + B_ins^en4)*(1 + B_glucgn^ep6/(k_Dglucgn^ep6 + B_glucgn^ep6));  // modifiers: B_glucgn, B_ins
  v_L13: oa_c -> pep; k_L13*oa_c*(1 + B_glucgn^ep7/(k_Dglucgn^ep7 + B_glucgn^ep7))*k_Dins^en5/(k_Dins^en5 + B_ins^en5);  // modifiers: B_glucgn, B_ins
  v_L14: citrate -> oa_c + acet_c; k_L14*citrate*(1 + B_ins^ep10/(k_Dins^ep10 + B_ins^ep10))*k_Dglucgn^en7/(k_Dglucgn^en7 + B_glucgn^en7);  // modifiers: B_glucgn, B_ins
  v_L15: acet_c -> malonyl; k_L15*acet_c*(1 + p1*citrate/(k_p1 + citrate))*k_i5/(k_i5 + palmCoA);  // modifiers: palmCoA, citrate
  v_L16: acet_c + 7 malonyl -> palm; k_L16*acet_c*malonyl^7;
  v_L17: palm -> palmCoA; k_L17*palm*k_i1/(k_i1 + malonyl);  // modifiers: malonyl
  v_L18: palmCoA -> 8 acet_m; k_L18*palmCoA*k_i2/(k_i2 + malonyl);  // modifiers: malonyl
  v_L19: 2 acet_m -> ket; k_L19*acet_m^2*(1 + cAMP^ep11/(k_dcAMP^ep11 + cAMP^ep11))*k_Dins^en8/(k_Dins^en8 + B_ins^en8);  // modifiers: cAMP, B_ins
  v_L1f: gluc -> g6p; k_L1f*gluc/(k_mL1f + gluc)*(1 + B_ins^ep1/(k_Dins^ep1 + B_ins^ep1));  // modifiers: B_ins
  v_L1r: g6p -> gluc; k_L1r*g6p/(k_mL1r + g6p)*(1 + B_glucgn^ep9/(k_Dglucgn^ep9 + B_glucgn^ep9));  // modifiers: B_glucgn
  v_L20: alan -> pyr; k_L20*alan*k_Dins2^en3/(k_Dins2^en3 + B_ins^en3);  // modifiers: B_ins
  v_L21f: pyr + glutamate -> alan + aK; k_L21f*pyr/(k_mL21p + pyr)*glutamate/(k_mL21g + glutamate)*k_Dins^en3/(k_Dins^en3 + B_ins^en3);  // modifiers: B_ins
  v_L21r: alan + aK -> pyr + glutamate; k_L21r*alan/(k_mL21a + alan)*aK/(k_mL21k + aK)*acet_m*(k_Dins^en3/(k_Dins^en3 + B_ins^en3));  // modifiers: B_ins, acet_m
  v_L22: glutamate -> ; k_L22*glutamate;
  v_L2f: g6p -> glycgn; k_L2f*GSa*g6p/(k_mL2f + g6p);  // modifiers: GSa
  v_L2r: glycgn -> g6p; k_L2r*GPa*glycgn/(k_mL2r + glycgn);  // modifiers: GPa
  v_L3f: g6p -> 2 pep; k_L3f*g6p/(k_mL3f + g6p)*(1 + B_ins^ep2/(k_Dins^ep2 + B_ins^ep2))*k_Dglucgn^en1/(k_Dglucgn^en1 + B_glucgn^en1);  // modifiers: B_ins, B_glucgn
  v_L3r: 2 pep -> g6p; k_L3r*pep/(k_mL3r + pep)*(1 + B_glucgn^ep8/(k_Dglucgn^ep8 + B_glucgn^ep8))*k_Dins2^en6/(k_Dins2^en6 + B_ins^en6);  // modifiers: B_glucgn, B_ins
  v_L4: pep -> pyr; k_L4*pep/(k_mL4 + pep)*(1 + B_ins^ep3/(k_Dins^ep3 + B_ins^ep3))*k_Dglucgn^en2/(k_Dglucgn^en2 + B_glucgn^en2)*k_i13/(k_i13 + alan);  // modifiers: B_glucgn, B_ins, alan
  v_L5f: pyr -> lac; k_L5f*pyr/(k_mL5f + pyr);
  v_L5r: lac -> pyr; k_L5r*lac/(k_mL5r + lac);
  v_L6: pyr -> oa_m; k_L6*pyr/(k_mL6 + pyr)*(1 + p2*acet_m/(k_p2 + acet_m))*(1 + B_glucgn^ep4/(k_Dglucgn^ep4 + B_glucgn^ep4));  // modifiers: B_glucgn, acet_m
  v_L7: pyr -> acet_m; k_L7*pyr/(k_mL7 + pyr)*k_i8/(k_i8 + acet_m);
  v_L8: oa_m + acet_m -> citrate; k_L8*oa_m*acet_m*k_i4/(k_i4 + palmCoA);  // modifiers: palmCoA
  v_L9: citrate -> aK; k_L9*citrate;
  v_S1f: M_g6p -> M_glycgn; k_s1f*M_g6p;
  v_S1r: M_glycgn -> M_g6p; k_s1r*M_glycgn;
  v_S2: M_g6p -> 2 M_pyr; k_s2*M_g6p;
  v_S3f: M_pyr -> M_lac; k_s3f*M_pyr;
  v_S3r: M_lac -> M_pyr; k_s3r*M_lac;
  v_S4f: M_pyr -> $M_alan; k_s4f*M_pyr;
  v_S4r: $M_alan -> M_pyr; k_s4r*M_alan*M_ket;  // modifiers: M_ket
  v_c1cAMP: -> cAMP; kc1*B_glucgn^ng/(kcm1^ng + B_glucgn^ng);  // modifiers: B_glucgn
  v_c2cAMP: cAMP -> ; kc2*B_ins^ni/(kcm2^ni + B_ins^ni)*cAMP;  // modifiers: B_ins
  v_d_Balan: B_alan -> ; kd_Balan*B_alan;
  v_d_Bffa: B_ffa -> ; kd_Bffa*B_ffa;
  v_d_Bgluc: B_gluc -> ; kd_Bgluc*B_gluc;
  v_d_Bglucgn: B_glucgn -> ; kd_Bglucgn*B_glucgn;
  v_d_Bins: B_ins => ; kd_Bins*B_ins;
  v_d_Bket: B_ket -> ; kd_Bket*B_ket;
  v_d_Blac: B_lac -> ; kd_Blac*B_lac;
  v_feed: -> B_gluc; piecewise(kf, time < 20000, kresume, time > tresume, 1/(1/(kf*(2*pi)^0.5)*(2*pi)^0.5)*exp(-(0.014*(time - 20000))^2/(2*(1/(kf*(2*pi)^0.5))^2)));
  v_glucgn: -> B_glucgn; k_glucgn;
  v_ins: -> B_ins; k_ins;
  v_s_dket: M_ket -> ; ks_dket*M_ket;
  v_tF1: B_gluc -> F_g6p; k_tF1*B_gluc*(1 + B_ins^ep12/(k_Dins^ep12 + B_ins^ep12));  // modifiers: B_ins
  v_tF3: $F_ffa -> B_ffa; k_tF3*F_ffa^8*k_Dins2^en9/(k_Dins2^en9 + B_ins^en9);  // modifiers: B_ins
  v_tL1: B_gluc -> gluc; k_tL1*(B_gluc - gluc);
  v_tL2: B_lac -> lac; k_tL2*B_lac;
  v_tL3: ket -> B_ket; k_tL3*ket;
  v_tL5: B_ffa -> palm; k_tL5*B_ffa;
  v_tL6: B_alan -> alan; k_tL6*B_alan*(k_Dins2^en10/(k_Dins2^en10 + B_ins^en10));  // modifiers: B_ins
  v_tS1: B_gluc -> M_g6p; k_tS1*B_gluc*(1 + B_ins^ep13/(k_Dins^ep13 + B_ins^ep13));  // modifiers: B_ins
  v_tS2: B_ket => M_ket; k_tS2*B_ket;
  v_tS3: M_lac => B_lac; k_tS3*M_lac;
  v_tS4: $M_alan -> B_alan; k_tS4*M_alan*k_Dins2^en11/(k_Dins2^en11 + B_ins^en11);  // modifiers: B_ins

  // Events:
  at (time == 20000), t0=false, persistent=false, fromTrigger=false: glycgn = 120;

  // Unit definitions:
  unit mM_2_min_1 = litre^2 / (60 second * (1e-3 mole)^2); mM_2_min_1 is "mM^(-2)min^(-1)";
  unit mM_1 = litre / (1e-3 mole); mM_1 is "mM^(-1)";
  unit mmol = 1e-3 mole;
  unit mM = 1e-3 mole / litre;
  unit mM_per_min = 1e-3 mole / (litre * 60 second); mM_per_min is "mM/min";
  unit L = litre;
  unit min = 60 second;
  unit per_min = 1 / (60 second); per_min is "/min";
end
