// SBML level 2 version 4

model yao1()

  // Compartments:
  compartment cell = 1;  // GO:0005622

  // Species:
  species CD in cell = 0; CD is "CycD";  // isVersionOf GO:0004693 interpro:IPR015451 GO:0000307
  species CE in cell = 0; CE is "CycE";  // isVersionOf GO:0004693 uniprot:O96020 uniprot:P24864 GO:0000307
  species EF in cell = 0; EF is "E2F";  // isHomologTo uniprot:Q01094
  species MC in cell = 0; MC is "Myc";  // isHomologTo uniprot:P01106
  species RB in cell = 0; RB is "Rb";  // isHomologTo uniprot:P06400
  species RE in cell = 0.55; RE is "Rb-E2F complex";  // hasPart uniprot:Q01094 uniprot:P06400
  species RP in cell = 0; RP is "phosphorylated Rb";  // isVersionOf MOD:00046 uniprot:P06400 kegg.compound:C00562

  // Parameters:
  // Serum concentration of the surrounding medium in percent, growth signal
  S = 1 dimensionless;  // hasProperty GO:0008083

  // Reactions:
  // Myc synthesis driven by growth signals (S)
  r1: => MC; cell*(kM*S/(r1_KS + S));  // isVersionOf GO:0010467
    kM = 1 uM_per_hr; r1_KS = 0.5 dimensionless;
  // Rb dephosphorylation
  r10: RP => RB; cell*(kkRBUP*RP/(Kp + RP));  // isVersionOf GO:0006470
    kkRBUP = 3.6 uM_per_hr; Kp = 0.01 uM;
  // Myc decay
  r11: MC => ; cell*dMC*MC;  // isVersionOf GO:0030163
    dMC = 0.7 per_hr;
  // E2F decay
  r12: EF => ; cell*dEF*EF;  // isVersionOf GO:0030163
    dEF = 0.25 per_hr;
  // CycE decay
  r13: CE => ; cell*dCE*CE;  // isVersionOf GO:0030163
    dCE = 1.5 per_hr;
  // CycD decay
  r14: CD => ; cell*dCD*CD;  // isVersionOf GO:0030163
    dCD = 1.5 per_hr;
  // Rb decay
  r15: RB => ; cell*dRB*RB;  // isVersionOf GO:0030163
    dRB = 0.06 per_hr;
  // Phosphorylated Rb decay
  r16: RP => ; cell*dRP*RP;  // isVersionOf GO:0030163
    dRP = 0.06 per_hr;
  // Rb-E2F complex decay
  r17: RE => ; cell*dRE*RE;  // isVersionOf GO:0030163
    dRE = 0.03 per_hr;
  // CycD synthesis driven by growth signals
  r2: => CD; cell*(kkCDS*S/(r2_KS + S));  // isVersionOf GO:0010467
    kkCDS = 0.45 uM_per_hr; r2_KS = 0.5 dimensionless;
  // E2F synthesis by a synergy between Myc and E2F autocatalysis. Since neither Myc nor E2F forms a homodimer, we assumed no cooperativity in gene activation mediated by these factors, and used the Hill coefficient of 1.0. Using Hill coefficient greater than 1.0 will not change the qualitative behavior of system dynamics
  r3: => EF; cell*(kkEF*MC*EF/((r3_KMC + MC)*(r3_KEF + EF)) + kkb*MC/(r3_KMC + MC));  // modifiers: MC; isVersionOf GO:0010467
    kkb = 0.003 uM_per_hr; kkEF = 0.4 uM_per_hr; r3_KMC = 0.15 uM; r3_KEF = 0.15 uM;
  // CycE synthesis driven by E2F
  r4: => CE; cell*(kkCE*EF/(r4_KEF + EF));  // modifiers: EF; isVersionOf GO:0031659
    kkCE = 0.35 uM_per_hr; r4_KEF = 0.15 uM;
  // CycD synthesis driven by Myc
  r5: => CD; cell*(kkCD*MC/(r5_KMC + MC));  // modifiers: MC; isVersionOf GO:0031659
    kkCD = 0.03 uM_per_hr; r5_KMC = 0.15 uM;
  // Constitutive Rb synthesis
  r6: => RB; cell*kkRB;  // isVersionOf GO:0010467
    kkRB = 0.18 uM_per_hr;
  // E2F dissociation from Rb-E2F complex by CycD- and CycE-mediated phosphorylation
  r7: RE => RP + EF; cell*(kkRBPP*CD*RE/(r7_KD + RE) + kkRBPP*CE*RE/(r7_KE + RE));  // modifiers: CE, CD; hasVersion ec-code:2.7.11.22 GO:0043241 GO:0004693
    kkRBPP = 18 per_hr; r7_KE = 0.92 uM; r7_KD = 0.92 uM;
  // E2F titration by Rb via E2F-Rb complex formation
  r8: RB + EF => RE; cell*kkRE*RB*EF;  // isVersionOf GO:0006461
    kkRE = 180 per_uM_per_hr;
  // Rb phosphorylation by CycD and CycE
  r9: RB => RP; cell*(kkRBP*CD*RB/(r9_KD + RB) + kkRBP2*CE*RB/(r9_KE + RB));  // modifiers: CE, CD; isVersionOf GO:0006468 ec-code:2.7.11.22
    kkRBP2 = 18 per_hr; kkRBP = 18 per_hr; r9_KE = 0.92 uM; r9_KD = 0.92 uM;

  // Events:
  e2: at (time > 5): S = 1;
  e1: at (time > 0): S = 20;

  // Unit definitions:
  unit per_uM_per_hr = litre / (3600 second * 1e-6 mole);
  unit per_hr = 1 / (3600 second);
  unit uM = 1e-6 mole / litre;
  unit uM_per_hr = 1e-6 mole / (3600 second * litre);
  unit hour = 3600 second;
  unit micromole = 1e-6 mole;
end
