// SBML level 2 version 4

model yildirim1()

  // Compartments:
  compartment cell = 1;  // GO:0005623

  // Species:
  species A in cell = 0.038; A is "allolactose";  // hasPart CHEBI:36229
  species B in cell = 0; B is "Betagalactosidase";  // uniprot:P00722
  species I1 in cell = 0; I1 is "PartialmRNA";
  species I2 in cell = 0; I2 is "PartialBetagalactosidase";
  species I3 in cell = 0; I3 is "PartialPermease";
  species L in cell = 0.372; L is "lactose_internal";  // kegg.compound:C00243 CHEBI:17716
  species $L_e in cell = 0.08; L_e is "External_Lactose";  // kegg.compound:C00243 CHEBI:17716
  species M in cell = 0.000626; M is "mRNA";  // CHEBI:33699
  species P in cell = 0.0149; P is "permease";  // uniprot:P02920

  // Parameters:
  K = 7200;
  K_1 = 25200;
  K_A = 1.95;
  K_L = 0.97;
  K_L1 = 1.81;
  K_Le = 0.26;
  alpha_A = 17600;
  alpha_B = 0.0166;
  alpha_L = 2880;
  alpha_M = 0.000997;
  alpha_P = 10;
  beta_A = 21500;
  beta_L1 = 2650;
  gamma_0 = 7.25e-7;
  gamma_A = 0.52;
  gamma_B = 0.000833;
  gamma_L = 0;
  gamma_M = 0.411;
  gamma_P = 0.65;
  mu = 0.0226;
  tau_B = 2;
  tau_M = 0.1;
  tau_P = 0.83;

  // Reactions:
  r_a1: A => ; cell*A*(gamma_A + mu); r_a1 is "Basal_Allolactose_Degradation";  // isVersionOf GO:0046352
  r_a2: A => ; cell*beta_A*B*(A/(K_A + A)); r_a2 is "Betagalactosidase_mediated_Allolactose_Degradation";  // modifiers: B; isVersionOf GO:0046352
  r_a3_l1: L => A; cell*alpha_A*B*(L/(K_L + L)); r_a3_l1 is "Beta_galactosidase_reaction";  // modifiers: B; GO:0004565 ec-code:3.2.1.108
  r_b1: B => ; cell*B*(gamma_B + mu); r_b1 is "Beta_galactosidase_Degradation";  // isVersionOf GO:0044257
  r_b2_i2: I2 => B; cell*I2/tau_B; r_b2_i2 is "Beta_galactosidase_synthesis";  // isVersionOf GO:0006412
  r_i1: => I1; cell*alpha_M*((K_1*exp(mu*tau_M*(-2))*A^2 + 1)/(K + K_1*exp(-2*mu*tau_M)*A^2)); r_i1 is "allolactose_controlled_partial_mRNA_synthesis";  // modifiers: A; isVersionOf GO:0009299
  r_i2: => I2; cell*alpha_B*M*exp(-(mu*tau_B)); r_i2 is "Partial_Beta_galactosidase_synthesis";  // modifiers: M; isVersionOf GO:0006412
  r_i3: => I3; cell*alpha_P*M*exp(-1*mu*(tau_B + tau_P)); r_i3 is "partial_permease_synthesis";  // modifiers: M; isVersionOf GO:0006412
  r_l2: L => ; cell*L*(gamma_L + mu); r_l2 is "lactose_degradation";  // GO:0005990
  r_l3: L => ; cell*beta_L1*P*(L/(K_L1 + L)); r_l3 is "Lactose_transport_out";  // modifiers: P; GO:0015155
  r_l4: => L; cell*alpha_L*P*(L_e/(K_Le + L_e)); r_l4 is "Lactose_transport_in";  // modifiers: L_e, P; GO:0015155
  r_m1: => M; cell*gamma_0; r_m1 is "Basal_mRNA_Synthesis";  // isVersionOf GO:0006351
  r_m2: M => ; cell*M*(gamma_M + mu); r_m2 is "mRNA_Degradation";  // GO:0006402
  r_m3_i1: I1 => M; cell*I1/tau_M; r_m3_i1 is "allolactose_controlled_mRNA_synthesis";  // isVersionOf GO:0009299
  r_p1: P => ; cell*P*(gamma_P + mu); r_p1 is "permease_degradation";  // isVersionOf GO:0044257
  r_p2_i3: I3 => P; cell*I3/(tau_B + tau_P); r_p2_i3 is "permease_synthesis";  // isVersionOf GO:0006412

  // Unit definitions:
  unit millimoles = 1e-3 mole;
  unit minute = 60 second;
end
