// SBML level 2 version 4

model yugi2()

  // Compartments:
  compartment default = 1 volume;  // isVersionOf GO:0005623

  // Species:
  substanceOnly species $PFKL in default = 1.235571;
  substanceOnly species Citrate in default = 17.74761;
  species sa4_degraded in default = 0;
  substanceOnly species ALDO in default = 1;
  substanceOnly species pPFKL in default = 0.759332005;
  species sa8_degraded in default = 0;
  species sa7_degraded in default = 0;
  species sa5_degraded in default = 0;
  species sa6_degraded in default = 0;
  species sa9_degraded in default = 0;
  species sa10_degraded in default = 0;
  substanceOnly species FBPase in default = 1;
  species sa3_degraded in default = 0;
  substanceOnly species $F6P_proxy in default;
  substanceOnly species IR_complex in default = 37.81915;
  substanceOnly species $pro_IR_complex in default = 46.22225;
  substanceOnly species p1IR_complex in default = 2.507671;
  substanceOnly species p2IR_complex in default = 852.608418;
  substanceOnly species p1p2IRcomplex in default = 3.930696;
  substanceOnly species $AKT in default = 4.338122;
  substanceOnly species pAKT in default = 0.012942682;
  substanceOnly species F6P in default = 14.07743;
  substanceOnly species $mTOR in default = 0.09591637;
  substanceOnly species pmTOR in default = 0.004015031;
  substanceOnly species $S6K in default = 2.776994;
  substanceOnly species pS6K in default = 0.000988831;
  substanceOnly species $X in default = 14.99133;
  substanceOnly species pX in default = 0.043352951;
  species sa28_degraded in default = 0;
  species sa27_degraded in default = 0;
  species sa26_degraded in default = 0;
  substanceOnly species F1_6BP in default = 104.0724; F1_6BP is "F1,6BP";
  substanceOnly species PEP in default = 108.0945;
  substanceOnly species Isocitrate in default = 1.794872;
  substanceOnly species _2_oxoglutarate in default = 25.18854; _2_oxoglutarate is "2-oxoglutarate";
  substanceOnly species Malate in default = 68.87883;
  substanceOnly species F2_6BP in default = 1; F2_6BP is "F2,6BP";

  // Parameters:
  K_FBPase_cit = 0.0211646 dimensionless;
  K_FBPase_f16bp = 0.104089638 dimensionless;
  K_FBPase_f26bp = 17.51744 dimensionless;
  K_PFKL_PHOS_S775 = 6.283706 dimensionless;
  K_PFKL_akg = 24661.01 dimensionless;
  K_PFKL_cit = 41.30426 dimensionless;
  K_PFKL_f26bp = 1.282443 dimensionless;
  K_PFKL_f6p = 0.014114844 dimensionless;
  K_PFKL_icit = 1784.508 dimensionless;
  K_PFKL_mal = 9.544729 dimensionless;
  K_PFKL_pep = 0.633518366 dimensionless;
  Vf_FBPase = 9.932861 dimensionless;
  Vf_PFKL = 695063.7 dimensionless;
  insulin = 1 dimensionless;
  k_ALDO = 0.008187906 dimensionless;
  k_akg = -3.544495 substance;
  k_cit = -0.351935646 substance;
  k_f26bp = -0.083430336 substance;
  k_f6p = -0.930115636 dimensionless;
  k_icit = -0.038210156 substance;
  k_mal = 1.00553 substance;
  k_pep = 43.99196 substance;

  // Assignment rules:
  F6P_proxy := F6P;

  // Reactions:
  re30: $F6P_proxy => F1_6BP; F2_6BP/(K_PFKL_f26bp + F2_6BP)*(K_PFKL_akg/(K_PFKL_akg + _2_oxoglutarate))*(K_PFKL_pep/(K_PFKL_pep + PEP))*(K_PFKL_cit/(K_PFKL_cit + Citrate))*(K_PFKL_icit/(K_PFKL_icit + Isocitrate))*(K_PFKL_mal/(K_PFKL_mal + Malate))*(pPFKL/(K_PFKL_PHOS_S775 + pPFKL))*(Vf_PFKL*F6P_proxy/(K_PFKL_f6p + F6P_proxy));  // modifiers: pPFKL, Malate, Isocitrate, Citrate, PEP, _2_oxoglutarate, F2_6BP, PFKL
  re31: F1_6BP => $F6P_proxy; K_FBPase_f26bp/(K_FBPase_f26bp + F2_6BP)*(Citrate/(K_FBPase_cit + Citrate))*(Vf_FBPase*F1_6BP/(K_FBPase_f16bp + F1_6BP));  // modifiers: Citrate, F2_6BP, FBPase
  re32: F1_6BP => sa4_degraded; k_ALDO*F1_6BP;  // modifiers: ALDO
  re33: Malate => sa8_degraded; -k_mal;
  re34: _2_oxoglutarate => sa7_degraded; -k_akg;
  re35: PEP => sa5_degraded; -k_pep;
  re36: Isocitrate => sa6_degraded; -k_icit;
  re37: F2_6BP => sa9_degraded; -k_f26bp;
  re38: Citrate => sa10_degraded; -k_cit;
  re39: F6P => sa3_degraded; -k_f6p;
  re40: $pro_IR_complex => IR_complex; re40_k1*(pro_IR_complex - IR_complex);
    re40_k1 = 0.04779859 dimensionless;
  re41: IR_complex -> p1IR_complex; re41_k1*insulin*IR_complex - re41_k2*p1IR_complex;
    re41_k2 = 1.611475 dimensionless; re41_k1 = 7.781608 dimensionless;
  re42: IR_complex => p2IR_complex; re42_k1*IR_complex*pmTOR;  // modifiers: pmTOR
    re42_k1 = 9.933112 dimensionless;
  re43: p2IR_complex -> p1p2IRcomplex; re43_k1*insulin*p2IR_complex - re43_k2*p1p2IRcomplex;
    re43_k2 = 0.4081279 dimensionless; re43_k1 = 0.3630303 dimensionless;
  re44: p1IR_complex => p1p2IRcomplex; re44_k1*p1IR_complex*pmTOR;  // modifiers: pmTOR
    re44_k1 = 3.88249e-5 dimensionless;
  re45: p1p2IRcomplex => p1IR_complex; re45_k1*p1p2IRcomplex;
    re45_k1 = 0.284426 dimensionless;
  re46: p2IR_complex => IR_complex; re46_k1*p2IR_complex;
    re46_k1 = 1e-5 dimensionless;
  re47: p1p2IRcomplex => sa28_degraded; re47_k1*p1p2IRcomplex;
    re47_k1 = 0.09489603 dimensionless;
  re48: $AKT => pAKT; re48_k1*(AKT - pAKT)*p1IR_complex;  // modifiers: p1IR_complex
    re48_k1 = 0.009195789 dimensionless;
  re49: pAKT => $AKT; re49_k1*pAKT;
    re49_k1 = 7.706185 dimensionless;
  re50: p2IR_complex => sa27_degraded; re50_k1*p2IR_complex;
    re50_k1 = 1.002778e-5 dimensionless;
  re51: p1IR_complex => sa26_degraded; re51_k1*p1IR_complex;
    re51_k1 = 0.007927176 substance;
  re52: $mTOR => pmTOR; re52_k1*(mTOR - pmTOR)*pAKT;  // modifiers: pAKT
    re52_k1 = 0.4196824 dimensionless;
  re53: pmTOR => $mTOR; re53_k1*pmTOR;
    re53_k1 = 0.1243305 dimensionless;
  re54: $S6K => pS6K; re54_k1*(S6K - pS6K)*pmTOR;  // modifiers: pmTOR
    re54_k1 = 0.007524646 dimensionless;
  re55: pS6K => $S6K; re55_k1*pS6K*pX;  // modifiers: pX
    re55_k1 = 1.954976 dimensionless;
  re56: $X => pX; re56_k1*(X - pX)*pmTOR;  // modifiers: pmTOR
    re56_k1 = 0.001053424 dimensionless;
  re57: pX => $X; re57_k1*pX;
    re57_k1 = 0.001458116 substance;
  re58: $PFKL => pPFKL; re58_k1*(PFKL - pPFKL)*pS6K;  // modifiers: pS6K
    re58_k1 = 26.83167 dimensionless;
  re59: pPFKL => $PFKL; re59_k1*pPFKL;
    re59_k1 = 0.01665251 dimensionless;

  // Events:
  ev45min: at (time > 45): k_pep = -0.301659125, k_mal = 0.502765209, k_f26bp = -0.003055632, k_icit = 0.031674208, k_f6p = 0.070387129, k_cit = 0.306686777, k_akg = 0.369532428;
  ev30min: at (time > 30): k_cit = 0.306686777, k_pep = -0.301659125, k_mal = 0.502765209, k_f26bp = -0.003055632, k_icit = 0.031674208, k_f6p = 0.070387129, k_akg = 0.369532428;
  ev20min: at (time > 20): k_pep = -3.61991, k_mal = 1.206637, k_f26bp = -0.032601514, k_icit = 0.031674208, k_f6p = -0.165912519, k_cit = 0.377073906, k_akg = 0.226244344;
  ev15min: at (time > 15): k_mal = 1.809955, k_pep = -4.826546, k_f26bp = 0.100115778, k_icit = -0.018099548, k_f6p = -0.12066365, k_cit = 0.452488688, k_akg = 1.085973;
  ev10min: at (time > 10): k_f6p = -1.055807, k_pep = 9.049774, k_mal = 3.921569, k_f26bp = -0.050207413, k_icit = -0.038210156, k_cit = 1.085973, k_akg = 0.36199095;
  ev5min: at (time > 5): k_pep = -6.334842, k_mal = -0.904977376, k_f26bp = 0.119075279, k_icit = -0.038210156, k_f6p = 0.271493213, k_cit = -0.211161388, k_akg = 0;
  ev2min: at (time > 2): k_pep = 7.54147813, k_mal = -1.508296, k_f26bp = 0.028924455, k_icit = -0.038210156, k_f6p = 1.357466, k_cit = 0.351935646, k_akg = -1.357466;

  // Unit definitions:
  unit time = second;
  unit length = metre;
  unit area = metre^2;
  unit volume = litre;
  unit substance = mole;
end
