// SBML level 2 version 1

model zatorskyd()

  // Compartments:
  compartment compartment = 1; compartment is "cell";  // GO:0005623 BTO:0000093

  // Species:
  species x in compartment = 0; x is "p53";  // isVersionOf uniprot:P04637
  species y in compartment = 0.8; y is "Mdm2";  // isVersionOf uniprot:Q00987
  species y0 in compartment = 0.1; y0 is "precursor Mdm2";

  // Parameters:
  alpha_0 = 0.8;
  alpha_k = 1.7;
  alpha_x = 0;
  alpha_y = 0.8;
  beta_x = 0.9;
  beta_y = 1.1;
  k = 0.0001;
  psi = 1;

  // Reactions:
  p53_production: => x; compartment*beta_x*psi;  // isVersionOf GO:0006412
  Mdm2_independent_p53_degradation: x => ; compartment*alpha_x*x;  // isVersionOf GO:0042176
  Mdm2_dependent_p53_degradation: x => ; compartment*alpha_k*y*x/(x + k);  // modifiers: y; isVersionOf GO:0042176
  R4: => y0; compartment*beta_y*x*psi; R4 is "p53 dependent Mdm2 precursor production";  // modifiers: x; isVersionOf GO:0006351
  Mdm2_synthesis_from_precursor: y0 => y; compartment*alpha_0*y0;  // isVersionOf GO:0006412
  Mdm2_degradation: y -> ; compartment*alpha_y*y;  // isVersionOf GO:0044257

  // Unit definitions:
  unit hours = 3600 second;
end
