// SBML level 2 version 1

model zeilinger2()

  // Compartments:
  compartment cytoplasm = 1;  // GO:0005737
  compartment nucleus = 1;  // GO:0005634

  // Species:
  species cLc in cytoplasm = 0.0731;  // uniprot:O81713
  species cLm in nucleus = 0.1114;  // CHEBI:33699 kegg.compound:C00046
  species cLn in nucleus = 0.2366;  // uniprot:O81713
  species cP7c in cytoplasm = 0.0266;  // uniprot:Q93WK5
  species cP7m in nucleus = 0.0204;  // CHEBI:33699 kegg.compound:C00046
  species cP7n in nucleus = 1.5103;  // uniprot:Q93WK5
  species cP9c in cytoplasm = 0.734;  // uniprot:Q8L500
  species cP9m in nucleus = 0.002;  // CHEBI:33699 kegg.compound:C00046
  species cP9n in nucleus = 1.1162;  // uniprot:Q8L500
  species cPn in nucleus = 0;
  species cTc in cytoplasm = 5.2235;  // uniprot:Q9LKL2 interpro:IPR010402
  species cTm in nucleus = 3.6732;  // CHEBI:33699 kegg.compound:C00046
  species cTn in nucleus = 4.5333;  // uniprot:Q9LKL2
  species cXc in cytoplasm = 2.4188;
  species cXm in nucleus = 0.652;  // CHEBI:33699 kegg.compound:C00046
  species cXn in nucleus = 14.7289;  // GO:0005667
  species cYc in cytoplasm = 49.2611;
  species cYm in nucleus = 0.2992;  // CHEBI:33699 kegg.compound:C00046
  species cYn in nucleus = 17.4355;  // GO:0005667

  // Parameters:
  Day_in_hours = 24;
  a = 2.2802 dimensionless;
  b = 3.1075 dimensionless;
  c = 1.6808 dimensionless;
  d = 1.0164 dimensionless;
  e = 1.4943 dimensionless;
  f = 1.9491 dimensionless;
  g1 = 16.3389 nM;
  g10 = 5.6855 nM;
  g2 = 16.7487 nM;
  g3 = 11.5922 nM;
  g4 = 11.3625 nM;
  g5 = 0.5061 nM;
  g6 = 7.8469 nM;
  g7 = 0.4444 nM;
  g8 = 11.0459 nM;
  g9 = 14.5219 nM;
  h = 2.2116 dimensionless;
  i = 1.1065 dimensionless;
  j = 2.5579 dimensionless;
  k = 3.3953 dimensionless;
  k1 = 22.3951 nM;
  k10 = 16.1162 nM;
  k11 = 48.5862 nM;
  k12 = 23.2876 nM;
  k13 = 1.2 nM;
  k14 = 50.9418 nM;
  k15 = 49.4094 nM;
  k16 = 42.4837 nM;
  k17 = 18.6089 nM;
  k18 = 16.2407 nM;
  k19 = 26.5795 nM;
  k2 = 32.7881 nM;
  k3 = 29.0823 nM;
  k4 = 4.0551 nM;
  k5 = 16.9133 nM;
  k6 = 43.7049 nM;
  k7 = 8.6873 nM;
  k8 = 13.4324 nM;
  k9 = 14.605 nM;
  ld = 1 dimensionless;
  lmax = 1 dimensionless;
  m1 = 8.0568 nM_per_hour;
  m10 = 9.2511 nM_per_hour;
  m11 = 7.9066 nM_per_hour;
  m12 = 8.4753 nM_per_hour;
  m13 = 6.8544 nM_per_hour;
  m14 = 3.2581 nM_per_hour;
  m15 = 1.2 nM_per_hour;
  m16 = 9.531 nM_per_hour;
  m17 = 5.4062 nM_per_hour;
  m18 = 8.671 nM_per_hour;
  m19 = 6.1155 nM_per_hour;
  m2 = 10.4609 nM_per_hour;
  m20 = 3.4152 nM_per_hour;
  m21 = 0.028 nM_per_hour;
  m3 = 12.7853 nM_per_hour;
  m4 = 8.5185 nM_per_hour;
  m5 = 9.3024 nM_per_hour;
  m6 = 10.899 nM_per_hour;
  m7 = 0.7527 nM_per_hour;
  m8 = 13.7459 nM_per_hour;
  m9 = 2.6345 nM_per_hour;
  n1 = 2.3023 nM_per_hour;
  n2 = 7.5433 nM_per_hour;
  n3 = 0.6703 nM_per_hour;
  n4 = 1.5293 nM_per_hour;
  n5 = 2.6296 nM_per_hour;
  n6 = 11.3117 nM_per_hour;
  n7 = 0.0833 nM_per_hour;
  n8 = 2.0738 nM;
  p1 = 1.2294;
  p2 = 1.0494;
  p3 = 8.583;
  p4 = 14.6828;
  p5 = 0.5 nM_per_hour;
  p6 = 6.7738;
  p7 = 10.4532;
  q1 = 7.9798;
  q2 = 2.5505;
  q3 = 1;
  q4 = 7.4548;
  r1 = 31.5166;
  r10 = 0.4557;
  r11 = 34.6266;
  r12 = 22.838;
  r2 = 9.1138;
  r3 = 29.4222;
  r4 = 33.6178;
  r5 = 27.818;
  r6 = 4.2863;
  r7 = 9.1917;
  r8 = 25.8963;
  r9 = 31.0318;

  // Reactions:
  Light_dependent_cLm_synthesis: => cLm; nucleus*ld*q1*cPn;  // modifiers: cPn; GO:0006351 GO:0009642
  cTm_degradation: cTm => ; nucleus*m4*cTm/(k4 + cTm);  // GO:0006402
  cTc_synthesis: => cTc; cytoplasm*p2*cTm;  // modifiers: cTm; GO:0006412
  cTc_transport_into_nucleus: cTc => cTn; cytoplasm*r3*cTc;  // GO:0000060
  cTn_transport_into_cytoplasm: cTn => cTc; nucleus*r4*cTn;  // GO:0065002
  cTc_degradation: cTc => ; cytoplasm*((lmax - ld)*m5 + m6)*(cTc/(k5 + cTc));  // GO:0044257
  cTn_degradation: cTn => ; nucleus*((lmax - ld)*m7 + m8)*(cTn/(k6 + cTn));  // GO:0044257
  cXm_transcription: => cXm; nucleus*(n3*cTn^d/(g4^d + cTn^d));  // modifiers: cTn; GO:0006351
  cXm_degradation: cXm => ; nucleus*(m9*cXm/(k7 + cXm));  // GO:0006402
  cXc_transcription: => cXc; cytoplasm*p3*cXm;  // modifiers: cXm; GO:0006412
  cXc_transport_into_nucleus: cXc => cXn; cytoplasm*r5*cXc;  // GO:0000060
  Light_independent_cLm_synthesis: => cLm; nucleus*(n1*cXn^a/(g1^a + cXn^a))*(g7^h/(g7^h + cP7n^h))*(g8^i/(g8^i + cP9n^i));  // modifiers: cXn, cP7n, cP9n; GO:0006351
  cXn_transport_into_cytoplasm: cXn => cXc; nucleus*r6*cXn;  // GO:0065002
  cXc_degradation: cXc => ; cytoplasm*m10*cXc/(k8 + cXc);  // GO:0044257
  cXn_degradation: cXn => ; nucleus*m11*cXn/(k9 + cXn);  // GO:0044257
  cYm_transcription: => cYm; nucleus*(ld*q2*cPn + (ld*n4 + n5)*g5^e/(g5^e + cTn^e))*(g6^f/(g6^f + cLn^f));  // modifiers: cTn, cLn, cPn; GO:0006351 GO:0009642
  cYm_degradation: cYm => ; nucleus*m12*cYm/(k10 + cYm);  // GO:0006402
  cYc_transcription: => cYc; cytoplasm*p4*cYm;  // modifiers: cYm; GO:0006412
  cYc_transport_to_nucleus: cYc => cYn; cytoplasm*r7*cYc;  // GO:0000060
  cYn_transport_to_cytoplasm: cYn => cYc; nucleus*r8*cYn;  // GO:0065002
  cYc_degradation: cYc => ; cytoplasm*m13*cYc/(k11 + cYc);  // GO:0044257
  cYn_degradation: cYn => ; nucleus*m14*cYn/(k12 + cYn);  // GO:0044257
  cLm_degradation: cLm => ; nucleus*m1*cLm/(k1 + cLm);  // GO:0006402
  cPn_synthesis: => cPn; nucleus*(lmax - ld)*p5;  // GO:0009642 GO:0006412
  R31a: cPn => ; nucleus*m15*cPn/(k13 + cPn); R31a is "cPn degradation";  // GO:0044257
  R31b: cPn => ; nucleus*q3*ld*cPn; R31b is "Light dependent cPn degradation";  // GO:0045732 GO:0009642
  cP7m_transcription: => cP7m; nucleus*n6*cLn^j/(g9^j + cLn^j);  // modifiers: cLn; GO:0006351
  cP7m_degradation: cP7m => ; nucleus*m16*cP7m/(k14 + cP7m);  // GO:0006402
  cP7c_synthesis: => cP7c; cytoplasm*p6*cP7m;  // modifiers: cP7m; GO:0006412
  cP7c_transport_to_nucleus: cP7c => cP7n; cytoplasm*r9*cP7c;  // GO:0000060
  cP7n_transport_to_cytoplasm: cP7n => cP7c; nucleus*r10*cP7n;  // GO:0065002
  cP7c_degradation: cP7c => ; cytoplasm*m17*cP7c/(k15 + cP7c);  // GO:0044257
  cP7n_degradation: cP7n => ; nucleus*m18*cP7n/(k16 + cP7n);  // GO:0044257
  cP9m_transcription: => cP9m; (ld*q4*cPn + n7*ld + n8)*cLn^k/(g10^k + cLn^k);  // modifiers: cPn, cLn; GO:0006351 GO:0009642
  cLc_synthesis: => cLc; cytoplasm*p1*cLm;  // modifiers: cLm; GO:0006412
  cP79m_degradation: cP9m => ; nucleus*m19*cP9m/(k17 + cP9m);  // GO:0006402
  cP9c_synthesis: => cP9c; cytoplasm*p7*cP9m;  // modifiers: cP9m; GO:0006412
  cP9c_transport_to_nucleus: cP9c => cP9n; cytoplasm*r11*cP9c;  // GO:0000060
  cP9n_transport_to_cytoplasm: cP9n => cP9c; nucleus*r12*cP9n;  // GO:0065002
  cP9c_degradation: cP9c => ; cytoplasm*m20*cP9c/(k18 + cP9c);  // GO:0044257
  cP9n_degradation: cP9n => ; nucleus*m21*cP9n/(k19 + cP9n);  // GO:0044257
  cLc_transport_into_nucleus: cLc => cLn; cytoplasm*r1*cLc;  // GO:0000060
  cLn_transport_into_cytoplasm: cLn => cLc; nucleus*r2*cLn;  // GO:0065002
  cLc_degradation: cLc => ; cytoplasm*m2*cLc/(k2 + cLc);  // GO:0044257
  cLn_degradation: cLn => ; nucleus*m3*cLn/(k3 + cLn);  // GO:0044257
  cTm_transcription: => cTm; nucleus*(n2*cYn^b/(g2^b + cYn^b))*(g3^c/(g3^c + cLn^c));  // modifiers: cYn, cLn; GO:0006351

  // Events:
  event_0000001: at (Day_in_hours - time <= 0): Day_in_hours = Day_in_hours + 24, ld = 1;
  event_0000002: at ((Day_in_hours - time <= 12) && (Day_in_hours - time > 0)): ld = 0;

  // Unit definitions:
  unit nanomoles = 1e-9 mole;
  unit hour = 3600 second;
  unit Hour_inv = 1 / (3600 second);
  unit nM = 1e-9 mole / litre;
  unit nM_per_hour = 1e-9 mole / (litre * 3600 second);
end
