// SBML level 2 version 4

model zhu1()

  // Compartments:
  compartment cytoplasm = 1;  // GO:0005829
  compartment store = 1;

  // Species:
  species X in cytoplasm = 15; X is "TF_A";
  species Y in store = 0; Y is "Calcium in store";  // kegg.compound:C00076 CHEBI:22984
  species Z in cytoplasm = 0.25; Z is "Calcium in cytoplasm";  // kegg.compound:C00076 CHEBI:22984

  // Parameters:
  Ka = 0.5;
  Kb = 0.5;
  Kd0 = 10;
  gamma = 9;
  kf0 = 6;

  // Assignment rules:
  Kd := Kd0/(1 + Z^4/Kb^4);
  kf := kf0*(1 + gamma*Z^4/(Ka^4 + Z^4));

  // Reactions:
  Calcium_Influx: -> Z; v0;  // isVersionOf GO:0007204
    v0 = 1;
  Calcium_Influx_stimulation: -> Z; v1*beta; Calcium_Influx_stimulation is "Calcium Influx by stimulation";  // isVersionOf GO:0007204
    beta = 0.3; v1 = 5.7;
  Calcium_into_cytoplasm: Y -> Z; Vm3*Y^m/(Kr^m + Y^m)*Z^p/(K_A^p + Z^p); Calcium_into_cytoplasm is "Calcium influx to cytoplasm";  // isVersionOf GO:0051209 GO:0007204
    p = 4; m = 2; K_A = 0.46; Kr = 1.7; Vm3 = 325;
  Calcium_into_store: Z -> Y; Vm2*Z^n/(K2^n + Z^n); Calcium_into_store is "Calcium Influx";  // isVersionOf GO:0051481
    n = 2; K2 = 0.5; Vm2 = 30;
  Leakage: Y -> Z; k1*Y; Leakage is "Calcium Leakage";  // isVersionOf GO:0007204 GO:0051209
    k1 = 0.7;
  Leakage_from_cytoplasm: Z -> ; k*Z;  // isVersionOf GO:0051481
    k = 10;
  TF_degradation: X -> ; kd*X;  // isVersionOf GO:0030163
    kd = 1;
  TF_synthesis: -> X; kf*X^2/(X^2 + Kd); TF_synthesis is "TF Synthesis";  // isVersionOf GO:0006412
  TF_synthesis_basal: -> X; Rbas;  // isVersionOf GO:0006412
    Rbas = 0.1;

  // Unit definitions:
  unit minutes = 60 second;
  unit micro_mole = 1e-6 mole;
end
